folder Simulations: version=36; creator=Apsim 7.6-r4048
  targets
  vars
  factorial Factorials: active=0
    settings
  simulation Martonvasar_2013_WD
    clock
      start_date = 14/05/2013  # Enter the start date of the simulation
      end_date = 31/10/2013  # Enter the end date of the simulation
    summaryfile
    metfile met: filename=%apsim%\Model\Met\Martonsavar_2013.met
    area paddock
      Soil Martonvasar: Latitude=0; Longitude=0
        Water
          Thickness  BD    AirDry  LL15   DUL    SAT    KS
          50         1.3   0.13    0.134  0.267  0.4    184
          100        1.32  0.141   0.145  0.278  0.404  145
          150        1.35  0.154   0.16   0.294  0.41   145
          300        1.4   0.171   0.175  0.309  0.417  146
          400        1.46  0.171   0.175  0.307  0.416  110
          1000       1.52  0.16    0.164  0.295  0.41   108
          SoilCrop maize: LL=[0.134, 0.145, 0.16, 0.178, 0.19, 0.26]; KL=[0.08, 0.08, 0.08, 0.08, 0.07, 0.06]; XF=[1, 1, 1, 1, 1, 1]
        SoilWater: SummerCona=1.5; SummerU=6; SummerDate=1-Nov; WinterCona=1.5; WinterU=6; WinterDate=1-Apr; DiffusConst=88; DiffusSlope=35; Salb=0.13; CN2Bare=81; CNRed=1; CNCov=0.2; Thickness=[50, 100, 150, 300, 400, 1000]; SWCON=[0.5, 0.5, 0.5, 0.5, 0.5, 0.5]
        SoilOrganicMatter: RootCN=45; RootWt=1000; SoilCN=14.5; EnrACoeff=7.4; EnrBCoeff=0.2; OCUnits=Total
          Thickness  OC    FBiom  FInert
          50         1.3   0.03   0.3
          100        0.65  0.01   0.4
          150        0.32  0      0.5
          300        0.11  0      0.7
          400        0.11  0      0.9
          1000       0.11  0      1
        Analysis: Thickness=[50, 100, 150, 300, 400, 1000]; PH=[8, 8, 8, 8, 8, 8]; PHUnits=Water; BoronUnits=HotWater
        InitialWater Initial water: FractionFull=1; PercentMethod=EvenlyDistributed; RelativeTo=ll15
        Sample Initial nitrogen: Date=14/05/2011; NO3Units=kgha; NH4Units=kgha; SWUnits=Volumetric; OCUnits=Total; PHUnits=Water
          Thickness  NO3  NH4
          50         46   4
          100        46   1.89
          150        36   1.43
          300        20   1.144
          400        18   1.152
          1000       16   0.432
      manager Calculator -> /Simulations/Nerac_2012/paddock/Calculator
      folder Manager folder
        manager Sow on a fixed date
          #
          date = 14/05/2013  # Enter sowing date (dd-mmm)
          #
          crop = maize  # Enter name of crop to sow
          density = 5.87  # Enter sowing density (plants/m2)
          depth = 30  # Enter sowing depth (mm)
          cultivar = B73  # Enter cultivar
          class = plant  # Enter crop growth class
          row_spacing = 800  # Enter row spacing (mm)
          on start_of_day:
```
        if (today = date('[date]') then
              [crop] sow plants =[density], sowing_depth = [depth], cultivar = [cultivar], row_spacing = [row_spacing], crop_class = [class]
         endif
```
        manager Fertilise N at sowing
          # When should fertiliser be applied
          modulename = maize  # On which module should the event come from
          eventname = sowing  # On which event should fertiliser be applied
          # Fertiliser application details
          fertmodule = Fertiliser  # Module used to apply the fertiliser
          fert_amount_sow = 300  # Amount of starter fertiliser at sowing (kg/ha)
          fert_type_sow = NO3_N  # Sowing fertiliser type
          on [modulename].[eventname]:
```
        [fertmodule] apply amount = [fert_amount_sow] (kg/ha), depth = 50 (mm), type = [fert_type_sow]
```
        manager Harvesting rule -> /Simulations/Nerac_2012/paddock/Manager folder/Harvesting rule
        irrigation
          automatic_irrigation = off
          asw_depth = 100  # Depth to which ASW is calculated. (mm)
          crit_fr_asw = 1  # Fraction of ASW below which irrigation is applied (0-1.0)
          irrigation_efficiency = 1  # Efficiency of the irrigation. (0-1.0)
          irrigation_allocation = off  # Allocation limits
          allocation = 0  # Allocation in mm
          default_no3_conc = 0.0  # Nitrate concentration (ppm N)
          default_nh4_conc = 0.0  # Ammonium concentration (ppm N)
          default_cl_conc = 0.0  # Chloride concentration (ppm Cl)
        manager End crop on a fixed date
          # Harvesting criteria
          crop = maize  # Enter name of crop to harvest when ripe
          date = 31-Oct  # Enter ending date (dd-mmm)
          on end_of_day:
```
if (paddock_is_fallow() = 0) then
   outputfile do_output
endif

        if (today = date('[date]') then
              [crop]  end_crop
        endif
```
        manager2 Irrigate on dateVeg
          # Irrigation will be applied on the date(s) below
          sameDays = yes  # Apply Irrigation on the same day(s) each year? (yes/no) - if "no" then must include the year of application below
          irrigDatesStr = 09-aug 15-aug  # Dates for one or more Irrigation applications (dd-mmm or dd-mmm-yyyy) as a list with a space between dates
          # Irrigation parameters
          amount = 40  # Amount of irrigation to apply (mm)
          eff = 1.0  # Irrigation efficiency (0-1)
```csharp
using System;
using ModelFramework;
using CSGeneral;

public class Script 
{      
   [Link] Irrigation Irrigation; 
   [Input] DateTime today;
   [Param] string[] irrigDatesStr;  //a string array holding the dates as text
   [Param] string sameDays;         //if yes, we ignore the year component
   [Param] float amount;           //amount of irrigation to apply (mm)
   [Param] float eff;              //irrigation efficiency
   
   private DateTime[] irrigDates;   //an array to hold the converted dates
   private bool irrigToday = false; //a variable to hold whether or not we irrigate today
   
   [EventHandler] public void OnInitialised()
   {
      //convert the date strings to APSIM dates
      irrigDates = new DateTime[irrigDatesStr.Length];
      for (int i = 0; i < irrigDates.Length ; i++)
         irrigDates[i] = DateUtility.GetDate(irrigDatesStr[i]);
   }
          
   // The following event handler will be called each day at the start of the day
   [EventHandler] public void OnPrepare()
   {
      irrigToday = false;
      
      //for every date in our date array
      foreach (DateTime day in irrigDates)
      {
         if (sameDays.ToLower().Equals("yes")&& day.Day.Equals(today.Day) && day.Month.Equals(today.Month))
            irrigToday = true; 
         else if (day.Day.Equals(today.Day) && day.Month.Equals(today.Month) && day.Year.Equals(today.Year))
            irrigToday = true;   
      }
      
         if (irrigToday)
         {
            IrrigationApplicationType data = new IrrigationApplicationType();
            data.Amount = amount;
            Irrigation.Set("irrigation_efficiency", eff);
            Irrigation.Apply(data);
         }
   }  
}
```
        manager2 Irrigate on date1
          # Irrigation will be applied on the date(s) below
          sameDays = yes  # Apply Irrigation on the same day(s) each year? (yes/no) - if "no" then must include the year of application below
          irrigDatesStr = 07-aug 15-aug 25-aug 10-sep 20-sep  # Dates for one or more Irrigation applications (dd-mmm or dd-mmm-yyyy) as a list with a space between dates
          # Irrigation parameters
          amount = 0  # Amount of irrigation to apply (mm)
          eff = 1.0  # Irrigation efficiency (0-1)
          script: same as in Martonvasar_2013_WD.paddock.Manager folder.Irrigate on dateVeg
      fertiliser
      surfaceom surface organic matter -> /Simulations/Graneros_2013/paddock/surface organic matter
      maize -> /Simulations/Graneros_2013/paddock/maize
      outputfile: filename=Martonvasar_2013_WD.out; title=Martonvasar_2013_WD
        variables My Variables
          variables: DaysAfterSowing, dd_mm_yyyy, Stage, stagename, LeafNo, TT, yield, Biomass, GrainNo, GrainSize, maxlai, LAI, ESW, SLN, WaterSD, HI, TPLA, Height, vpd, actual_te, sw_uptake(), leaflength(1), leaflength(2), leaflength(3), leaflength(4), leaflength(5), leaflength(6), leaflength(7), leaflength(8), leaflength(9), leaflength(10), leaflength(11), leaflength(12), leaflength(13), leaflength(14), leaflength(15), leaflength(16), leafwidth(1), leafwidth(2), leafwidth(3), leafwidth(4), leafwidth(5), leafwidth(6), leafwidth(7), leafwidth(8), leafwidth(9), leafwidth(10), leafwidth(11), leafwidth(12), leafwidth(13), leafwidth(14), leafwidth(15), leafwidth(16), nInitLeaves, nLeafTips, nLeafExp, nLeafFullyExp, nLigules, LER, dlt_dm_green, dltDmGreen, RADi, TLeaf, radn_int, transp_eff, MeanTnight, relGrainLossTnight, PotGrainNo, GrainLossTnight
  simulation Martonvasar_2013 -> /Simulations/Nerac_2012
    clock
      start_date = 14/05/2013  # Enter the start date of the simulation
      end_date = 31/10/2013  # Enter the end date of the simulation
    metfile met: filename=%apsim%\Model\Met\Martonsavar_2013.met
    area paddock -> /Simulations/Nerac_2012/paddock
      Soil Deep_soil_MH -> /Simulations/Nerac_2012/paddock/Deep_soil_MH
        Water: same as Martonvasar_2013_WD.paddock.Martonvasar.Water
        SoilWater: same as Martonvasar_2013_WD.paddock.Martonvasar.SoilWater
        SoilOrganicMatter: RootCN=45; RootWt=1000; SoilCN=14.5; EnrACoeff=7.4; EnrBCoeff=0.2; OCUnits=Total
          Thickness  OC    FBiom  FInert
          50         1.3   0.03   0.3
          100        0.65  0.01   0.4
          150        0.32  0      0.5
          300        0.11  0      0.7
          400        0.11  0      0.9
          1000       0.11  0      1
        Analysis: Thickness=[50, 100, 150, 300, 400, 1000]; PH=[8, 8, 8, 8, 8, 8]; PHUnits=Water; BoronUnits=HotWater
        InitialWater Initial water: FractionFull=1; PercentMethod=EvenlyDistributed; RelativeTo=ll15
        Sample Initial nitrogen: Date=14/05/2011; NO3Units=kgha; NH4Units=kgha; SWUnits=Volumetric; OCUnits=Total; PHUnits=Water
          Thickness  NO3  NH4
          50         46   4
          100        46   1.89
          150        36   1.43
          300        20   1.144
          400        18   1.152
          1000       16   0.432
      folder Manager folder -> /Simulations/Nerac_2012/paddock/Manager folder
        manager Sow on a fixed date: same as Martonvasar_2013_WD.paddock.Manager folder.Sow on a fixed date
        manager Fertilise N at sowing
          # When should fertiliser be applied
          modulename = maize  # On which module should the event come from
          eventname = sowing  # On which event should fertiliser be applied
          # Fertiliser application details
          fertmodule = Fertiliser  # Module used to apply the fertiliser
          fert_amount_sow = 400  # Amount of starter fertiliser at sowing (kg/ha)
          fert_type_sow = NO3_N  # Sowing fertiliser type
          on [modulename].[eventname]:
          script: same as in Martonvasar_2013_WD.paddock.Manager folder.Fertilise N at sowing
        irrigation
          automatic_irrigation = on
          asw_depth = 80  # Depth to which ASW is calculated. (mm)
          crit_fr_asw = 1  # Fraction of ASW below which irrigation is applied (0-1.0)
          irrigation_efficiency = 1  # Efficiency of the irrigation. (0-1.0)
          irrigation_allocation = off  # Allocation limits
          allocation = 0  # Allocation in mm
          default_no3_conc = 0.0  # Nitrate concentration (ppm N)
          default_nh4_conc = 0.0  # Ammonium concentration (ppm N)
          default_cl_conc = 0.0  # Chloride concentration (ppm Cl)
        manager End crop on a fixed date
          # Harvesting criteria
          crop = maize  # Enter name of crop to harvest when ripe
          date = 31-Oct  # Enter ending date (dd-mmm)
          on end_of_day:
          script: same as in Martonvasar_2013_WD.paddock.Manager folder.End crop on a fixed date
        manager2 Irrigate on date1
          # Irrigation will be applied on the date(s) below
          sameDays = yes  # Apply Irrigation on the same day(s) each year? (yes/no) - if "no" then must include the year of application below
          irrigDatesStr = 20-may 01-jun10-jun 15-jun 20-jun 30-jun  # Dates for one or more Irrigation applications (dd-mmm or dd-mmm-yyyy) as a list with a space between dates
          # Irrigation parameters
          amount = 0  # Amount of irrigation to apply (mm)
          eff = 1.0  # Irrigation efficiency (0-1)
          script: same as in Martonvasar_2013_WD.paddock.Manager folder.Irrigate on dateVeg
        manager2 Irrigate on date2
          # Irrigation will be applied on the date(s) below
          sameDays = yes  # Apply Irrigation on the same day(s) each year? (yes/no) - if "no" then must include the year of application below
          irrigDatesStr = 05-jul 15-jul 25-jul 01-aug  # Dates for one or more Irrigation applications (dd-mmm or dd-mmm-yyyy) as a list with a space between dates
          # Irrigation parameters
          amount = 0  # Amount of irrigation to apply (mm)
          eff = 1.0  # Irrigation efficiency (0-1)
          script: same as in Martonvasar_2013_WD.paddock.Manager folder.Irrigate on dateVeg
        manager2 Irrigate on date
          # Irrigation will be applied on the date(s) below
          sameDays = yes  # Apply Irrigation on the same day(s) each year? (yes/no) - if "no" then must include the year of application below
          irrigDatesStr = 05-aug 11-aug 25-aug 05-sep 20-sep 30-sep  # Dates for one or more Irrigation applications (dd-mmm or dd-mmm-yyyy) as a list with a space between dates
          # Irrigation parameters
          amount = 40  # Amount of irrigation to apply (mm)
          eff = 1.0  # Irrigation efficiency (0-1)
          script: same as in Martonvasar_2013_WD.paddock.Manager folder.Irrigate on dateVeg
      maize -> /Simulations/Nerac_2012/paddock/maize
        maizeConstants standard
          crop_type = maize
          default_crop_class = plant
          stage_names = sowing germination emergence end_of_juvenile floral_initiation flag_leaf flowering start_grain_fill end_grain_fill maturity harvest_ripe end_crop
          phase_names = sowing germination emergence end_of_juvenile floral_initiation flag_leaf flowering start_grain_fill end_grain_fill maturity harvest_ripe end_crop
          phase_type = generic generic    generic   generic         generic           generic   generic   generic          generic        generic  generic      generic
          stage_code = 1   2   3    4      5     6     7    8    9    10   11   12
          pesw_germ = 0.0  # plant extractable soil water in seedling layer inadequate for germination (mm/mm)
          shoot_lag = 15.0  # Time lag before linear coleoptile growth starts (deg days)
          shoot_rate = 0.60  # Growing deg day increase with depth for coleoptile (deg day/mm depth)
          fasw_emerg = 0.0  1.0  # Fraction of available soil water
          rel_emerg_rate = 1.0  1.0  # Stress factor for thermal time calculation between germination and emergence
          twilight = -6.0  # Twilight is defined as the interval between sunrise or sunset and the time when the true
          x_temp = 0  18.0 26.0 34.0 44.0  # cardinal temps.
          y_tt = 0  10.0 18.0 26.0  0.0  # thermal time
          leaf_no_at_emerg = 0.5  # (expanded) leaf number at emergence ()
          leaf_no_seed = 6.0  # number of leaf primordia present in seed
          leaf_no_min = 5.0  # minimum leaf number
          leaf_no_max = 40  # maximum leaf number
          leaf_init_rate = 23.2  # degree days to initiate each leaf primordium until floral init (deg day)
          leaf_app_rate1 = 65.0
          leaf_app_rate2 = 36.0
          leaf_app_rate3 = 36.0
          leaf_no_rate_change1 = 8
          leaf_no_rate_change2 = 3
          rue = 0   0  1.85 1.85  1.85  1.85 1.85 1.85  1.85   1.85   0    0
          row_spacing_default = 1.0
          skiprow_default = 0
          x_row_spacing = 0.20   0.50   1.00  # Row spacing
          y_extinct_coef = 0.70   0.50   0.50  # extinction coefficient for green leaf
          y_extinct_coef_dead = 0.3    0.3    0.3  # extinction coefficient for dead material
          x_ave_temp = 8 15 35 50  # mean daily temperature
          y_stress_photo = 0  1  1  0  # multiplier on RUE
          dm_leaf_init = 0.01  # leaf weight at emergence (g/plant)
          dm_root_init = 0.01  # root weight at emergence (g/plant)
          dm_stem_init = 0.01  # stem weight at emergence (g/plant)
          stem_trans_frac = 0.20  # fraction of stem used in translocation to grain - not used for i_wheat option
          leaf_trans_frac = 0.15  # fraction of leaf used in translocation to grain
          retransRate = 0.15
          ratio_root_shoot = 0   0   1    1     0.33  0.33  0.087 0    0     0    0    0
          partition_rate_leaf = 0.0182  # coefficient of sigmoidal function between leaf partition fraction and internode no**2 (0-1)
          frac_stem2flower = 0.17  # fraction of dm allocated to stem that goes to developing head
          PGRt0 = 130
          PGRt1 = 260
          PGRbase = 1.2
          GNk = 0.83
          GrainTempWindow = -150 50
          GrainTempOrdinals = 36 40
          grn_water_cont = 0.155  # water content of grain g/g
          leaf_no_correction = 2.0  # corrects for other growing leaves
          x_lai = 0.1    4
          y_lai_sla_max = 50000 25000  # maximum specific leaf area for delta LAI
          lai_sla_min = 8000  8000  # minimum specific leaf area for delta LAI
          initial_tpla = 380
          root_depth_rate = 0  10    15    33     33    33    33   0      0       0    0    0
          x_sw_ratio = 0.1 0.5  # water availability for effects on root depth growth
          y_sw_fac_root = 0   1  # stress factor for root depth growth, This may be probably the same for all crops
          initial_root_depth = 50  # initial depth of roots (mm)
          specific_root_length = 100000
          x_plant_rld = 0   0.0001  0.0003  # root branching
          y_rel_root_rate = 0.02  0.10  1.0
          transp_eff_cf = 0.009 0.009 0.009 0.009    0.009  0.009  0.009   0.009  0.009  0.009  0.009  0.009
          svp_fract = 0.75  # (0-1)
          x_sw_demand_ratio = 0.5 1.1  # water availability
          y_swdef_leaf = 0   1  # stress indices
          x_sw_avail_ratio = 0 0.16  # water availability
          y_swdef_pheno = 0 1  # stress index for phenology
          n_supply_preference = active
          no3_diffn_const = 2.0
          maxUptakeRate = 0.029
          initialRootNConc = 0.020
          targetRootNConc = 0.002
          initialLeafSLN = 1.7
          targetLeafSLN = 1.7
          newLeafSLN = 1.1
          senescedLeafSLN = 0.3
          leafDilnNSlope = 0.0037
          leafDilnNInt = -0.0015
          initialStemNConc = 0.01
          x_stem_n = 3         5       7         10
          targetStemNConc = 0.04   0.04   0.01      0.005
          structStemNConc = 0.0045  0.0045   0.0021   0.0021
          stemDilnNSlope = 0.005
          stemDilnNInt = -0.00052
          initialRachisNConc = 0.000
          targetRachisNConc = 0.01
          structRachisNConc = 0.0021
          rachisDilnNSlope = 0.005
          rachisDilnNInt = -0.00052
          grainNFillRate = 0.01
          targetGrainNConc = 0.0143
          nUptakeCease = 523
          nSupplyFrac = 5
          dm_root_sen_frac = 0.002  # fraction of root dry matter senesced each day
          leaf_no_dead_const = -0.025  # coefficients for rate of leaf number senescence following flowering
          leaf_no_dead_slope = 0.00035
          lai_sen_light = 4.0  # induced senescence occurs (m^2/m^2)
          sen_light_slope = 0.008  # sensitivity of leaf area senescence to shading
          x_temp_senescence = -2.0 2.0  # minimum temperature for frost senescence table (oC)
          y_senescence_fac = 1   0  # daily fraction of leaf area senesced due to frost (0-1)
          sen_rate_water = 0.05  # slope in linear eqn relating soil water stress during photosynthesis to leaf senesence rate
          sen_light_time_const = 10.0  # delay factor for light senescence
          sen_radn_crit = 2  # radiation level for onset of light senescence
          frost_kill = -3.0  # temperature threshold for leaf death
          sen_water_time_const = 10.0  # delay factor for water senescence
          sen_threshold = 0.25  # supply:demand ratio for onset of water senescence
          tt_emerg_limit = 150.0  # maximum degree days allowed for emergence to take place
          stress_determinants = leaf stem grain
          yield_parts = grain  # energy
          retrans_parts = leaf stem  flower  # MEP added leaf and flower
          pfact_photo_slope = 2.5  # 2.0 !1.0
          pfact_expansion_slope = 2.5
          pfact_pheno_slope = 6  # 10 !20
          pfact_grain_slope = 20
          p_uptake_factor = 1.5  # factor to calc total P uptake from demand for today's growth
          x_p_stage_code = 3       4      5      6      7      8      10
          y_p_conc_max_leaf = 0.0045  0.0045 0.004  0.0025 0.0025 0.0024 0.0024
          y_p_conc_min_leaf = 0.003   0.003  0.0029 0.0011 0.0011 0.0008 0.0006
          y_p_conc_sen_leaf = 0.0005  0.0005 0.0005 0.0005 0.0005 0.0005 0.0005
          y_p_conc_max_stem = 0.0045   0.0045 0.003  0.0011  0.001  0.0007 0.0007
          y_p_conc_min_stem = 0.003    0.003  0.002  0.0006 0.0006 0.0002 0.0002
          y_p_conc_sen_stem = 0.0002  0.0002 0.0002 0.0002 0.0002 0.0002 0.0002
          y_p_conc_max_root = 0.0010  0.0010 0.0010 0.0010 0.0010 0.0010 0.0010  # assume P conc in roots non-varying
          y_p_conc_min_root = 0.0010  0.0010 0.0010 0.0010 0.0010 0.0010 0.0010
          y_p_conc_sen_root = 0.0010  0.0010 0.0010 0.0010 0.0010 0.0010 0.0010
          y_p_conc_max_flower = 0.0045  0.0045  0.003  0.0011  0.001  0.0007 0.0007  # assumed same as stem
          y_p_conc_min_flower = 0.003   0.003   0.002  0.0006 0.0006 0.0002 0.0002
          y_p_conc_sen_flower = 0.0002  0.0002 0.0002 0.0002 0.0002 0.0002 0.0002
          y_p_conc_max_grain = 0.001   0.001  0.001  0.001  0.001  0.0030  0.0030  # based on Mallarino (1996)
          y_p_conc_min_grain = 0.001   0.001  0.001  0.001  0.001  0.0015  0.0015  # based on Kenya data
          y_p_conc_sen_grain = 0.001   0.001  0.001  0.001  0.001  0.0015  0.0015
          y_p_conc_max_energy = 0.001   0.001  0.001  0.001  0.001  0.001  0.001
          y_p_conc_min_energy = 0.001   0.001  0.001  0.001  0.001  0.001  0.001
          y_p_conc_sen_energy = 0.001   0.001  0.001  0.001  0.001  0.001  0.001
          p_conc_init_leaf = 0.0045
          p_conc_init_stem = 0.0045
          p_conc_init_root = 0.0010  # 0.0014
          p_conc_init_flower = 0.0045
          p_conc_init_grain = 0.0030
          p_conc_init_energy = 0.0
          ll_ub = 1000.0  # upper limit of lower limit
          kl_ub = 1.0  # upper limit of water uptake factor
          minsw = 0.00001  # lowest acceptable value for ll
          year_ub = 2000  # year upper limit
          year_lb = 1800  # year lower limit
          latitude_ub = 90  # latitude upper limit
          latitude_lb = -90  # latitude lower limit
          maxt_ub = 55  # max. temperature upper limit
          maxt_lb = -50  # max. temperature lower limit
          mint_ub = 40  # min. temperature upper limit
          mint_lb = -50  # min. temperature lower limit
          radn_ub = 50  # radiation upper limit
          radn_lb = 1  # radiation lower limit
          dlayer_ub = 1000  # layer depth upper limit
          dlayer_lb = 0  # layer depth lower limit
          sat_dep_ub = 1000  # saturated water content upper limit
          sat_dep_lb = 0  # saturated water content upper limit
          dul_dep_ub = 1000  # drained upper limit upper limit
          dul_dep_lb = 0  # drained upper limit lower limit
          sw_dep_ub = 1000  # soil water upper limit
          sw_dep_lb = 0  # soil water lower limit
          no3_ub = 10000  # soil nitrate upper limit
          no3_lb = 0  # soil nitrate lower limit
          no3_min_ub = 10000  # min. soil nitrate upper limit
          no3_min_lb = 0  # min. soil nitrate lower limit
          nh4_ub = 10000  # soil nitrate upper limit
          nh4_lb = 0  # soil nitrate lower limit
          nh4_min_ub = 10000  # min. soil nitrate upper limit
          nh4_min_lb = 0  # min. soil nitrate lower limit
          head_grain_no_max_ub = 1000.0
          grain_gth_rate_ub = 20.0
          tt_emerg_to_endjuv_ub = 500.0
          tt_flower_to_maturity_ub = 1000.0
          tt_maturity_to_ripe_ub = 1000.0
          tt_flower_to_start_grain_ub = 1000.0
          tt_flag_to_flower_ub = 1000.0
          x_stem_wt = 0    80  # look up table for canopy height
          y_height = 0  2000  # plant canopy height
          canopy_height_max = 3000.0
          x_co2_te_modifier = 350.0
          y_co2_te_modifier = 1.0
          RootAngle = 45  # Root Angle (45 degrees)
          pmax = 2.07021
          n0 = 0.1968
          alpha = 2.5662
          BiomassConv = 0.409
          ScatterCoef = 0.15
          LeafAngles = 60 60 60 60 60
          SlnHeadPc = 10
          frequencyS = 60
          maxFlux = 0.8
          x_sw_ear_demand_ratio = 0.5 1.6
          y_swdef_ear = 0   1
          maxTrans = 0.75
          maxtransEffect = 0.5
          LeafClass = LER
          GrainClass = LER
          Radiation = Classic  # Radiation interception method
          HydCondLimitMechanism = Roots  # Mechanism for limiting hydraulic conductance
          maxNumStrikes = 3  # Max Number of Strikes for silking Cohort model
          GrainTempWindow = -50 100
          GrainHiTemperature = 33 36 39  # Grain High Temperature
          GrainStressSeverity = 0.00 0.00 0.45  # Severity of seed set stress
          aX0 = 0.67  # Largest leaf position multiplier
          largestLeafParams = 1000  -1.17 0.047  # Largest Leaf Area Params
          bellCurveParams = -0.009 -0.2 0.0006 -0.43  # Leaf Curve Params
      outputfile: filename=Martonvasar_2013.out; title=Martonvasar_2013
        variables My Variables: same as Martonvasar_2013_WD.paddock.outputfile.My Variables
  simulation Gaillac_2012_WD -> /Simulations/Nerac_2012
    clock
      start_date = 14/05/2012  # Enter the start date of the simulation
      end_date = 27/10/2012  # Enter the end date of the simulation
    metfile met: filename=%apsim%\Model\Met\Gaillac_2012.met
    area paddock -> /Simulations/Nerac_2012/paddock
      Soil Deep_soil_MH -> /Simulations/Nerac_2012/paddock/Deep_soil_MH
        Water
          Thickness  BD    AirDry  LL15   DUL    SAT    KS
          50         1.29  0.01    0.073  0.17   0.385  184
          100        1.31  0.072   0.082  0.179  0.385  145
          150        1.34  0.085   0.095  0.193  0.386  145
          300        1.39  0.097   0.107  0.206  0.387  146
          400        1.45  0.096   0.106  0.203  0.386  110
          1000       1.5   0.086   0.096  0.19   0.384  108
          SoilCrop maize: LL=[0.073, 0.082, 0.095, 0.11, 0.12, 0.13]; KL=[0.08, 0.08, 0.08, 0.08, 0.07, 0.06]; XF=[1, 1, 1, 1, 1, 1]
        SoilWater: SummerCona=1.5; SummerU=6; SummerDate=1-Nov; WinterCona=1.5; WinterU=6; WinterDate=1-Apr; DiffusConst=88; DiffusSlope=35; Salb=0.13; CN2Bare=81; CNRed=1; CNCov=0.2; Thickness=[50, 100, 150, 300, 400, 1000, 999999]; SWCON=[0.5, 0.5, 0.5, 0.5, 0.5, 0.5, -]
        SoilOrganicMatter: RootCN=45; RootWt=1000; SoilCN=14.5; EnrACoeff=7.4; EnrBCoeff=0.2; OCUnits=Total
          Thickness  OC    FBiom  FInert
          50         1.3   0.03   0.3
          100        0.65  0.01   0.4
          150        0.32  0      0.5
          300        0.11  0      0.7
          400        0.11  0      0.9
          1000       0.11  0      1
          999999     -     -      -
        Analysis: Thickness=[50, 100, 150, 300, 400, 1000, 999999]; PH=[8, 8, 8, 8, 8, 8, -]; PHUnits=Water; BoronUnits=HotWater
        InitialWater Initial water: FractionFull=1; PercentMethod=EvenlyDistributed; RelativeTo=ll15
        Sample Initial nitrogen: Date=14/05/2011; NO3Units=kgha; NH4Units=kgha; SWUnits=Volumetric; OCUnits=Total; PHUnits=Water
          Thickness  NO3  NH4
          50         46   4
          100        46   1.89
          150        36   1.43
          300        20   1.144
          400        18   1.152
          1000       16   0.432
      folder Manager folder -> /Simulations/Nerac_2012/paddock/Manager folder
        manager Sow on a fixed date
          #
          date = 14/05/2012  # Enter sowing date (dd-mmm)
          #
          crop = maize  # Enter name of crop to sow
          density = 8  # Enter sowing density (plants/m2)
          depth = 30  # Enter sowing depth (mm)
          cultivar = B73  # Enter cultivar
          class = plant  # Enter crop growth class
          row_spacing = 800  # Enter row spacing (mm)
          on start_of_day:
          script: same as in Martonvasar_2013_WD.paddock.Manager folder.Sow on a fixed date
        manager Fertilise N at sowing: same as Martonvasar_2013_WD.paddock.Manager folder.Fertilise N at sowing
        irrigation
          automatic_irrigation = off
          asw_depth = 4  # Depth to which ASW is calculated. (mm)
          crit_fr_asw = 1  # Fraction of ASW below which irrigation is applied (0-1.0)
          irrigation_efficiency = 1  # Efficiency of the irrigation. (0-1.0)
          irrigation_allocation = off  # Allocation limits
          allocation = 0  # Allocation in mm
          default_no3_conc = 0.0  # Nitrate concentration (ppm N)
          default_nh4_conc = 0.0  # Ammonium concentration (ppm N)
          default_cl_conc = 0.0  # Chloride concentration (ppm Cl)
        manager End crop on a fixed date
          # Harvesting criteria
          crop = maize  # Enter name of crop to harvest when ripe
          date = 27-oct  # Enter ending date (dd-mmm)
          on end_of_day:
          script: same as in Martonvasar_2013_WD.paddock.Manager folder.End crop on a fixed date
        manager2 Irrigate on date
          # Irrigation will be applied on the date(s) below
          sameDays = yes  # Apply Irrigation on the same day(s) each year? (yes/no) - if "no" then must include the year of application below
          irrigDatesStr = 10-jun 20-jun 30-jun  # Dates for one or more Irrigation applications (dd-mmm or dd-mmm-yyyy) as a list with a space between dates
          # Irrigation parameters
          amount = 0  # Amount of irrigation to apply (mm)
          eff = 1.0  # Irrigation efficiency (0-1)
          script: same as in Martonvasar_2013_WD.paddock.Manager folder.Irrigate on dateVeg
        manager2 Irrigate on PC1
          # Irrigation will be applied on the date(s) below
          sameDays = yes  # Apply Irrigation on the same day(s) each year? (yes/no) - if "no" then must include the year of application below
          irrigDatesStr = 02-jul 11-jul 19-jul  # Dates for one or more Irrigation applications (dd-mmm or dd-mmm-yyyy) as a list with a space between dates
          # Irrigation parameters
          amount = 0  # Amount of irrigation to apply (mm)
          eff = 1.0  # Irrigation efficiency (0-1)
          script: same as in Martonvasar_2013_WD.paddock.Manager folder.Irrigate on dateVeg
        manager2 Irrigate on PC2
          # Irrigation will be applied on the date(s) below
          sameDays = yes  # Apply Irrigation on the same day(s) each year? (yes/no) - if "no" then must include the year of application below
          irrigDatesStr = 01-aug 08-aug  # Dates for one or more Irrigation applications (dd-mmm or dd-mmm-yyyy) as a list with a space between dates
          # Irrigation parameters
          amount = 0  # Amount of irrigation to apply (mm)
          eff = 1.0  # Irrigation efficiency (0-1)
          script: same as in Martonvasar_2013_WD.paddock.Manager folder.Irrigate on dateVeg
        manager2 Irrigate on GF
          # Irrigation will be applied on the date(s) below
          sameDays = yes  # Apply Irrigation on the same day(s) each year? (yes/no) - if "no" then must include the year of application below
          irrigDatesStr = 08-aug 15-aug 03-sep 12-sep  # Dates for one or more Irrigation applications (dd-mmm or dd-mmm-yyyy) as a list with a space between dates
          # Irrigation parameters
          amount = 20  # Amount of irrigation to apply (mm)
          eff = 1.0  # Irrigation efficiency (0-1)
          script: same as in Martonvasar_2013_WD.paddock.Manager folder.Irrigate on dateVeg
      maize -> /Simulations/Nerac_2012/paddock/maize
        maizeConstants standard
          crop_type = maize
          default_crop_class = plant
          stage_names = sowing germination emergence end_of_juvenile floral_initiation flag_leaf flowering start_grain_fill end_grain_fill maturity harvest_ripe end_crop
          phase_names = sowing germination emergence end_of_juvenile floral_initiation flag_leaf flowering start_grain_fill end_grain_fill maturity harvest_ripe end_crop
          phase_type = generic generic    generic   generic         generic           generic   generic   generic          generic        generic  generic      generic
          stage_code = 1   2   3    4      5     6     7    8    9    10   11   12
          pesw_germ = 0.0  # plant extractable soil water in seedling layer inadequate for germination (mm/mm)
          shoot_lag = 15.0  # Time lag before linear coleoptile growth starts (deg days)
          shoot_rate = 0.60  # Growing deg day increase with depth for coleoptile (deg day/mm depth)
          fasw_emerg = 0.0  1.0  # Fraction of available soil water
          rel_emerg_rate = 1.0  1.0  # Stress factor for thermal time calculation between germination and emergence
          twilight = -6.0  # Twilight is defined as the interval between sunrise or sunset and the time when the true
          x_temp = 0  18.0 26.0 34.0 44.0  # cardinal temps.
          y_tt = 0  10.0 18.0 26.0  0.0  # thermal time
          leaf_no_at_emerg = 0.5  # (expanded) leaf number at emergence ()
          leaf_no_seed = 6.0  # number of leaf primordia present in seed
          leaf_no_min = 5.0  # minimum leaf number
          leaf_no_max = 40  # maximum leaf number
          leaf_init_rate = 23.2  # degree days to initiate each leaf primordium until floral init (deg day)
          leaf_app_rate1 = 65.0
          leaf_app_rate2 = 36.0
          leaf_app_rate3 = 36.0
          leaf_no_rate_change1 = 8
          leaf_no_rate_change2 = 3
          rue = 0   0  1.85 1.85  1.85  1.85 1.85 1.85  1.85   1.85   0    0
          row_spacing_default = 1.0
          skiprow_default = 0
          x_row_spacing = 0.20   0.50   1.00  # Row spacing
          y_extinct_coef = 0.70   0.50   0.50  # extinction coefficient for green leaf
          y_extinct_coef_dead = 0.3    0.3    0.3  # extinction coefficient for dead material
          x_ave_temp = 8 15 35 50  # mean daily temperature
          y_stress_photo = 0  1  1  0  # multiplier on RUE
          dm_leaf_init = 0.01  # leaf weight at emergence (g/plant)
          dm_root_init = 0.01  # root weight at emergence (g/plant)
          dm_stem_init = 0.01  # stem weight at emergence (g/plant)
          stem_trans_frac = 0.20  # fraction of stem used in translocation to grain - not used for i_wheat option
          leaf_trans_frac = 0.15  # fraction of leaf used in translocation to grain
          retransRate = 0.15
          ratio_root_shoot = 0   0   1    1     0.33  0.33  0.087 0    0     0    0    0
          partition_rate_leaf = 0.0182  # coefficient of sigmoidal function between leaf partition fraction and internode no**2 (0-1)
          frac_stem2flower = 0.17  # fraction of dm allocated to stem that goes to developing head
          PGRt0 = 130
          PGRt1 = 260
          PGRbase = 1.2
          GNk = 0.83
          GrainTempWindow = -150 50
          GrainTempOrdinals = 36 40
          grn_water_cont = 0.155  # water content of grain g/g
          leaf_no_correction = 2.0  # corrects for other growing leaves
          x_lai = 0.1    4
          y_lai_sla_max = 50000 25000  # maximum specific leaf area for delta LAI
          lai_sla_min = 8000  8000  # minimum specific leaf area for delta LAI
          initial_tpla = 380
          root_depth_rate = 0  10    15    33     33    33    33   0      0       0    0    0
          x_sw_ratio = 0.1 0.5  # water availability for effects on root depth growth
          y_sw_fac_root = 0   1  # stress factor for root depth growth, This may be probably the same for all crops
          initial_root_depth = 50  # initial depth of roots (mm)
          specific_root_length = 100000
          x_plant_rld = 0   0.0001  0.0003  # root branching
          y_rel_root_rate = 0.02  0.10  1.0
          transp_eff_cf = 0.009 0.009 0.009 0.009    0.009  0.009  0.009   0.009  0.009  0.009  0.009  0.009
          svp_fract = 0.75  # (0-1)
          x_sw_demand_ratio = 0.5 1.1  # water availability
          y_swdef_leaf = 0   1  # stress indices
          x_sw_avail_ratio = 0 0.16  # water availability
          y_swdef_pheno = 0 1  # stress index for phenology
          n_supply_preference = active
          no3_diffn_const = 2.0
          maxUptakeRate = 0.029
          initialRootNConc = 0.020
          targetRootNConc = 0.002
          initialLeafSLN = 1.7
          targetLeafSLN = 1.7
          newLeafSLN = 1.1
          senescedLeafSLN = 0.3
          leafDilnNSlope = 0.0037
          leafDilnNInt = -0.0015
          initialStemNConc = 0.01
          x_stem_n = 3         5       7         10
          targetStemNConc = 0.04   0.04   0.01      0.005
          structStemNConc = 0.0045  0.0045   0.0021   0.0021
          stemDilnNSlope = 0.005
          stemDilnNInt = -0.00052
          initialRachisNConc = 0.000
          targetRachisNConc = 0.01
          structRachisNConc = 0.0021
          rachisDilnNSlope = 0.005
          rachisDilnNInt = -0.00052
          grainNFillRate = 0.01
          targetGrainNConc = 0.0143
          nUptakeCease = 523
          nSupplyFrac = 5
          dm_root_sen_frac = 0.002  # fraction of root dry matter senesced each day
          leaf_no_dead_const = -0.025  # coefficients for rate of leaf number senescence following flowering
          leaf_no_dead_slope = 0.00035
          lai_sen_light = 4.0  # induced senescence occurs (m^2/m^2)
          sen_light_slope = 0.008  # sensitivity of leaf area senescence to shading
          x_temp_senescence = -2.0 2.0  # minimum temperature for frost senescence table (oC)
          y_senescence_fac = 1   0  # daily fraction of leaf area senesced due to frost (0-1)
          sen_rate_water = 0.05  # slope in linear eqn relating soil water stress during photosynthesis to leaf senesence rate
          sen_light_time_const = 10.0  # delay factor for light senescence
          sen_radn_crit = 2  # radiation level for onset of light senescence
          frost_kill = -3.0  # temperature threshold for leaf death
          sen_water_time_const = 10.0  # delay factor for water senescence
          sen_threshold = 0.25  # supply:demand ratio for onset of water senescence
          tt_emerg_limit = 150.0  # maximum degree days allowed for emergence to take place
          stress_determinants = leaf stem grain
          yield_parts = grain  # energy
          retrans_parts = leaf stem  flower  # MEP added leaf and flower
          pfact_photo_slope = 2.5  # 2.0 !1.0
          pfact_expansion_slope = 2.5
          pfact_pheno_slope = 6  # 10 !20
          pfact_grain_slope = 20
          p_uptake_factor = 1.5  # factor to calc total P uptake from demand for today's growth
          x_p_stage_code = 3       4      5      6      7      8      10
          y_p_conc_max_leaf = 0.0045  0.0045 0.004  0.0025 0.0025 0.0024 0.0024
          y_p_conc_min_leaf = 0.003   0.003  0.0029 0.0011 0.0011 0.0008 0.0006
          y_p_conc_sen_leaf = 0.0005  0.0005 0.0005 0.0005 0.0005 0.0005 0.0005
          y_p_conc_max_stem = 0.0045   0.0045 0.003  0.0011  0.001  0.0007 0.0007
          y_p_conc_min_stem = 0.003    0.003  0.002  0.0006 0.0006 0.0002 0.0002
          y_p_conc_sen_stem = 0.0002  0.0002 0.0002 0.0002 0.0002 0.0002 0.0002
          y_p_conc_max_root = 0.0010  0.0010 0.0010 0.0010 0.0010 0.0010 0.0010  # assume P conc in roots non-varying
          y_p_conc_min_root = 0.0010  0.0010 0.0010 0.0010 0.0010 0.0010 0.0010
          y_p_conc_sen_root = 0.0010  0.0010 0.0010 0.0010 0.0010 0.0010 0.0010
          y_p_conc_max_flower = 0.0045  0.0045  0.003  0.0011  0.001  0.0007 0.0007  # assumed same as stem
          y_p_conc_min_flower = 0.003   0.003   0.002  0.0006 0.0006 0.0002 0.0002
          y_p_conc_sen_flower = 0.0002  0.0002 0.0002 0.0002 0.0002 0.0002 0.0002
          y_p_conc_max_grain = 0.001   0.001  0.001  0.001  0.001  0.0030  0.0030  # based on Mallarino (1996)
          y_p_conc_min_grain = 0.001   0.001  0.001  0.001  0.001  0.0015  0.0015  # based on Kenya data
          y_p_conc_sen_grain = 0.001   0.001  0.001  0.001  0.001  0.0015  0.0015
          y_p_conc_max_energy = 0.001   0.001  0.001  0.001  0.001  0.001  0.001
          y_p_conc_min_energy = 0.001   0.001  0.001  0.001  0.001  0.001  0.001
          y_p_conc_sen_energy = 0.001   0.001  0.001  0.001  0.001  0.001  0.001
          p_conc_init_leaf = 0.0045
          p_conc_init_stem = 0.0045
          p_conc_init_root = 0.0010  # 0.0014
          p_conc_init_flower = 0.0045
          p_conc_init_grain = 0.0030
          p_conc_init_energy = 0.0
          ll_ub = 1000.0  # upper limit of lower limit
          kl_ub = 1.0  # upper limit of water uptake factor
          minsw = 0.00001  # lowest acceptable value for ll
          year_ub = 2000  # year upper limit
          year_lb = 1800  # year lower limit
          latitude_ub = 90  # latitude upper limit
          latitude_lb = -90  # latitude lower limit
          maxt_ub = 55  # max. temperature upper limit
          maxt_lb = -50  # max. temperature lower limit
          mint_ub = 40  # min. temperature upper limit
          mint_lb = -50  # min. temperature lower limit
          radn_ub = 50  # radiation upper limit
          radn_lb = 1  # radiation lower limit
          dlayer_ub = 1000  # layer depth upper limit
          dlayer_lb = 0  # layer depth lower limit
          sat_dep_ub = 1000  # saturated water content upper limit
          sat_dep_lb = 0  # saturated water content upper limit
          dul_dep_ub = 1000  # drained upper limit upper limit
          dul_dep_lb = 0  # drained upper limit lower limit
          sw_dep_ub = 1000  # soil water upper limit
          sw_dep_lb = 0  # soil water lower limit
          no3_ub = 10000  # soil nitrate upper limit
          no3_lb = 0  # soil nitrate lower limit
          no3_min_ub = 10000  # min. soil nitrate upper limit
          no3_min_lb = 0  # min. soil nitrate lower limit
          nh4_ub = 10000  # soil nitrate upper limit
          nh4_lb = 0  # soil nitrate lower limit
          nh4_min_ub = 10000  # min. soil nitrate upper limit
          nh4_min_lb = 0  # min. soil nitrate lower limit
          head_grain_no_max_ub = 1000.0
          grain_gth_rate_ub = 20.0
          tt_emerg_to_endjuv_ub = 500.0
          tt_flower_to_maturity_ub = 1000.0
          tt_maturity_to_ripe_ub = 1000.0
          tt_flower_to_start_grain_ub = 1000.0
          tt_flag_to_flower_ub = 1000.0
          x_stem_wt = 0    80  # look up table for canopy height
          y_height = 0  2000  # plant canopy height
          canopy_height_max = 3000.0
          x_co2_te_modifier = 350.0
          y_co2_te_modifier = 1.0
          RootAngle = 45  # Root Angle (45 degrees)
          pmax = 2.07021
          n0 = 0.1968
          alpha = 2.5662
          BiomassConv = 0.409
          ScatterCoef = 0.15
          LeafAngles = 60 60 60 60 60
          SlnHeadPc = 10
          frequencyS = 60
          maxFlux = 0.8
          x_sw_ear_demand_ratio = 0.5 1.6
          y_swdef_ear = 0   1
          maxTrans = 0.75
          maxtransEffect = 0.5
          LeafClass = LER
          GrainClass = PGRbase
          Radiation = Classic  # Radiation interception method
          HydCondLimitMechanism = Roots  # Mechanism for limiting hydraulic conductance
          maxNumStrikes = 3  # Max Number of Strikes for silking Cohort model
          GrainTempWindow = -50 100
          GrainHiTemperature = 33 36 39  # Grain High Temperature
          GrainStressSeverity = 0.00 0.00 0.45  # Severity of seed set stress
          aX0 = 0.67  # Largest leaf position multiplier
          largestLeafParams = 1000  -1.17 0.047  # Largest Leaf Area Params
          bellCurveParams = -0.009 -0.2 0.0006 -0.43  # Leaf Curve Params
      outputfile: filename=Gaillac_2012_WD.out; title=Gaillac_2012_WD
        variables My Variables: same as Martonvasar_2013_WD.paddock.outputfile.My Variables
  simulation Gaillac_2012 -> /Simulations/Nerac_2012
    clock
      start_date = 14/05/2012  # Enter the start date of the simulation
      end_date = 27/10/2012  # Enter the end date of the simulation
    metfile met: filename=%apsim%\Model\Met\Gaillac_2012.met
    area paddock -> /Simulations/Nerac_2012/paddock
      Soil Deep_soil_MH -> /Simulations/Nerac_2012/paddock/Deep_soil_MH
        Water: same as Gaillac_2012_WD.paddock.Deep_soil_MH.Water
        SoilWater: same as Martonvasar_2013_WD.paddock.Martonvasar.SoilWater
        SoilOrganicMatter: RootCN=45; RootWt=1000; SoilCN=14.5; EnrACoeff=7.4; EnrBCoeff=0.2; OCUnits=Total
          Thickness  OC    FBiom  FInert
          50         1.3   0.03   0.3
          100        0.65  0.01   0.4
          150        0.32  0      0.5
          300        0.11  0      0.7
          400        0.11  0      0.9
          1000       0.11  0      1
        Analysis: Thickness=[50, 100, 150, 300, 400, 1000]; PH=[8, 8, 8, 8, 8, 8]; PHUnits=Water; BoronUnits=HotWater
        InitialWater Initial water: FractionFull=1; PercentMethod=EvenlyDistributed; RelativeTo=ll15
        Sample Initial nitrogen: Date=14/05/2011; NO3Units=kgha; NH4Units=kgha; SWUnits=Volumetric; OCUnits=Total; PHUnits=Water
          Thickness  NO3  NH4
          50         46   4
          100        46   1.89
          150        36   1.43
          300        20   1.144
          400        18   1.152
          1000       16   0.432
      folder Manager folder -> /Simulations/Nerac_2012/paddock/Manager folder
        manager Sow on a fixed date
          #
          date = 14/05/2012  # Enter sowing date (dd-mmm)
          #
          crop = maize  # Enter name of crop to sow
          density = 8.44  # Enter sowing density (plants/m2)
          depth = 30  # Enter sowing depth (mm)
          cultivar = B73  # Enter cultivar
          class = plant  # Enter crop growth class
          row_spacing = 800  # Enter row spacing (mm)
          on start_of_day:
          script: same as in Martonvasar_2013_WD.paddock.Manager folder.Sow on a fixed date
        manager Fertilise N at sowing: same as Martonvasar_2013_WD.paddock.Manager folder.Fertilise N at sowing
        irrigation
          automatic_irrigation = on
          asw_depth = 1300  # Depth to which ASW is calculated. (mm)
          crit_fr_asw = 1  # Fraction of ASW below which irrigation is applied (0-1.0)
          irrigation_efficiency = 1  # Efficiency of the irrigation. (0-1.0)
          irrigation_allocation = off  # Allocation limits
          allocation = 0  # Allocation in mm
          default_no3_conc = 0.0  # Nitrate concentration (ppm N)
          default_nh4_conc = 0.0  # Ammonium concentration (ppm N)
          default_cl_conc = 0.0  # Chloride concentration (ppm Cl)
        manager End crop on a fixed date
          # Harvesting criteria
          crop = maize  # Enter name of crop to harvest when ripe
          date = 27-oct  # Enter ending date (dd-mmm)
          on end_of_day:
          script: same as in Martonvasar_2013_WD.paddock.Manager folder.End crop on a fixed date
      maize -> /Simulations/Nerac_2012/paddock/maize
        maizeConstants standard: same as Gaillac_2012_WD.paddock.maize.standard
      outputfile: filename=Gaillac_2012.out; title=Gaillac_2012
        variables My Variables
          variables: DaysAfterSowing, Stage, stagename, LeafNo, TT, yield, Biomass, GrainNo, GrainSize, maxlai, LAI, ESW, SLN, WaterSD, HI, TPLA, Height, vpd, actual_te, sw_uptake(), leaflength(1), leaflength(2), leaflength(3), leaflength(4), leaflength(5), leaflength(6), leaflength(7), leaflength(8), leaflength(9), leaflength(10), leaflength(11), leaflength(12), leaflength(13), leaflength(14), leaflength(15), leaflength(16), leafwidth(1), leafwidth(2), leafwidth(3), leafwidth(4), leafwidth(5), leafwidth(6), leafwidth(7), leafwidth(8), leafwidth(9), leafwidth(10), leafwidth(11), leafwidth(12), leafwidth(13), leafwidth(14), leafwidth(15), leafwidth(16), nInitLeaves, nLeafTips, nLeafExp, nLeafFullyExp, nLigules, LER, dlt_dm_green, dltDmGreen, RADi, TLeaf, radn_int, transp_eff, MeanTnight, relGrainLossTnight, PotGrainNo, GrainLossTnight
  simulation Gaillac_2013_WD
    clock
      start_date = 21/05/2013  # Enter the start date of the simulation
      end_date = 18/09/2013  # Enter the end date of the simulation
    summaryfile
    metfile met: filename=D:\SAP-LEPSE\APSIM\1. Met\Gaillac_2013_Santi.met
    area paddock
      Soil Deep_soil_MH: Latitude=0; Longitude=0
        Water: same as Gaillac_2012_WD.paddock.Deep_soil_MH.Water
        SoilWater: same as Martonvasar_2013_WD.paddock.Martonvasar.SoilWater
        SoilOrganicMatter: RootCN=45; RootWt=1000; SoilCN=14.5; EnrACoeff=7.4; EnrBCoeff=0.2; OCUnits=Total
          Thickness  OC    FBiom  FInert
          50         1.3   0.03   0.3
          100        0.65  0.01   0.4
          150        0.32  0      0.5
          300        0.11  0      0.7
          400        0.11  0      0.9
          1000       0.11  0      1
        Analysis: Thickness=[50, 100, 150, 300, 400, 1000]; PH=[8, 8, 8, 8, 8, 8]; PHUnits=Water; BoronUnits=HotWater
        InitialWater Initial water: FractionFull=1; PercentMethod=EvenlyDistributed; RelativeTo=ll15
        Sample Initial nitrogen: Date=14/05/2011; NO3Units=kgha; NH4Units=kgha; SWUnits=Volumetric; OCUnits=Total; PHUnits=Water
          Thickness  NO3  NH4
          50         46   4
          100        46   1.89
          150        36   1.43
          300        20   1.144
          400        18   1.152
          1000       16   0.432
      fertiliser
      manager Calculator
        on init:
```
TT = 0
```
        on end_of_day:
```
TT = TT + DeltaTT
```
      folder Manager folder
        manager Sow on a fixed date
          #
          date = 21/05/2013  # Enter sowing date (dd-mmm)
          #
          crop = maize  # Enter name of crop to sow
          density = 8.75  # Enter sowing density (plants/m2)
          depth = 30  # Enter sowing depth (mm)
          cultivar = B73  # Enter cultivar
          class = plant  # Enter crop growth class
          row_spacing = 800  # Enter row spacing (mm)
          on start_of_day:
          script: same as in Martonvasar_2013_WD.paddock.Manager folder.Sow on a fixed date
        manager Fertilise N at sowing: same as Martonvasar_2013_WD.paddock.Manager folder.Fertilise N at sowing
        manager Harvesting rule
        irrigation
          automatic_irrigation = on
          asw_depth = 220  # Depth to which ASW is calculated. (mm)
          crit_fr_asw = 1  # Fraction of ASW below which irrigation is applied (0-1.0)
          irrigation_efficiency = 1  # Efficiency of the irrigation. (0-1.0)
          irrigation_allocation = off  # Allocation limits
          allocation = 0  # Allocation in mm
          default_no3_conc = 0.0  # Nitrate concentration (ppm N)
          default_nh4_conc = 0.0  # Ammonium concentration (ppm N)
          default_cl_conc = 0.0  # Chloride concentration (ppm Cl)
        manager End crop on a fixed date
          # Harvesting criteria
          crop = maize  # Enter name of crop to harvest when ripe
          date = 18-sep  # Enter ending date (dd-mmm)
          on end_of_day:
          script: same as in Martonvasar_2013_WD.paddock.Manager folder.End crop on a fixed date
        manager2 Irrigate on date
          # Irrigation will be applied on the date(s) below
          sameDays = yes  # Apply Irrigation on the same day(s) each year? (yes/no) - if "no" then must include the year of application below
          irrigDatesStr = 09-aug 20-aug 30-aug 10-sep  # Dates for one or more Irrigation applications (dd-mmm or dd-mmm-yyyy) as a list with a space between dates
          # Irrigation parameters
          amount = 20  # Amount of irrigation to apply (mm)
          eff = 1.0  # Irrigation efficiency (0-1)
          script: same as in Martonvasar_2013_WD.paddock.Manager folder.Irrigate on dateVeg
      surfaceom surface organic matter
        PoolName = maize  # Organic Matter pool name
        type = maize  # Organic Matter type
        mass = 0  # Initial surface residue (kg/ha)
        cnr = 80  # C:N ratio of initial residue
        standing_fraction = 0  # Fraction of residue standing
      maize -> /Simulations/Graneros_2013/paddock/maize
      outputfile: filename=Gaillac_2013_WD.out; title=Gaillac_2013_WD
        variables My Variables
          variables: dd_mm_yyyy, DaysAfterSowing, Stage, stagename, LeafNo, TT, yield, Biomass, GrainNo, GrainSize, maxlai, LAI, ESW, SLN, WaterSD, HI, TPLA, Height, vpd, actual_te, sw_uptake(), leaflength(1), leaflength(2), leaflength(3), leaflength(4), leaflength(5), leaflength(6), leaflength(7), leaflength(8), leaflength(9), leaflength(10), leaflength(11), leaflength(12), leaflength(13), leaflength(14), leaflength(15), leaflength(16), leafwidth(1), leafwidth(2), leafwidth(3), leafwidth(4), leafwidth(5), leafwidth(6), leafwidth(7), leafwidth(8), leafwidth(9), leafwidth(10), leafwidth(11), leafwidth(12), leafwidth(13), leafwidth(14), leafwidth(15), leafwidth(16), nInitLeaves, nLeafTips, nLeafExp, nLeafFullyExp, nLigules, LER, dlt_dm_green, dltDmGreen, RADi, TLeaf, radn_int, GrainLossTnight, MeanTnight, transp_eff
  simulation Gaillac_2013 -> /Simulations/Nerac_2012
    clock
      start_date = 13/05/2013  # Enter the start date of the simulation
      end_date = 25/10/2013  # Enter the end date of the simulation
    metfile met: filename=%apsim%\Model\Met\Gaillac_2013.met
    area paddock -> /Simulations/Nerac_2012/paddock
      Soil Deep_soil_MH -> /Simulations/Nerac_2012/paddock/Deep_soil_MH
        Water: same as Gaillac_2012_WD.paddock.Deep_soil_MH.Water
        SoilWater: same as Martonvasar_2013_WD.paddock.Martonvasar.SoilWater
        SoilOrganicMatter: RootCN=45; RootWt=1000; SoilCN=14.5; EnrACoeff=7.4; EnrBCoeff=0.2; OCUnits=Total
          Thickness  OC    FBiom  FInert
          50         1.3   0.03   0.3
          100        0.65  0.01   0.4
          150        0.32  0      0.5
          300        0.11  0      0.7
          400        0.11  0      0.9
          1000       0.11  0      1
        Analysis: Thickness=[50, 100, 150, 300, 400, 1000]; PH=[8, 8, 8, 8, 8, 8]; PHUnits=Water; BoronUnits=HotWater
        InitialWater Initial water: FractionFull=1; PercentMethod=EvenlyDistributed; RelativeTo=ll15
        Sample Initial nitrogen: Date=14/05/2011; NO3Units=kgha; NH4Units=kgha; SWUnits=Volumetric; OCUnits=Total; PHUnits=Water
          Thickness  NO3  NH4
          50         46   4
          100        46   1.89
          150        36   1.43
          300        20   1.144
          400        18   1.152
          1000       16   0.432
      folder Manager folder -> /Simulations/Nerac_2012/paddock/Manager folder
        manager Sow on a fixed date
          #
          date = 13/05/2013  # Enter sowing date (dd-mmm)
          #
          crop = maize  # Enter name of crop to sow
          density = 8.75  # Enter sowing density (plants/m2)
          depth = 30  # Enter sowing depth (mm)
          cultivar = B73  # Enter cultivar
          class = plant  # Enter crop growth class
          row_spacing = 800  # Enter row spacing (mm)
          on start_of_day:
          script: same as in Martonvasar_2013_WD.paddock.Manager folder.Sow on a fixed date
        manager Fertilise N at sowing: same as Martonvasar_2013_WD.paddock.Manager folder.Fertilise N at sowing
        irrigation
          automatic_irrigation = on
          asw_depth = 360  # Depth to which ASW is calculated. (mm)
          crit_fr_asw = 1  # Fraction of ASW below which irrigation is applied (0-1.0)
          irrigation_efficiency = 1  # Efficiency of the irrigation. (0-1.0)
          irrigation_allocation = off  # Allocation limits
          allocation = 0  # Allocation in mm
          default_no3_conc = 0.0  # Nitrate concentration (ppm N)
          default_nh4_conc = 0.0  # Ammonium concentration (ppm N)
          default_cl_conc = 0.0  # Chloride concentration (ppm Cl)
        manager End crop on a fixed date
          # Harvesting criteria
          crop = maize  # Enter name of crop to harvest when ripe
          date = 25-oct  # Enter ending date (dd-mmm)
          on end_of_day:
          script: same as in Martonvasar_2013_WD.paddock.Manager folder.End crop on a fixed date
        manager2 Irrigate on date
          # Irrigation will be applied on the date(s) below
          sameDays = yes  # Apply Irrigation on the same day(s) each year? (yes/no) - if "no" then must include the year of application below
          irrigDatesStr = 09-aug 15-aug  # Dates for one or more Irrigation applications (dd-mmm or dd-mmm-yyyy) as a list with a space between dates
          # Irrigation parameters
          amount = 25  # Amount of irrigation to apply (mm)
          eff = 1.0  # Irrigation efficiency (0-1)
          script: same as in Martonvasar_2013_WD.paddock.Manager folder.Irrigate on dateVeg
      maize -> /Simulations/Nerac_2012/paddock/maize
        maizeConstants standard: same as Martonvasar_2013.paddock.maize.standard
      outputfile: filename=Gaillac_2013.out; title=Gaillac_2013
        variables My Variables: same as Gaillac_2012.paddock.outputfile.My Variables
  simulation Nerac_2012_WD
    clock
      start_date = 30/05/2012  # Enter the start date of the simulation
      end_date = 30/09/2012  # Enter the end date of the simulation
    summaryfile
    metfile met: filename=D:\SAP-LEPSE\APSIM\1. Met\Estillac_2012.met
    area paddock
      Soil Deep_soil_MH: Latitude=0; Longitude=0
        Water
          Thickness  BD    AirDry  LL15   DUL    SAT    KS
          50         1.37  0.129   0.133  0.261  0.399  184
          100        1.39  0.141   0.145  0.273  0.403  145
          150        1.42  0.156   0.16   0.289  0.409  145
          300        1.47  0.17    0.174  0.303  0.415  146
          400        1.53  0.169   0.173  0.302  0.414  110
          1000       1.58  0.159   0.163  0.289  0.408  108
          SoilCrop maize: LL=[0.133, 0.155, 0.185, 0.21, 0.24, 0.27]; KL=[0.08, 0.08, 0.08, 0.08, 0.07, 0.06]; XF=[1, 1, 1, 1, 1, 1]
        SoilWater: same as Martonvasar_2013_WD.paddock.Martonvasar.SoilWater
        SoilOrganicMatter: RootCN=45; RootWt=1000; SoilCN=14.5; EnrACoeff=7.4; EnrBCoeff=0.2; OCUnits=Total
          Thickness  OC    FBiom  FInert
          50         1.3   0.03   0.3
          100        0.65  0.01   0.4
          150        0.32  0      0.5
          300        0.11  0      0.7
          400        0.11  0      0.9
          1000       0.11  0      1
        Analysis: Thickness=[50, 100, 150, 300, 400, 1000]; PH=[8, 8, 8, 8, 8, 8]; PHUnits=Water; BoronUnits=HotWater
        InitialWater Initial water: FractionFull=1; PercentMethod=EvenlyDistributed; RelativeTo=ll15
        Sample Initial nitrogen: Date=14/05/2011; NO3Units=kgha; NH4Units=kgha; SWUnits=Volumetric; OCUnits=Total; PHUnits=Water
          Thickness  NO3  NH4
          50         46   4
          100        46   1.89
          150        36   1.43
          300        20   1.144
          400        18   1.152
          1000       16   0.432
      fertiliser
      manager Calculator
        on init:
```
TT = 0
```
        on end_of_day:
```
TT = TT + DeltaTT
```
      folder Manager folder
        manager Sow on a fixed date
          #
          date = 30/05/2012  # Enter sowing date (dd-mmm)
          #
          crop = maize  # Enter name of crop to sow
          density = 7.2  # Enter sowing density (plants/m2)
          depth = 30  # Enter sowing depth (mm)
          cultivar = B73  # Enter cultivar
          class = plant  # Enter crop growth class
          row_spacing = 800  # Enter row spacing (mm)
          on start_of_day:
          script: same as in Martonvasar_2013_WD.paddock.Manager folder.Sow on a fixed date
        manager Fertilise N at sowing
          # When should fertiliser be applied
          modulename = maize  # On which module should the event come from
          eventname = sowing  # On which event should fertiliser be applied
          # Fertiliser application details
          fertmodule = Fertiliser  # Module used to apply the fertiliser
          fert_amount_sow = 150  # Amount of starter fertiliser at sowing (kg/ha)
          fert_type_sow = NO3_N  # Sowing fertiliser type
          on [modulename].[eventname]:
          script: same as in Martonvasar_2013_WD.paddock.Manager folder.Fertilise N at sowing
        manager Harvesting rule
        irrigation: same as Martonvasar_2013_WD.paddock.Manager folder.Irrigation
        manager End crop on a fixed date
          # Harvesting criteria
          crop = maize  # Enter name of crop to harvest when ripe
          date = 30/09/2012  # Enter ending date (dd-mmm)
          on end_of_day:
          script: same as in Martonvasar_2013_WD.paddock.Manager folder.End crop on a fixed date
        manager2 Irrigate on date
          # Irrigation will be applied on the date(s) below
          sameDays = yes  # Apply Irrigation on the same day(s) each year? (yes/no) - if "no" then must include the year of application below
          irrigDatesStr = 05-jun 17-jun  # Dates for one or more Irrigation applications (dd-mmm or dd-mmm-yyyy) as a list with a space between dates
          # Irrigation parameters
          amount = 0  # Amount of irrigation to apply (mm)
          eff = 1.0  # Irrigation efficiency (0-1)
          script: same as in Martonvasar_2013_WD.paddock.Manager folder.Irrigate on dateVeg
        manager2 Irrigate on datePC
          # Irrigation will be applied on the date(s) below
          sameDays = yes  # Apply Irrigation on the same day(s) each year? (yes/no) - if "no" then must include the year of application below
          irrigDatesStr = 24-jul  # Dates for one or more Irrigation applications (dd-mmm or dd-mmm-yyyy) as a list with a space between dates
          # Irrigation parameters
          amount = 25  # Amount of irrigation to apply (mm)
          eff = 1.0  # Irrigation efficiency (0-1)
          script: same as in Martonvasar_2013_WD.paddock.Manager folder.Irrigate on dateVeg
        manager2 Irrigate on datePC1
          # Irrigation will be applied on the date(s) below
          sameDays = yes  # Apply Irrigation on the same day(s) each year? (yes/no) - if "no" then must include the year of application below
          irrigDatesStr = 05-aug 10-aug  # Dates for one or more Irrigation applications (dd-mmm or dd-mmm-yyyy) as a list with a space between dates
          # Irrigation parameters
          amount = 25  # Amount of irrigation to apply (mm)
          eff = 1.0  # Irrigation efficiency (0-1)
          script: same as in Martonvasar_2013_WD.paddock.Manager folder.Irrigate on dateVeg
        manager2 Irrigate on dateLLG
          # Irrigation will be applied on the date(s) below
          sameDays = yes  # Apply Irrigation on the same day(s) each year? (yes/no) - if "no" then must include the year of application below
          irrigDatesStr = 18-aug 25-aug 7-sep  # Dates for one or more Irrigation applications (dd-mmm or dd-mmm-yyyy) as a list with a space between dates
          # Irrigation parameters
          amount = 25  # Amount of irrigation to apply (mm)
          eff = 1.0  # Irrigation efficiency (0-1)
          script: same as in Martonvasar_2013_WD.paddock.Manager folder.Irrigate on dateVeg
      surfaceom surface organic matter
        PoolName = maize  # Organic Matter pool name
        type = maize  # Organic Matter type
        mass = 0  # Initial surface residue (kg/ha)
        cnr = 80  # C:N ratio of initial residue
        standing_fraction = 0  # Fraction of residue standing
      maize -> /Simulations/Graneros_2013/paddock/maize
      outputfile: filename=Nerac_2012_WD.out; title=Nerac_2012_WD
        variables My Variables: same as Martonvasar_2013_WD.paddock.outputfile.My Variables
  simulation Nerac_2012
    clock
      start_date = 28/05/2012  # Enter the start date of the simulation
      end_date = 09/10/2012  # Enter the end date of the simulation
    summaryfile
    metfile met: filename=%apsim%\Model\Met\Estillac_2012.met
    area paddock
      Soil Deep_soil_MH: same as Nerac_2012_WD.paddock.Deep_soil_MH
      fertiliser
      manager Calculator
        on init:
```
TT = 0
```
        on end_of_day:
```
TT = TT + DeltaTT
```
      folder Manager folder
        manager Sow on a fixed date
          #
          date = 28/5/2012  # Enter sowing date (dd-mmm)
          #
          crop = maize  # Enter name of crop to sow
          density = 7  # Enter sowing density (plants/m2)
          depth = 30  # Enter sowing depth (mm)
          cultivar = B73  # Enter cultivar
          class = plant  # Enter crop growth class
          row_spacing = 800  # Enter row spacing (mm)
          on start_of_day:
          script: same as in Martonvasar_2013_WD.paddock.Manager folder.Sow on a fixed date
        manager Fertilise N at sowing
          # When should fertiliser be applied
          modulename = maize  # On which module should the event come from
          eventname = sowing  # On which event should fertiliser be applied
          # Fertiliser application details
          fertmodule = Fertiliser  # Module used to apply the fertiliser
          fert_amount_sow = 100  # Amount of starter fertiliser at sowing (kg/ha)
          fert_type_sow = NO3_N  # Sowing fertiliser type
          on [modulename].[eventname]:
          script: same as in Martonvasar_2013_WD.paddock.Manager folder.Fertilise N at sowing
        manager Harvesting rule (disabled)
          # Harvesting criteria
          crop = maize  # Enter name of crop to harvest when ripe
          on end_of_day:
```
if (paddock_is_fallow() = 0) then
   outputfile do_output
endif

           if ([crop].StageName = 'harvest_ripe' or [crop].plant_status = 'dead') then
              [crop]  harvest
              [crop]  end_crop
           endif
```
        irrigation
          automatic_irrigation = on
          asw_depth = 900  # Depth to which ASW is calculated. (mm)
          crit_fr_asw = 1  # Fraction of ASW below which irrigation is applied (0-1.0)
          irrigation_efficiency = 1  # Efficiency of the irrigation. (0-1.0)
          irrigation_allocation = off  # Allocation limits
          allocation = 280  # Allocation in mm
          default_no3_conc = 0.0  # Nitrate concentration (ppm N)
          default_nh4_conc = 0.0  # Ammonium concentration (ppm N)
          default_cl_conc = 0.0  # Chloride concentration (ppm Cl)
        manager End crop on a fixed date
          # Harvesting criteria
          crop = maize  # Enter name of crop to harvest when ripe
          date = 09-Oct  # Enter ending date (dd-mmm)
          on end_of_day:
          script: same as in Martonvasar_2013_WD.paddock.Manager folder.End crop on a fixed date
        manager2 Irrigate on date
          # Irrigation will be applied on the date(s) below
          sameDays = yes  # Apply Irrigation on the same day(s) each year? (yes/no) - if "no" then must include the year of application below
          irrigDatesStr = 14-aug 27-aug 05-sep 15-sep  # Dates for one or more Irrigation applications (dd-mmm or dd-mmm-yyyy) as a list with a space between dates
          # Irrigation parameters
          amount = 30  # Amount of irrigation to apply (mm)
          eff = 1.0  # Irrigation efficiency (0-1)
          script: same as in Martonvasar_2013_WD.paddock.Manager folder.Irrigate on dateVeg
      surfaceom surface organic matter
        PoolName = maize  # Organic Matter pool name
        type = maize  # Organic Matter type
        mass = 0  # Initial surface residue (kg/ha)
        cnr = 80  # C:N ratio of initial residue
        standing_fraction = 0  # Fraction of residue standing
      maize
        maizeConstants standard: same as Gaillac_2012_WD.paddock.maize.standard
        maizeGenotype B73
          LER = LER
          LeafDevelopment = ------------------
          UseLER = 1
          leaf_no_init_at_emerg = 6.59
          LIR = 0.068
          UseProfileFTSW = 1
          a = 4.005523
          b = -0.6886855
          c = 4.241233
          T0 = 10
          TLeaf_function = Tapex
          Width = ------------------
          UseLeafWidthFn = 1
          LargestLeafSize = 100
          RelRank = 4
          SmallLeafSize = 15
          SLNparam = 0.125
          LeafWidth = 15.5 15.1 17.8 29.2 38.6 44.6 50.4 69.9 81 90 100 105 102 97 91.9 69
          SensiRAD = 0.75
          Width_Class = RAD
          Environment = ------------------
          TAir = 1.5 4.0 1.0
          TSoil = 0.5 1.81 0.48
          LeafTempSD = 0.0 0.25 0.5 0.75 1.0 1.2
          LeafTempDiff = 5.4 3.5 2.5 2.1 0 -0.4
          GrainNumber = ****************
          PGRt0 = 130
          PGRt1 = 260
          GNmax = 634.2524
          PGRbase = 1.2
          GNk = 0.83
          potKernelWt = 364.4229
          GNmaxCoef = 210
          Phenology = ****************
          photoperiod_crit1 = 12.5
          photoperiod_crit2 = 24.0
          photoperiod_slope = 0.0
          tt_flower_to_maturity = 820
          tt_flag_to_flower = 10
          tt_flower_to_start_grain = 170
          tt_maturity_to_ripe = 1
          tt_emerg_to_endjuv = 100
          tt_endjuv_to_init = 258
          New_Phyllochron = *******************
          Nfinal = 16
          Leaf_tip_emerg = 2.318154
          Phyllochron = 0.02127428
          tt_firstligule_sinceapp = 51.57795
          use_Observed_EoE = 0
          ttLeafEofE = 178 230 280 331 382 418 478 520 580 615 655 665 676 708 741 750
          First_LiguloChrone = 0.01383376
          Lagmax = 6
          leafElongationRankCoef = *********************************
          LER_Class = Classic
          UseLERCoef = 1
          MaxLER = 0.4
          New_LERmax = ****************
          Sigma = 0.35
          Alpha = 0.59
          Amax = 0.94
          arank = 11.5
          brank = 5.5
          SENESCENCE = ********************
          Ntip_at_sen = 5
          k_phyllo_to_sen = 0.29
          PGR_Class = ******************************
          aPGR = 0.14
          bPGR = 0.69
          TnightBP = 16.49
          respTnight = 0.0651
      outputfile: filename=Nerac_2012.out; title=Nerac_2012
        variables My Variables: same as Martonvasar_2013_WD.paddock.outputfile.My Variables
  simulation Nerac_2013_WD
    clock
      start_date = 15/05/2013  # Enter the start date of the simulation
      end_date = 12/10/2013  # Enter the end date of the simulation
    summaryfile
    metfile met: filename=D:\SAP-LEPSE\APSIM\1. Met\Nerac_2013.met
    area paddock
      Soil Deep_soil_MH: same as Nerac_2012_WD.paddock.Deep_soil_MH
      fertiliser
      manager Calculator
        on init:
```
TT = 0
```
        on end_of_day:
```
TT = TT + DeltaTT
```
      folder Manager folder
        manager Sow on a fixed date
          #
          date = 15/05/2013  # Enter sowing date (dd-mmm)
          #
          crop = maize  # Enter name of crop to sow
          density = 7  # Enter sowing density (plants/m2)
          depth = 30  # Enter sowing depth (mm)
          cultivar = B73  # Enter cultivar
          class = plant  # Enter crop growth class
          row_spacing = 800  # Enter row spacing (mm)
          on start_of_day:
          script: same as in Martonvasar_2013_WD.paddock.Manager folder.Sow on a fixed date
        manager Fertilise N at sowing: same as Martonvasar_2013_WD.paddock.Manager folder.Fertilise N at sowing
        manager Harvesting rule
        irrigation
          automatic_irrigation = off
          asw_depth = 15  # Depth to which ASW is calculated. (mm)
          crit_fr_asw = 1  # Fraction of ASW below which irrigation is applied (0-1.0)
          irrigation_efficiency = 1  # Efficiency of the irrigation. (0-1.0)
          irrigation_allocation = off  # Allocation limits
          allocation = 0  # Allocation in mm
          default_no3_conc = 0.0  # Nitrate concentration (ppm N)
          default_nh4_conc = 0.0  # Ammonium concentration (ppm N)
          default_cl_conc = 0.0  # Chloride concentration (ppm Cl)
        manager End crop on a fixed date
          # Harvesting criteria
          crop = maize  # Enter name of crop to harvest when ripe
          date = 11-oct  # Enter ending date (dd-mmm)
          on end_of_day:
          script: same as in Martonvasar_2013_WD.paddock.Manager folder.End crop on a fixed date
        manager2 Irrigate on date
          # Irrigation will be applied on the date(s) below
          sameDays = yes  # Apply Irrigation on the same day(s) each year? (yes/no) - if "no" then must include the year of application below
          irrigDatesStr = 20-jun 26-jun  # Dates for one or more Irrigation applications (dd-mmm or dd-mmm-yyyy) as a list with a space between dates
          # Irrigation parameters
          amount = 20  # Amount of irrigation to apply (mm)
          eff = 1.0  # Irrigation efficiency (0-1)
          script: same as in Martonvasar_2013_WD.paddock.Manager folder.Irrigate on dateVeg
        manager2 Irrigate on datePC
          # Irrigation will be applied on the date(s) below
          sameDays = yes  # Apply Irrigation on the same day(s) each year? (yes/no) - if "no" then must include the year of application below
          irrigDatesStr = 10-jul 20-jul  # Dates for one or more Irrigation applications (dd-mmm or dd-mmm-yyyy) as a list with a space between dates
          # Irrigation parameters
          amount = 30  # Amount of irrigation to apply (mm)
          eff = 1.0  # Irrigation efficiency (0-1)
          script: same as in Martonvasar_2013_WD.paddock.Manager folder.Irrigate on dateVeg
        manager2 Irrigate on datePC1
          # Irrigation will be applied on the date(s) below
          sameDays = yes  # Apply Irrigation on the same day(s) each year? (yes/no) - if "no" then must include the year of application below
          irrigDatesStr = 01-aug 10-aug  # Dates for one or more Irrigation applications (dd-mmm or dd-mmm-yyyy) as a list with a space between dates
          # Irrigation parameters
          amount = 13  # Amount of irrigation to apply (mm)
          eff = 1.0  # Irrigation efficiency (0-1)
          script: same as in Martonvasar_2013_WD.paddock.Manager folder.Irrigate on dateVeg
        manager2 Irrigate on dateLLG
          # Irrigation will be applied on the date(s) below
          sameDays = yes  # Apply Irrigation on the same day(s) each year? (yes/no) - if "no" then must include the year of application below
          irrigDatesStr = 18-aug 25-aug 7-sep  # Dates for one or more Irrigation applications (dd-mmm or dd-mmm-yyyy) as a list with a space between dates
          # Irrigation parameters
          amount = 15  # Amount of irrigation to apply (mm)
          eff = 1.0  # Irrigation efficiency (0-1)
          script: same as in Martonvasar_2013_WD.paddock.Manager folder.Irrigate on dateVeg
      surfaceom surface organic matter
        PoolName = maize  # Organic Matter pool name
        type = maize  # Organic Matter type
        mass = 0  # Initial surface residue (kg/ha)
        cnr = 80  # C:N ratio of initial residue
        standing_fraction = 0  # Fraction of residue standing
      maize -> /Simulations/Graneros_2013/paddock/maize
      outputfile: filename=Nerac_2013_WD.out; title=Nerac_2013_WD
        variables My Variables
          variables: DaysAfterSowing, dd_mm_yyyy, Stage, stagename, LeafNo, TT, yield, Biomass, GrainNo, GrainSize, maxlai, LAI, ESW, SLN, WaterSD, HI, TPLA, Height, vpd, actual_te, sw_uptake(), leaflength(1), leaflength(2), leaflength(3), leaflength(4), leaflength(5), leaflength(6), leaflength(7), leaflength(8), leaflength(9), leaflength(10), leaflength(11), leaflength(12), leaflength(13), leaflength(14), leaflength(15), leaflength(16), leafwidth(1), leafwidth(2), leafwidth(3), leafwidth(4), leafwidth(5), leafwidth(6), leafwidth(7), leafwidth(8), leafwidth(9), leafwidth(10), leafwidth(11), leafwidth(12), leafwidth(13), leafwidth(14), leafwidth(15), leafwidth(16), nInitLeaves, nLeafTips, nLeafExp, nLeafFullyExp, nLigules, LER, dlt_dm_green, dltDmGreen, RADi, TLeaf, radn_int, GrainLossTnight, MeanTnight, transp_eff
  simulation Nerac_2013 -> /Simulations/Nerac_2012
    clock
      start_date = 15/05/2013  # Enter the start date of the simulation
      end_date = 12/10/2013  # Enter the end date of the simulation
    metfile met: filename=%apsim%\Model\Met\Nerac_2013.met
    area paddock -> /Simulations/Nerac_2012/paddock
      Soil Deep_soil_MH -> /Simulations/Nerac_2012/paddock/Deep_soil_MH
        Water: same as Nerac_2012_WD.paddock.Deep_soil_MH.Water
        SoilWater: same as Martonvasar_2013_WD.paddock.Martonvasar.SoilWater
        SoilOrganicMatter: RootCN=45; RootWt=1000; SoilCN=14.5; EnrACoeff=7.4; EnrBCoeff=0.2; OCUnits=Total
          Thickness  OC    FBiom  FInert
          50         1.3   0.03   0.3
          100        0.65  0.01   0.4
          150        0.32  0      0.5
          300        0.11  0      0.7
          400        0.11  0      0.9
          1000       0.11  0      1
        Analysis: Thickness=[50, 100, 150, 300, 400, 1000]; PH=[8, 8, 8, 8, 8, 8]; PHUnits=Water; BoronUnits=HotWater
        InitialWater Initial water: FractionFull=1; PercentMethod=EvenlyDistributed; RelativeTo=ll15
        Sample Initial nitrogen: Date=14/05/2011; NO3Units=kgha; NH4Units=kgha; SWUnits=Volumetric; OCUnits=Total; PHUnits=Water
          Thickness  NO3  NH4
          50         46   4
          100        46   1.89
          150        36   1.43
          300        20   1.144
          400        18   1.152
          1000       16   0.432
      folder Manager folder -> /Simulations/Nerac_2012/paddock/Manager folder
        manager Sow on a fixed date
          #
          date = 15/05/2013  # Enter sowing date (dd-mmm)
          #
          crop = maize  # Enter name of crop to sow
          density = 8  # Enter sowing density (plants/m2)
          depth = 30  # Enter sowing depth (mm)
          cultivar = B73  # Enter cultivar
          class = plant  # Enter crop growth class
          row_spacing = 800  # Enter row spacing (mm)
          on start_of_day:
          script: same as in Martonvasar_2013_WD.paddock.Manager folder.Sow on a fixed date
        irrigation
          automatic_irrigation = on
          asw_depth = 600  # Depth to which ASW is calculated. (mm)
          crit_fr_asw = 1  # Fraction of ASW below which irrigation is applied (0-1.0)
          irrigation_efficiency = 1  # Efficiency of the irrigation. (0-1.0)
          irrigation_allocation = off  # Allocation limits
          allocation = 290  # Allocation in mm
          default_no3_conc = 0.0  # Nitrate concentration (ppm N)
          default_nh4_conc = 0.0  # Ammonium concentration (ppm N)
          default_cl_conc = 0.0  # Chloride concentration (ppm Cl)
        manager End crop on a fixed date
          # Harvesting criteria
          crop = maize  # Enter name of crop to harvest when ripe
          date = 11-Oct  # Enter ending date (dd-mmm)
          on end_of_day:
          script: same as in Martonvasar_2013_WD.paddock.Manager folder.End crop on a fixed date
      maize -> /Simulations/Nerac_2012/paddock/maize
        maizeConstants standard: same as Martonvasar_2013.paddock.maize.standard
      outputfile: filename=Nerac_2013.out; title=Nerac_2013
        variables My Variables: same as Gaillac_2012.paddock.outputfile.My Variables
  simulation Caracal_2012_WD
    clock
      start_date = 21/05/2012  # Enter the start date of the simulation
      end_date = 18/09/2012  # Enter the end date of the simulation
    summaryfile
    metfile met: filename=D:\SAP-LEPSE\APSIM\1. Met\Caracal_2012.met
    area paddock
      Soil Deep_soil_MH: Latitude=0; Longitude=0
        Water
          Thickness  BD    AirDry  LL15   DUL    SAT    KS
          50         1.48  0.137   0.147  0.295  0.411  184
          100        1.5   0.148   0.158  0.306  0.416  145
          150        1.53  0.163   0.173  0.32   0.424  145
          300        1.58  0.177   0.187  0.333  0.431  146
          400        1.64  0.177   0.187  0.332  0.43   110
          1000       1.69  0.167   0.177  0.321  0.424  108
          SoilCrop maize: LL=[0.147, 0.165, 0.185, 0.215, 0.245, 0.275]; KL=[0.08, 0.08, 0.08, 0.08, 0.07, 0.06]; XF=[1, 1, 1, 1, 1, 1]
        SoilWater: same as Martonvasar_2013_WD.paddock.Martonvasar.SoilWater
        SoilOrganicMatter: RootCN=45; RootWt=1000; SoilCN=14.5; EnrACoeff=7.4; EnrBCoeff=0.2; OCUnits=Total
          Thickness  OC    FBiom  FInert
          50         1.3   0.03   0.3
          100        0.65  0.01   0.4
          150        0.32  0      0.5
          300        0.11  0      0.7
          400        0.11  0      0.9
          1000       0.11  0      1
        Analysis: Thickness=[50, 100, 150, 300, 400, 1000]; PH=[8, 8, 8, 8, 8, 8]; PHUnits=Water; BoronUnits=HotWater
        InitialWater Initial water: FractionFull=1; PercentMethod=EvenlyDistributed; RelativeTo=ll15
        Sample Initial nitrogen: Date=14/05/2011; NO3Units=kgha; NH4Units=kgha; SWUnits=Volumetric; OCUnits=Total; PHUnits=Water
          Thickness  NO3  NH4
          50         46   4
          100        46   1.89
          150        36   1.43
          300        20   1.144
          400        18   1.152
          1000       16   0.432
      fertiliser
      manager Calculator
        on init:
```
TT = 0
```
        on end_of_day:
```
TT = TT + DeltaTT
```
      folder Manager folder
        manager Sow on a fixed date
          #
          date = 21/05/2012  # Enter sowing date (dd-mmm)
          #
          crop = maize  # Enter name of crop to sow
          density = 5.3  # Enter sowing density (plants/m2)
          depth = 30  # Enter sowing depth (mm)
          cultivar = B73  # Enter cultivar
          class = plant  # Enter crop growth class
          row_spacing = 800  # Enter row spacing (mm)
          on start_of_day:
          script: same as in Martonvasar_2013_WD.paddock.Manager folder.Sow on a fixed date
        manager Fertilise N at sowing: same as Martonvasar_2013_WD.paddock.Manager folder.Fertilise N at sowing
        manager Harvesting rule
        irrigation
          automatic_irrigation = off
          asw_depth = 70  # Depth to which ASW is calculated. (mm)
          crit_fr_asw = 1  # Fraction of ASW below which irrigation is applied (0-1.0)
          irrigation_efficiency = 1  # Efficiency of the irrigation. (0-1.0)
          irrigation_allocation = off  # Allocation limits
          allocation = 0  # Allocation in mm
          default_no3_conc = 0.0  # Nitrate concentration (ppm N)
          default_nh4_conc = 0.0  # Ammonium concentration (ppm N)
          default_cl_conc = 0.0  # Chloride concentration (ppm Cl)
        manager End crop on a fixed date
          # Harvesting criteria
          crop = maize  # Enter name of crop to harvest when ripe
          date = 18/09/2012  # Enter ending date (dd-mmm)
          on end_of_day:
          script: same as in Martonvasar_2013_WD.paddock.Manager folder.End crop on a fixed date
        manager2 Irrigate on date
          # Irrigation will be applied on the date(s) below
          sameDays = yes  # Apply Irrigation on the same day(s) each year? (yes/no) - if "no" then must include the year of application below
          irrigDatesStr = 01-jun 06-jun 14-jun 20-jun 25-jun  # Dates for one or more Irrigation applications (dd-mmm or dd-mmm-yyyy) as a list with a space between dates
          # Irrigation parameters
          amount = 0  # Amount of irrigation to apply (mm)
          eff = 1.0  # Irrigation efficiency (0-1)
          script: same as in Martonvasar_2013_WD.paddock.Manager folder.Irrigate on dateVeg
        manager2 Irrigate on date2
          # Irrigation will be applied on the date(s) below
          sameDays = yes  # Apply Irrigation on the same day(s) each year? (yes/no) - if "no" then must include the year of application below
          irrigDatesStr = 29-jun 07-jul 14-jul  # Dates for one or more Irrigation applications (dd-mmm or dd-mmm-yyyy) as a list with a space between dates
          # Irrigation parameters
          amount = 0  # Amount of irrigation to apply (mm)
          eff = 1.0  # Irrigation efficiency (0-1)
          script: same as in Martonvasar_2013_WD.paddock.Manager folder.Irrigate on dateVeg
        manager2 Irrigate on date1
          # Irrigation will be applied on the date(s) below
          sameDays = yes  # Apply Irrigation on the same day(s) each year? (yes/no) - if "no" then must include the year of application below
          irrigDatesStr = 20-jul 27-jul 03-aug  # Dates for one or more Irrigation applications (dd-mmm or dd-mmm-yyyy) as a list with a space between dates
          # Irrigation parameters
          amount = 0  # Amount of irrigation to apply (mm)
          eff = 1.0  # Irrigation efficiency (0-1)
          script: same as in Martonvasar_2013_WD.paddock.Manager folder.Irrigate on dateVeg
      surfaceom surface organic matter (disabled)
        PoolName = maize  # Organic Matter pool name
        type = maize  # Organic Matter type
        mass = 0  # Initial surface residue (kg/ha)
        cnr = 80  # C:N ratio of initial residue
        standing_fraction = 0  # Fraction of residue standing
      maize -> /Simulations/Graneros_2013/paddock/maize
      outputfile: filename=Caracal_2012_WD.out; title=Caracal_2012_WD
        variables My Variables: same as Nerac_2013_WD.paddock.outputfile.My Variables
  simulation Caracal_2012 -> /Simulations/Nerac_2012
    clock
      start_date = 21/05/2012  # Enter the start date of the simulation
      end_date = 18/09/2012  # Enter the end date of the simulation
    metfile met: filename=%apsim%\Model\Met\Caracal_2012.met
    area paddock -> /Simulations/Nerac_2012/paddock
      Soil Deep_soil_MH -> /Simulations/Nerac_2012/paddock/Deep_soil_MH
        Water: same as Caracal_2012_WD.paddock.Deep_soil_MH.Water
        SoilWater: same as Martonvasar_2013_WD.paddock.Martonvasar.SoilWater
        SoilOrganicMatter: RootCN=45; RootWt=1000; SoilCN=14.5; EnrACoeff=7.4; EnrBCoeff=0.2; OCUnits=Total
          Thickness  OC    FBiom  FInert
          50         1.3   0.03   0.3
          100        0.65  0.01   0.4
          150        0.32  0      0.5
          300        0.11  0      0.7
          400        0.11  0      0.9
          1000       0.11  0      1
        Analysis: Thickness=[50, 100, 150, 300, 400, 1000]; PH=[8, 8, 8, 8, 8, 8]; PHUnits=Water; BoronUnits=HotWater
        InitialWater Initial water: FractionFull=1; PercentMethod=EvenlyDistributed; RelativeTo=ll15
        Sample Initial nitrogen: Date=14/05/2011; NO3Units=kgha; NH4Units=kgha; SWUnits=Volumetric; OCUnits=Total; PHUnits=Water
          Thickness  NO3  NH4
          50         46   4
          100        46   1.89
          150        36   1.43
          300        20   1.144
          400        18   1.152
          1000       16   0.432
      folder Manager folder -> /Simulations/Nerac_2012/paddock/Manager folder
        manager Sow on a fixed date
          #
          date = 21/05/2012  # Enter sowing date (dd-mmm)
          #
          crop = maize  # Enter name of crop to sow
          density = 5.2  # Enter sowing density (plants/m2)
          depth = 30  # Enter sowing depth (mm)
          cultivar = B73  # Enter cultivar
          class = plant  # Enter crop growth class
          row_spacing = 800  # Enter row spacing (mm)
          on start_of_day:
          script: same as in Martonvasar_2013_WD.paddock.Manager folder.Sow on a fixed date
        manager Fertilise N at sowing: same as Martonvasar_2013_WD.paddock.Manager folder.Fertilise N at sowing
        irrigation: same as Martonvasar_2013.paddock.Manager folder.Irrigation
        manager End crop on a fixed date
          # Harvesting criteria
          crop = maize  # Enter name of crop to harvest when ripe
          date = 18/09/2012  # Enter ending date (dd-mmm)
          on end_of_day:
          script: same as in Martonvasar_2013_WD.paddock.Manager folder.End crop on a fixed date
        manager2 Irrigate on date: same as Caracal_2012_WD.paddock.Manager folder.Irrigate on date
        manager2 Irrigate on PC1
          # Irrigation will be applied on the date(s) below
          sameDays = yes  # Apply Irrigation on the same day(s) each year? (yes/no) - if "no" then must include the year of application below
          irrigDatesStr = 28-jun 03-jul 13-jul 20-jul  # Dates for one or more Irrigation applications (dd-mmm or dd-mmm-yyyy) as a list with a space between dates
          # Irrigation parameters
          amount = 0  # Amount of irrigation to apply (mm)
          eff = 1.0  # Irrigation efficiency (0-1)
          script: same as in Martonvasar_2013_WD.paddock.Manager folder.Irrigate on dateVeg
        manager2 Irrigate on PC2
          # Irrigation will be applied on the date(s) below
          sameDays = yes  # Apply Irrigation on the same day(s) each year? (yes/no) - if "no" then must include the year of application below
          irrigDatesStr = 25-jul  # Dates for one or more Irrigation applications (dd-mmm or dd-mmm-yyyy) as a list with a space between dates
          # Irrigation parameters
          amount = 0  # Amount of irrigation to apply (mm)
          eff = 1.0  # Irrigation efficiency (0-1)
          script: same as in Martonvasar_2013_WD.paddock.Manager folder.Irrigate on dateVeg
        manager2 Irrigate on GF
          # Irrigation will be applied on the date(s) below
          sameDays = yes  # Apply Irrigation on the same day(s) each year? (yes/no) - if "no" then must include the year of application below
          irrigDatesStr = 31-jul 06-aug 13-aug  # Dates for one or more Irrigation applications (dd-mmm or dd-mmm-yyyy) as a list with a space between dates
          # Irrigation parameters
          amount = 0  # Amount of irrigation to apply (mm)
          eff = 1.0  # Irrigation efficiency (0-1)
          script: same as in Martonvasar_2013_WD.paddock.Manager folder.Irrigate on dateVeg
      maize -> /Simulations/Nerac_2012/paddock/maize
        maizeConstants standard: same as Martonvasar_2013.paddock.maize.standard
      outputfile: filename=Caracal_2012.out; title=Caracal_2012
        variables My Variables: same as Martonvasar_2013_WD.paddock.outputfile.My Variables
  simulation Karlsruhe_2012_WD
    clock
      start_date = 11/05/2012  # Enter the start date of the simulation
      end_date = 17/10/2012  # Enter the end date of the simulation
    summaryfile
    metfile met: filename=D:\SAP-LEPSE\APSIM\1. Met\Karlruhe_2012.met
    area paddock
      Soil Deep_soil_MH: Latitude=0; Longitude=0
        Water
          Thickness  BD    AirDry  LL15   DUL    SAT    KS
          50         1.32  0.1     0.104  0.224  0.39   184
          100        1.34  0.111   0.115  0.235  0.392  145
          150        1.37  0.125   0.129  0.25   0.396  145
          300        1.42  0.139   0.143  0.264  0.4    146
          400        1.48  0.138   0.142  0.262  0.399  110
          1000       1.53  0.127   0.131  0.249  0.395  108
          SoilCrop maize: LL=[0.104, 0.115, 0.129, 0.143, 0.16, 0.18]; KL=[0.08, 0.08, 0.08, 0.08, 0.07, 0.06]; XF=[1, 1, 1, 1, 1, 1]
        SoilWater: same as Martonvasar_2013_WD.paddock.Martonvasar.SoilWater
        SoilOrganicMatter: RootCN=45; RootWt=1000; SoilCN=14.5; EnrACoeff=7.4; EnrBCoeff=0.2; OCUnits=Total
          Thickness  OC    FBiom  FInert
          50         1.3   0.03   0.3
          100        0.65  0.01   0.4
          150        0.32  0      0.5
          300        0.11  0      0.7
          400        0.11  0      0.9
          1000       0.11  0      1
        Analysis: Thickness=[50, 100, 150, 300, 400, 1000]; PH=[8, 8, 8, 8, 8, 8]; PHUnits=Water; BoronUnits=HotWater
        InitialWater Initial water: FractionFull=0.4; PercentMethod=EvenlyDistributed; RelativeTo=ll15
        Sample Initial nitrogen: Date=14/05/2011; NO3Units=kgha; NH4Units=kgha; SWUnits=Volumetric; OCUnits=Total; PHUnits=Water
          Thickness  NO3  NH4
          50         46   4
          100        46   1.89
          150        36   1.43
          300        20   1.144
          400        18   1.152
          1000       16   0.432
      fertiliser
      manager Calculator
        on init:
```
TT = 0
```
        on end_of_day:
```
TT = TT + DeltaTT
```
      folder Manager folder
        manager Sow on a fixed date
          #
          date = 11/05/2012  # Enter sowing date (dd-mmm)
          #
          crop = maize  # Enter name of crop to sow
          density = 9.3  # Enter sowing density (plants/m2)
          depth = 30  # Enter sowing depth (mm)
          cultivar = B73  # Enter cultivar
          class = plant  # Enter crop growth class
          row_spacing = 800  # Enter row spacing (mm)
          on start_of_day:
          script: same as in Martonvasar_2013_WD.paddock.Manager folder.Sow on a fixed date
        manager Fertilise N at sowing: same as Martonvasar_2013.paddock.Manager folder.Fertilise N at sowing
        manager Harvesting rule
        irrigation
          automatic_irrigation = on
          asw_depth = 1500  # Depth to which ASW is calculated. (mm)
          crit_fr_asw = 1  # Fraction of ASW below which irrigation is applied (0-1.0)
          irrigation_efficiency = 1  # Efficiency of the irrigation. (0-1.0)
          irrigation_allocation = off  # Allocation limits
          allocation = 0  # Allocation in mm
          default_no3_conc = 0.0  # Nitrate concentration (ppm N)
          default_nh4_conc = 0.0  # Ammonium concentration (ppm N)
          default_cl_conc = 0.0  # Chloride concentration (ppm Cl)
        manager End crop on a fixed date
          # Harvesting criteria
          crop = maize  # Enter name of crop to harvest when ripe
          date = 17/10/2012  # Enter ending date (dd-mmm)
          on end_of_day:
          script: same as in Martonvasar_2013_WD.paddock.Manager folder.End crop on a fixed date
        manager2 Irrigate on date
          # Irrigation will be applied on the date(s) below
          sameDays = yes  # Apply Irrigation on the same day(s) each year? (yes/no) - if "no" then must include the year of application below
          irrigDatesStr = 04-jul 12-jul 20-jul 28-jul 05-aug 10-aug  # Dates for one or more Irrigation applications (dd-mmm or dd-mmm-yyyy) as a list with a space between dates
          # Irrigation parameters
          amount = 0  # Amount of irrigation to apply (mm)
          eff = 1.0  # Irrigation efficiency (0-1)
          script: same as in Martonvasar_2013_WD.paddock.Manager folder.Irrigate on dateVeg
        manager2 Irrigate on date1
          # Irrigation will be applied on the date(s) below
          sameDays = yes  # Apply Irrigation on the same day(s) each year? (yes/no) - if "no" then must include the year of application below
          irrigDatesStr = 18-aug20-aug 29-aug 04-sep  # Dates for one or more Irrigation applications (dd-mmm or dd-mmm-yyyy) as a list with a space between dates
          # Irrigation parameters
          amount = 0  # Amount of irrigation to apply (mm)
          eff = 1.0  # Irrigation efficiency (0-1)
          script: same as in Martonvasar_2013_WD.paddock.Manager folder.Irrigate on dateVeg
      surfaceom surface organic matter
        PoolName = maize  # Organic Matter pool name
        type = maize  # Organic Matter type
        mass = 0  # Initial surface residue (kg/ha)
        cnr = 80  # C:N ratio of initial residue
        standing_fraction = 0  # Fraction of residue standing
      maize -> /Simulations/Graneros_2013/paddock/maize
      outputfile: filename=Karlsruhe_2012_WD.out; title=Karlsruhe_2012_WD
        variables My Variables
          variables: DaysAfterSowing, dd_mmm_yyyy, Stage, stagename, LeafNo, TT, yield, Biomass, GrainNo, GrainSize, maxlai, LAI, ESW, SLN, WaterSD, HI, TPLA, Height, vpd, actual_te, sw_uptake(), leaflength(1), leaflength(2), leaflength(3), leaflength(4), leaflength(5), leaflength(6), leaflength(7), leaflength(8), leaflength(9), leaflength(10), leaflength(11), leaflength(12), leaflength(13), leaflength(14), leaflength(15), leaflength(16), leafwidth(1), leafwidth(2), leafwidth(3), leafwidth(4), leafwidth(5), leafwidth(6), leafwidth(7), leafwidth(8), leafwidth(9), leafwidth(10), leafwidth(11), leafwidth(12), leafwidth(13), leafwidth(14), leafwidth(15), leafwidth(16), nInitLeaves, nLeafTips, nLeafExp, nLeafFullyExp, nLigules, LER, dlt_dm_green, dltDmGreen, RADi, TLeaf, radn_int, GrainLossTnight, MeanTnight, transp_eff
  simulation Karlsruhe_2012 -> /Simulations/Nerac_2012
    clock
      start_date = 11/05/2012  # Enter the start date of the simulation
      end_date = 17/10/2012  # Enter the end date of the simulation
    metfile met: filename=%apsim%\Model\Met\Karlruhe_2012.met
    area paddock -> /Simulations/Nerac_2012/paddock
      Soil Deep_soil_MH: Latitude=0; Longitude=0
        Water: same as Karlsruhe_2012_WD.paddock.Deep_soil_MH.Water
        SoilWater: same as Martonvasar_2013_WD.paddock.Martonvasar.SoilWater
        SoilOrganicMatter: RootCN=45; RootWt=1000; SoilCN=14.5; EnrACoeff=7.4; EnrBCoeff=0.2; OCUnits=Total
          Thickness  OC    FBiom  FInert
          50         1.3   0.03   0.3
          100        0.65  0.01   0.4
          150        0.32  0      0.5
          300        0.11  0      0.7
          400        0.11  0      0.9
          1000       0.11  0      1
        Analysis: Thickness=[50, 100, 150, 300, 400, 1000]; PH=[8, 8, 8, 8, 8, 8]; PHUnits=Water; BoronUnits=HotWater
        InitialWater Initial water: FractionFull=1; PercentMethod=EvenlyDistributed; RelativeTo=ll15
        Sample Initial nitrogen: Date=14/05/2011; NO3Units=kgha; NH4Units=kgha; SWUnits=Volumetric; OCUnits=Total; PHUnits=Water
          Thickness  NO3  NH4
          50         46   4
          100        46   1.89
          150        36   1.43
          300        20   1.144
          400        18   1.152
          1000       16   0.432
      folder Manager folder -> /Simulations/Nerac_2012/paddock/Manager folder
        manager Sow on a fixed date
          #
          date = 11/05/2012  # Enter sowing date (dd-mmm)
          #
          crop = maize  # Enter name of crop to sow
          density = 8.5  # Enter sowing density (plants/m2)
          depth = 30  # Enter sowing depth (mm)
          cultivar = B73  # Enter cultivar
          class = plant  # Enter crop growth class
          row_spacing = 800  # Enter row spacing (mm)
          on start_of_day:
          script: same as in Martonvasar_2013_WD.paddock.Manager folder.Sow on a fixed date
        manager Fertilise N at sowing: same as Martonvasar_2013_WD.paddock.Manager folder.Fertilise N at sowing
        irrigation
          automatic_irrigation = on
          asw_depth = 40  # Depth to which ASW is calculated. (mm)
          crit_fr_asw = 1  # Fraction of ASW below which irrigation is applied (0-1.0)
          irrigation_efficiency = 1  # Efficiency of the irrigation. (0-1.0)
          irrigation_allocation = off  # Allocation limits
          allocation = 60  # Allocation in mm
          default_no3_conc = 0.0  # Nitrate concentration (ppm N)
          default_nh4_conc = 0.0  # Ammonium concentration (ppm N)
          default_cl_conc = 0.0  # Chloride concentration (ppm Cl)
        manager End crop on a fixed date
          # Harvesting criteria
          crop = maize  # Enter name of crop to harvest when ripe
          date = 17/10/2012  # Enter ending date (dd-mmm)
          on end_of_day:
          script: same as in Martonvasar_2013_WD.paddock.Manager folder.End crop on a fixed date
        manager2 Irrigate on date
          # Irrigation will be applied on the date(s) below
          sameDays = yes  # Apply Irrigation on the same day(s) each year? (yes/no) - if "no" then must include the year of application below
          irrigDatesStr = 15-jul 20-jul 25-jul 04-aug 15-aug  # Dates for one or more Irrigation applications (dd-mmm or dd-mmm-yyyy) as a list with a space between dates
          # Irrigation parameters
          amount = 0  # Amount of irrigation to apply (mm)
          eff = 1.0  # Irrigation efficiency (0-1)
          script: same as in Martonvasar_2013_WD.paddock.Manager folder.Irrigate on dateVeg
      maize -> /Simulations/Nerac_2012/paddock/maize
        maizeConstants standard: same as Martonvasar_2013.paddock.maize.standard
      outputfile: filename=Karlsruhe_2012.out; title=Karlsruhe_2012
        variables My Variables: same as Martonvasar_2013_WD.paddock.outputfile.My Variables
  simulation Karlsruhe_2013_WD
    clock
      start_date = 20/04/2013  # Enter the start date of the simulation
      end_date = 18/10/2013  # Enter the end date of the simulation
    summaryfile
    metfile met: filename=D:\SAP-LEPSE\APSIM\1. Met\Karlruhe_2013.met
    area paddock
      Soil Deep_soil_MH: same as Karlsruhe_2012.paddock.Deep_soil_MH
      fertiliser
      manager Calculator
        on init:
```
TT = 0
```
        on end_of_day:
```
TT = TT + DeltaTT
```
      folder Manager folder
        manager Sow on a fixed date
          #
          date = 20/05/2013  # Enter sowing date (dd-mmm)
          #
          crop = maize  # Enter name of crop to sow
          density = 9  # Enter sowing density (plants/m2)
          depth = 30  # Enter sowing depth (mm)
          cultivar = B73  # Enter cultivar
          class = plant  # Enter crop growth class
          row_spacing = 800  # Enter row spacing (mm)
          on start_of_day:
          script: same as in Martonvasar_2013_WD.paddock.Manager folder.Sow on a fixed date
        manager Fertilise N at sowing
          # When should fertiliser be applied
          modulename = maize  # On which module should the event come from
          eventname = sowing  # On which event should fertiliser be applied
          # Fertiliser application details
          fertmodule = Fertiliser  # Module used to apply the fertiliser
          fert_amount_sow = 600  # Amount of starter fertiliser at sowing (kg/ha)
          fert_type_sow = NO3_N  # Sowing fertiliser type
          on [modulename].[eventname]:
          script: same as in Martonvasar_2013_WD.paddock.Manager folder.Fertilise N at sowing
        manager Harvesting rule
        irrigation
          automatic_irrigation = on
          asw_depth = 150  # Depth to which ASW is calculated. (mm)
          crit_fr_asw = 1  # Fraction of ASW below which irrigation is applied (0-1.0)
          irrigation_efficiency = 1  # Efficiency of the irrigation. (0-1.0)
          irrigation_allocation = off  # Allocation limits
          allocation = 0  # Allocation in mm
          default_no3_conc = 0.0  # Nitrate concentration (ppm N)
          default_nh4_conc = 0.0  # Ammonium concentration (ppm N)
          default_cl_conc = 0.0  # Chloride concentration (ppm Cl)
        manager End crop on a fixed date
          # Harvesting criteria
          crop = maize  # Enter name of crop to harvest when ripe
          date = 18/10/2013  # Enter ending date (dd-mmm)
          on end_of_day:
          script: same as in Martonvasar_2013_WD.paddock.Manager folder.End crop on a fixed date
        manager2 Irrigate on date
          # Irrigation will be applied on the date(s) below
          sameDays = yes  # Apply Irrigation on the same day(s) each year? (yes/no) - if "no" then must include the year of application below
          irrigDatesStr = 20-jul 25-jul 30-jul 04-jul  # Dates for one or more Irrigation applications (dd-mmm or dd-mmm-yyyy) as a list with a space between dates
          # Irrigation parameters
          amount = 0  # Amount of irrigation to apply (mm)
          eff = 1.0  # Irrigation efficiency (0-1)
          script: same as in Martonvasar_2013_WD.paddock.Manager folder.Irrigate on dateVeg
      surfaceom surface organic matter
        PoolName = maize  # Organic Matter pool name
        type = maize  # Organic Matter type
        mass = 0  # Initial surface residue (kg/ha)
        cnr = 80  # C:N ratio of initial residue
        standing_fraction = 0  # Fraction of residue standing
      maize -> /Simulations/Graneros_2013/paddock/maize
      outputfile: filename=Karlsruhe_2013_WD.out; title=Karlsruhe_2013_WD
        variables My Variables: same as Karlsruhe_2012_WD.paddock.outputfile.My Variables
  simulation Karlsruhe_2013 -> /Simulations/Nerac_2012
    clock
      start_date = 20/04/2013  # Enter the start date of the simulation
      end_date = 18/10/2013  # Enter the end date of the simulation
    metfile met: filename=%apsim%\Model\Met\Karlruhe_2013.met
    area paddock -> /Simulations/Nerac_2012/paddock
      Soil Deep_soil_MH: same as Karlsruhe_2012_WD.paddock.Deep_soil_MH
      folder Manager folder -> /Simulations/Nerac_2012/paddock/Manager folder
        manager Sow on a fixed date
          #
          date = 20/05/2013  # Enter sowing date (dd-mmm)
          #
          crop = maize  # Enter name of crop to sow
          density = 8.5  # Enter sowing density (plants/m2)
          depth = 30  # Enter sowing depth (mm)
          cultivar = B73  # Enter cultivar
          class = plant  # Enter crop growth class
          row_spacing = 800  # Enter row spacing (mm)
          on start_of_day:
          script: same as in Martonvasar_2013_WD.paddock.Manager folder.Sow on a fixed date
        manager Fertilise N at sowing: same as Martonvasar_2013_WD.paddock.Manager folder.Fertilise N at sowing
        irrigation
          automatic_irrigation = off
          asw_depth = 50  # Depth to which ASW is calculated. (mm)
          crit_fr_asw = 1  # Fraction of ASW below which irrigation is applied (0-1.0)
          irrigation_efficiency = 1  # Efficiency of the irrigation. (0-1.0)
          irrigation_allocation = off  # Allocation limits
          allocation = 0  # Allocation in mm
          default_no3_conc = 0.0  # Nitrate concentration (ppm N)
          default_nh4_conc = 0.0  # Ammonium concentration (ppm N)
          default_cl_conc = 0.0  # Chloride concentration (ppm Cl)
        manager End crop on a fixed date
          # Harvesting criteria
          crop = maize  # Enter name of crop to harvest when ripe
          date = 18/10/2013  # Enter ending date (dd-mmm)
          on end_of_day:
          script: same as in Martonvasar_2013_WD.paddock.Manager folder.End crop on a fixed date
        manager2 Irrigate on date
          # Irrigation will be applied on the date(s) below
          sameDays = yes  # Apply Irrigation on the same day(s) each year? (yes/no) - if "no" then must include the year of application below
          irrigDatesStr = 01-jun 10-jun 18-jun 25-jun 05-jul  # Dates for one or more Irrigation applications (dd-mmm or dd-mmm-yyyy) as a list with a space between dates
          # Irrigation parameters
          amount = 0  # Amount of irrigation to apply (mm)
          eff = 1.0  # Irrigation efficiency (0-1)
          script: same as in Martonvasar_2013_WD.paddock.Manager folder.Irrigate on dateVeg
        manager2 Irrigate on date1
          # Irrigation will be applied on the date(s) below
          sameDays = yes  # Apply Irrigation on the same day(s) each year? (yes/no) - if "no" then must include the year of application below
          irrigDatesStr = 15-jul 20-jul 30-jul 05-aug  # Dates for one or more Irrigation applications (dd-mmm or dd-mmm-yyyy) as a list with a space between dates
          # Irrigation parameters
          amount = 0  # Amount of irrigation to apply (mm)
          eff = 1.0  # Irrigation efficiency (0-1)
          script: same as in Martonvasar_2013_WD.paddock.Manager folder.Irrigate on dateVeg
      maize -> /Simulations/Nerac_2012/paddock/maize
        maizeConstants standard: same as Martonvasar_2013.paddock.maize.standard
      outputfile: filename=Karlsruhe_2013.out; title=Karlsruhe_2013
        variables My Variables: same as Martonvasar_2013_WD.paddock.outputfile.My Variables
  simulation Murony_2013_WD
    clock
      start_date = 22/05/2013  # Enter the start date of the simulation
      end_date = 05/10/2013  # Enter the end date of the simulation
    summaryfile
    metfile met: filename=D:\SAP-LEPSE\APSIM\1. Met\Murony_2013.met
    area paddock
      Soil Deep_soil_MH: Latitude=0; Longitude=0
        Water
          Thickness  BD    AirDry  LL15   DUL    SAT    KS
          50         1.31  0.125   0.129  0.251  0.396  184
          100        1.32  0.136   0.14   0.263  0.4    145
          150        1.35  0.149   0.153  0.277  0.404  145
          300        1.41  0.164   0.168  0.292  0.41   146
          400        1.47  0.163   0.167  0.29   0.409  110
          1000       1.52  0.154   0.158  0.278  0.404  108
          SoilCrop maize: LL=[0.129, 0.145, 0.17, 0.19, 0.21, 0.22]; KL=[0.08, 0.08, 0.08, 0.08, 0.07, 0.06]; XF=[1, 1, 1, 1, 1, 1]
        SoilWater: same as Martonvasar_2013_WD.paddock.Martonvasar.SoilWater
        SoilOrganicMatter: RootCN=45; RootWt=1000; SoilCN=14.5; EnrACoeff=7.4; EnrBCoeff=0.2; OCUnits=Total
          Thickness  OC    FBiom  FInert
          50         1.3   0.03   0.3
          100        0.65  0.01   0.4
          150        0.32  0      0.5
          300        0.11  0      0.7
          400        0.11  0      0.9
          1000       0.11  0      1
        Analysis: Thickness=[50, 100, 150, 300, 400, 1000]; PH=[8, 8, 8, 8, 8, 8]; PHUnits=Water; BoronUnits=HotWater
        InitialWater Initial water: FractionFull=1; PercentMethod=EvenlyDistributed; RelativeTo=ll15
        Sample Initial nitrogen: Date=14/05/2011; NO3Units=kgha; NH4Units=kgha; SWUnits=Volumetric; OCUnits=Total; PHUnits=Water
          Thickness  NO3  NH4
          50         46   4
          100        46   1.89
          150        36   1.43
          300        20   1.144
          400        18   1.152
          1000       16   0.432
      fertiliser
      manager Calculator
        on init:
```
TT = 0
```
        on end_of_day:
```
TT = TT + DeltaTT
```
      folder Manager folder
        manager Sow on a fixed date
          #
          date = 22/05/2013  # Enter sowing date (dd-mmm)
          #
          crop = maize  # Enter name of crop to sow
          density = 7.5  # Enter sowing density (plants/m2)
          depth = 30  # Enter sowing depth (mm)
          cultivar = B73  # Enter cultivar
          class = plant  # Enter crop growth class
          row_spacing = 800  # Enter row spacing (mm)
          on start_of_day:
          script: same as in Martonvasar_2013_WD.paddock.Manager folder.Sow on a fixed date
        manager Fertilise N at sowing: same as Martonvasar_2013_WD.paddock.Manager folder.Fertilise N at sowing
        manager Harvesting rule
        irrigation
          automatic_irrigation = on
          asw_depth = 70  # Depth to which ASW is calculated. (mm)
          crit_fr_asw = 1  # Fraction of ASW below which irrigation is applied (0-1.0)
          irrigation_efficiency = 1  # Efficiency of the irrigation. (0-1.0)
          irrigation_allocation = off  # Allocation limits
          allocation = 0  # Allocation in mm
          default_no3_conc = 0.0  # Nitrate concentration (ppm N)
          default_nh4_conc = 0.0  # Ammonium concentration (ppm N)
          default_cl_conc = 0.0  # Chloride concentration (ppm Cl)
        manager End crop on a fixed date
          # Harvesting criteria
          crop = maize  # Enter name of crop to harvest when ripe
          date = 05/10/2013  # Enter ending date (dd-mmm)
          on end_of_day:
          script: same as in Martonvasar_2013_WD.paddock.Manager folder.End crop on a fixed date
        manager2 Irrigate on date
          # Irrigation will be applied on the date(s) below
          sameDays = yes  # Apply Irrigation on the same day(s) each year? (yes/no) - if "no" then must include the year of application below
          irrigDatesStr = 05-aug 15-aug 25-aug  # Dates for one or more Irrigation applications (dd-mmm or dd-mmm-yyyy) as a list with a space between dates
          # Irrigation parameters
          amount = 25  # Amount of irrigation to apply (mm)
          eff = 1.0  # Irrigation efficiency (0-1)
          script: same as in Martonvasar_2013_WD.paddock.Manager folder.Irrigate on dateVeg
      surfaceom surface organic matter
        PoolName = maize  # Organic Matter pool name
        type = maize  # Organic Matter type
        mass = 0  # Initial surface residue (kg/ha)
        cnr = 80  # C:N ratio of initial residue
        standing_fraction = 0  # Fraction of residue standing
      maize -> /Simulations/Graneros_2013/paddock/maize
      outputfile: filename=Murony_2013_WD.out; title=Murony_2013_WD
        variables My Variables: same as Nerac_2013_WD.paddock.outputfile.My Variables
  simulation Murony_2013 -> /Simulations/Nerac_2012
    clock
      start_date = 22/05/2013  # Enter the start date of the simulation
      end_date = 05/10/2013  # Enter the end date of the simulation
    metfile met: filename=%apsim%\Model\Met\Murony_2013.met
    area paddock -> /Simulations/Nerac_2012/paddock
      Soil Deep_soil_MH: same as Murony_2013_WD.paddock.Deep_soil_MH
      folder Manager folder -> /Simulations/Nerac_2012/paddock/Manager folder
        manager Sow on a fixed date: same as Murony_2013_WD.paddock.Manager folder.Sow on a fixed date
        manager Fertilise N at sowing: same as Martonvasar_2013_WD.paddock.Manager folder.Fertilise N at sowing
        irrigation
          automatic_irrigation = on
          asw_depth = 200  # Depth to which ASW is calculated. (mm)
          crit_fr_asw = 1  # Fraction of ASW below which irrigation is applied (0-1.0)
          irrigation_efficiency = 1  # Efficiency of the irrigation. (0-1.0)
          irrigation_allocation = off  # Allocation limits
          allocation = 0  # Allocation in mm
          default_no3_conc = 0.0  # Nitrate concentration (ppm N)
          default_nh4_conc = 0.0  # Ammonium concentration (ppm N)
          default_cl_conc = 0.0  # Chloride concentration (ppm Cl)
        manager End crop on a fixed date
          # Harvesting criteria
          crop = maize  # Enter name of crop to harvest when ripe
          date = 05/10/2013  # Enter ending date (dd-mmm)
          on end_of_day:
          script: same as in Martonvasar_2013_WD.paddock.Manager folder.End crop on a fixed date
        manager2 Irrigate on date
          # Irrigation will be applied on the date(s) below
          sameDays = yes  # Apply Irrigation on the same day(s) each year? (yes/no) - if "no" then must include the year of application below
          irrigDatesStr = 01-jun 07-jun  # Dates for one or more Irrigation applications (dd-mmm or dd-mmm-yyyy) as a list with a space between dates
          # Irrigation parameters
          amount = 0  # Amount of irrigation to apply (mm)
          eff = 1.0  # Irrigation efficiency (0-1)
          script: same as in Martonvasar_2013_WD.paddock.Manager folder.Irrigate on dateVeg
      maize -> /Simulations/Nerac_2012/paddock/maize
        maizeConstants standard: same as Martonvasar_2013.paddock.maize.standard
      outputfile: filename=Murony_2013.out; title=Murony_2013
        variables My Variables: same as Gaillac_2012.paddock.outputfile.My Variables
  simulation Karcag_2012_WD
    clock
      start_date = 21/05/2012  # Enter the start date of the simulation
      end_date = 05/10/2012  # Enter the end date of the simulation
    summaryfile
    metfile met: filename=%apsim%\Model\Met\Karcag_2012.met
    area paddock
      Soil Deep_soil_MH: Latitude=0; Longitude=0
        Water
          Thickness  BD    AirDry  LL15   DUL    SAT    KS
          50         1.33  0.141   0.145  0.284  0.407  184
          100        1.35  0.154   0.158  0.296  0.412  145
          150        1.38  0.169   0.173  0.312  0.419  145
          300        1.43  0.184   0.188  0.326  0.426  146
          400        1.49  0.185   0.189  0.326  0.426  110
          1000       1.54  0.174   0.178  0.313  0.419  108
          SoilCrop maize: LL=[0.145, 0.16, 0.19, 0.21, 0.24, 0.28]; KL=[0.08, 0.08, 0.08, 0.08, 0.07, 0.06]; XF=[1, 1, 1, 1, 1, 1]
        SoilWater: same as Martonvasar_2013_WD.paddock.Martonvasar.SoilWater
        SoilOrganicMatter: RootCN=45; RootWt=1000; SoilCN=14.5; EnrACoeff=7.4; EnrBCoeff=0.2; OCUnits=Total
          Thickness  OC    FBiom  FInert
          50         1.3   0.03   0.3
          100        0.65  0.01   0.4
          150        0.32  0      0.5
          300        0.11  0      0.7
          400        0.11  0      0.9
          1000       0.11  0      1
        Analysis: Thickness=[50, 100, 150, 300, 400, 1000]; PH=[8, 8, 8, 8, 8, 8]; PHUnits=Water; BoronUnits=HotWater
        InitialWater Initial water: FractionFull=1; PercentMethod=EvenlyDistributed; RelativeTo=ll15
        Sample Initial nitrogen: Date=14/05/2011; NO3Units=kgha; NH4Units=kgha; SWUnits=Volumetric; OCUnits=Total; PHUnits=Water
          Thickness  NO3  NH4
          50         46   4
          100        46   1.89
          150        36   1.43
          300        20   1.144
          400        18   1.152
          1000       16   0.432
      fertiliser
      manager Calculator
        on init:
```
TT = 0
```
        on end_of_day:
```
TT = TT + DeltaTT
```
      folder Manager folder
        manager Sow on a fixed date
          #
          date = 21/05/2012  # Enter sowing date (dd-mmm)
          #
          crop = maize  # Enter name of crop to sow
          density = 5.68  # Enter sowing density (plants/m2)
          depth = 30  # Enter sowing depth (mm)
          cultivar = B73  # Enter cultivar
          class = plant  # Enter crop growth class
          row_spacing = 800  # Enter row spacing (mm)
          on start_of_day:
          script: same as in Martonvasar_2013_WD.paddock.Manager folder.Sow on a fixed date
        manager Fertilise N at sowing: same as Martonvasar_2013_WD.paddock.Manager folder.Fertilise N at sowing
        manager Harvesting rule
        irrigation
          automatic_irrigation = off
          asw_depth = 1500  # Depth to which ASW is calculated. (mm)
          crit_fr_asw = 1  # Fraction of ASW below which irrigation is applied (0-1.0)
          irrigation_efficiency = 1  # Efficiency of the irrigation. (0-1.0)
          irrigation_allocation = off  # Allocation limits
          allocation = 0  # Allocation in mm
          default_no3_conc = 0.0  # Nitrate concentration (ppm N)
          default_nh4_conc = 0.0  # Ammonium concentration (ppm N)
          default_cl_conc = 0.0  # Chloride concentration (ppm Cl)
        manager End crop on a fixed date
          # Harvesting criteria
          crop = maize  # Enter name of crop to harvest when ripe
          date = 05/10/2012  # Enter ending date (dd-mmm)
          on end_of_day:
          script: same as in Martonvasar_2013_WD.paddock.Manager folder.End crop on a fixed date
        manager2 Irrigate on date
          # Irrigation will be applied on the date(s) below
          sameDays = yes  # Apply Irrigation on the same day(s) each year? (yes/no) - if "no" then must include the year of application below
          irrigDatesStr = 24-jun 01-jul 07-jul  # Dates for one or more Irrigation applications (dd-mmm or dd-mmm-yyyy) as a list with a space between dates
          # Irrigation parameters
          amount = 0  # Amount of irrigation to apply (mm)
          eff = 1.0  # Irrigation efficiency (0-1)
          script: same as in Martonvasar_2013_WD.paddock.Manager folder.Irrigate on dateVeg
        manager2 Irrigate on date2
          # Irrigation will be applied on the date(s) below
          sameDays = yes  # Apply Irrigation on the same day(s) each year? (yes/no) - if "no" then must include the year of application below
          irrigDatesStr = 17-jul 25-jul  # Dates for one or more Irrigation applications (dd-mmm or dd-mmm-yyyy) as a list with a space between dates
          # Irrigation parameters
          amount = 0  # Amount of irrigation to apply (mm)
          eff = 1.0  # Irrigation efficiency (0-1)
          script: same as in Martonvasar_2013_WD.paddock.Manager folder.Irrigate on dateVeg
        manager2 Irrigate on date1
          # Irrigation will be applied on the date(s) below
          sameDays = yes  # Apply Irrigation on the same day(s) each year? (yes/no) - if "no" then must include the year of application below
          irrigDatesStr = 05-aug 15-aug 25-aug 05-sep 10-sep  # Dates for one or more Irrigation applications (dd-mmm or dd-mmm-yyyy) as a list with a space between dates
          # Irrigation parameters
          amount = 25  # Amount of irrigation to apply (mm)
          eff = 1.0  # Irrigation efficiency (0-1)
          script: same as in Martonvasar_2013_WD.paddock.Manager folder.Irrigate on dateVeg
      surfaceom surface organic matter
        PoolName = maize  # Organic Matter pool name
        type = maize  # Organic Matter type
        mass = 0  # Initial surface residue (kg/ha)
        cnr = 80  # C:N ratio of initial residue
        standing_fraction = 0  # Fraction of residue standing
      maize -> /Simulations/Graneros_2013/paddock/maize
      outputfile: filename=Karcag_2012_WD.out; title=Karcag_2012_WD
        variables My Variables: same as Nerac_2013_WD.paddock.outputfile.My Variables
  simulation Karcag_2012 -> /Simulations/Nerac_2012
    clock
      start_date = 21/05/2012  # Enter the start date of the simulation
      end_date = 05/10/2012  # Enter the end date of the simulation
    metfile met: filename=%apsim%\Model\Met\Karcag_2012.met
    area paddock -> /Simulations/Nerac_2012/paddock
      Soil Deep_soil_MH: Latitude=0; Longitude=0
        Water
          Thickness  BD    AirDry  LL15   DUL    SAT    KS
          50         1.33  0.141   0.145  0.284  0.407  184
          100        1.35  0.154   0.158  0.296  0.412  145
          150        1.38  0.169   0.173  0.312  0.419  145
          300        1.43  0.184   0.188  0.326  0.426  146
          400        1.49  0.185   0.189  0.326  0.426  110
          1000       1.54  0.174   0.178  0.313  0.419  108
          SoilCrop maize: LL=[0.145, 0.158, 0.173, 0.19, 0.22, 0.27]; KL=[0.08, 0.08, 0.08, 0.08, 0.07, 0.06]; XF=[1, 1, 1, 1, 1, 1]
        SoilWater: same as Martonvasar_2013_WD.paddock.Martonvasar.SoilWater
        SoilOrganicMatter: RootCN=45; RootWt=1000; SoilCN=14.5; EnrACoeff=7.4; EnrBCoeff=0.2; OCUnits=Total
          Thickness  OC    FBiom  FInert
          50         1.3   0.03   0.3
          100        0.65  0.01   0.4
          150        0.32  0      0.5
          300        0.11  0      0.7
          400        0.11  0      0.9
          1000       0.11  0      1
        Analysis: Thickness=[50, 100, 150, 300, 400, 1000]; PH=[8, 8, 8, 8, 8, 8]; PHUnits=Water; BoronUnits=HotWater
        InitialWater Initial water: FractionFull=1; PercentMethod=EvenlyDistributed; RelativeTo=ll15
        Sample Initial nitrogen: Date=14/05/2011; NO3Units=kgha; NH4Units=kgha; SWUnits=Volumetric; OCUnits=Total; PHUnits=Water
          Thickness  NO3  NH4
          50         46   4
          100        46   1.89
          150        36   1.43
          300        20   1.144
          400        18   1.152
          1000       16   0.432
      folder Manager folder -> /Simulations/Nerac_2012/paddock/Manager folder
        manager Sow on a fixed date
          #
          date = 21/05/2012  # Enter sowing date (dd-mmm)
          #
          crop = maize  # Enter name of crop to sow
          density = 5  # Enter sowing density (plants/m2)
          depth = 30  # Enter sowing depth (mm)
          cultivar = B73  # Enter cultivar
          class = plant  # Enter crop growth class
          row_spacing = 800  # Enter row spacing (mm)
          on start_of_day:
          script: same as in Martonvasar_2013_WD.paddock.Manager folder.Sow on a fixed date
        manager Fertilise N at sowing: same as Nerac_2012.paddock.Manager folder.Fertilise N at sowing
        irrigation
          automatic_irrigation = off
          asw_depth = 20  # Depth to which ASW is calculated. (mm)
          crit_fr_asw = 1  # Fraction of ASW below which irrigation is applied (0-1.0)
          irrigation_efficiency = 1  # Efficiency of the irrigation. (0-1.0)
          irrigation_allocation = off  # Allocation limits
          allocation = 0  # Allocation in mm
          default_no3_conc = 0.0  # Nitrate concentration (ppm N)
          default_nh4_conc = 0.0  # Ammonium concentration (ppm N)
          default_cl_conc = 0.0  # Chloride concentration (ppm Cl)
        manager End crop on a fixed date
          # Harvesting criteria
          crop = maize  # Enter name of crop to harvest when ripe
          date = 05/10/2012  # Enter ending date (dd-mmm)
          on end_of_day:
          script: same as in Martonvasar_2013_WD.paddock.Manager folder.End crop on a fixed date
        manager2 Irrigate on date
          # Irrigation will be applied on the date(s) below
          sameDays = yes  # Apply Irrigation on the same day(s) each year? (yes/no) - if "no" then must include the year of application below
          irrigDatesStr = 24-jun 01-jul 08-jul 12-jul  # Dates for one or more Irrigation applications (dd-mmm or dd-mmm-yyyy) as a list with a space between dates
          # Irrigation parameters
          amount = 0  # Amount of irrigation to apply (mm)
          eff = 1.0  # Irrigation efficiency (0-1)
          script: same as in Martonvasar_2013_WD.paddock.Manager folder.Irrigate on dateVeg
        manager2 Irrigate on date1
          # Irrigation will be applied on the date(s) below
          sameDays = yes  # Apply Irrigation on the same day(s) each year? (yes/no) - if "no" then must include the year of application below
          irrigDatesStr = 17-jul 24-jul 28-jul  # Dates for one or more Irrigation applications (dd-mmm or dd-mmm-yyyy) as a list with a space between dates
          # Irrigation parameters
          amount = 0  # Amount of irrigation to apply (mm)
          eff = 1.0  # Irrigation efficiency (0-1)
          script: same as in Martonvasar_2013_WD.paddock.Manager folder.Irrigate on dateVeg
        manager2 Irrigate on date2
          # Irrigation will be applied on the date(s) below
          sameDays = yes  # Apply Irrigation on the same day(s) each year? (yes/no) - if "no" then must include the year of application below
          irrigDatesStr = 09-aug 15-aug 25-aug 10-sep  # Dates for one or more Irrigation applications (dd-mmm or dd-mmm-yyyy) as a list with a space between dates
          # Irrigation parameters
          amount = 28  # Amount of irrigation to apply (mm)
          eff = 1.0  # Irrigation efficiency (0-1)
          script: same as in Martonvasar_2013_WD.paddock.Manager folder.Irrigate on dateVeg
      maize -> /Simulations/Nerac_2012/paddock/maize
        maizeConstants standard: same as Martonvasar_2013.paddock.maize.standard
      outputfile: filename=Karcag_2012.out; title=Karcag_2012
        variables My Variables: same as Martonvasar_2013_WD.paddock.outputfile.My Variables
  simulation Karcag_2013_WD
    clock
      start_date = 21/05/2013  # Enter the start date of the simulation
      end_date = 11/10/2013  # Enter the end date of the simulation
    summaryfile
    metfile met: filename=%apsim%\Model\Met\Karcag_2013.met
    area paddock
      Soil Deep_soil_MH: same as Karcag_2012.paddock.Deep_soil_MH
      fertiliser
      manager Calculator
        on init:
```
TT = 0
```
        on end_of_day:
```
TT = TT + DeltaTT
```
      folder Manager folder
        manager Sow on a fixed date
          #
          date = 23/05/2013  # Enter sowing date (dd-mmm)
          #
          crop = maize  # Enter name of crop to sow
          density = 6.7  # Enter sowing density (plants/m2)
          depth = 30  # Enter sowing depth (mm)
          cultivar = B73  # Enter cultivar
          class = plant  # Enter crop growth class
          row_spacing = 800  # Enter row spacing (mm)
          on start_of_day:
          script: same as in Martonvasar_2013_WD.paddock.Manager folder.Sow on a fixed date
        manager Fertilise N at sowing: same as Martonvasar_2013_WD.paddock.Manager folder.Fertilise N at sowing
        manager Harvesting rule
        irrigation: same as Nerac_2013_WD.paddock.Manager folder.Irrigation
        manager End crop on a fixed date
          # Harvesting criteria
          crop = maize  # Enter name of crop to harvest when ripe
          date = 11/10/2013  # Enter ending date (dd-mmm)
          on end_of_day:
          script: same as in Martonvasar_2013_WD.paddock.Manager folder.End crop on a fixed date
        manager2 Irrigate on date1
          # Irrigation will be applied on the date(s) below
          sameDays = yes  # Apply Irrigation on the same day(s) each year? (yes/no) - if "no" then must include the year of application below
          irrigDatesStr = 08-jul 17-jul  # Dates for one or more Irrigation applications (dd-mmm or dd-mmm-yyyy) as a list with a space between dates
          # Irrigation parameters
          amount = 0  # Amount of irrigation to apply (mm)
          eff = 1.0  # Irrigation efficiency (0-1)
          script: same as in Martonvasar_2013_WD.paddock.Manager folder.Irrigate on dateVeg
        manager2 Irrigate on date
          # Irrigation will be applied on the date(s) below
          sameDays = yes  # Apply Irrigation on the same day(s) each year? (yes/no) - if "no" then must include the year of application below
          irrigDatesStr = 10-aug 20-aug 25-aug 01-sep  # Dates for one or more Irrigation applications (dd-mmm or dd-mmm-yyyy) as a list with a space between dates
          # Irrigation parameters
          amount = 25  # Amount of irrigation to apply (mm)
          eff = 1.0  # Irrigation efficiency (0-1)
          script: same as in Martonvasar_2013_WD.paddock.Manager folder.Irrigate on dateVeg
      surfaceom surface organic matter
        PoolName = maize  # Organic Matter pool name
        type = maize  # Organic Matter type
        mass = 0  # Initial surface residue (kg/ha)
        cnr = 80  # C:N ratio of initial residue
        standing_fraction = 0  # Fraction of residue standing
      maize -> /Simulations/Graneros_2013/paddock/maize
      outputfile: filename=Karcag_2013_WD.out; title=Karcag_2013_WD
        variables My Variables: same as Nerac_2013_WD.paddock.outputfile.My Variables
  simulation Campagnola_2012_WD -> /Simulations/Campagnola_2012
    area paddock -> /Simulations/Campagnola_2012/paddock
      Soil Deep_soil_MH: Latitude=0; Longitude=0
        Water -> /Simulations/Campagnola_2012/paddock/Deep_soil_MH/Water
        SoilWater -> /Simulations/Campagnola_2012/paddock/Deep_soil_MH/SoilWater
        SoilOrganicMatter -> /Simulations/Campagnola_2012/paddock/Deep_soil_MH/SoilOrganicMatter
        Analysis -> /Simulations/Campagnola_2012/paddock/Deep_soil_MH/Analysis
        InitialWater Initial water -> /Simulations/Campagnola_2012/paddock/Deep_soil_MH/Initial water
        Sample Initial nitrogen -> /Simulations/Campagnola_2012/paddock/Deep_soil_MH/Initial nitrogen
      folder Manager folder -> /Simulations/Campagnola_2012/paddock/Manager folder
        manager Fertilise N at sowing: same as Martonvasar_2013_WD.paddock.Manager folder.Fertilise N at sowing
        irrigation
          automatic_irrigation = off
          asw_depth = 5  # Depth to which ASW is calculated. (mm)
          crit_fr_asw = 1  # Fraction of ASW below which irrigation is applied (0-1.0)
          irrigation_efficiency = 1  # Efficiency of the irrigation. (0-1.0)
          irrigation_allocation = off  # Allocation limits
          allocation = 0  # Allocation in mm
          default_no3_conc = 0.0  # Nitrate concentration (ppm N)
          default_nh4_conc = 0.0  # Ammonium concentration (ppm N)
          default_cl_conc = 0.0  # Chloride concentration (ppm Cl)
        manager2 Irrigate on date
          # Irrigation will be applied on the date(s) below
          sameDays = yes  # Apply Irrigation on the same day(s) each year? (yes/no) - if "no" then must include the year of application below
          irrigDatesStr = 30-may 12-jun 26-jun  # Dates for one or more Irrigation applications (dd-mmm or dd-mmm-yyyy) as a list with a space between dates
          # Irrigation parameters
          amount = 0  # Amount of irrigation to apply (mm)
          eff = 1.0  # Irrigation efficiency (0-1)
          script: same as in Martonvasar_2013_WD.paddock.Manager folder.Irrigate on dateVeg
        manager2 Irrigate on PC1
          # Irrigation will be applied on the date(s) below
          sameDays = yes  # Apply Irrigation on the same day(s) each year? (yes/no) - if "no" then must include the year of application below
          irrigDatesStr = 09-jul 14-jul  # Dates for one or more Irrigation applications (dd-mmm or dd-mmm-yyyy) as a list with a space between dates
          # Irrigation parameters
          amount = 0  # Amount of irrigation to apply (mm)
          eff = 1.0  # Irrigation efficiency (0-1)
          script: same as in Martonvasar_2013_WD.paddock.Manager folder.Irrigate on dateVeg
        manager2 Irrigate on PC2
          # Irrigation will be applied on the date(s) below
          sameDays = yes  # Apply Irrigation on the same day(s) each year? (yes/no) - if "no" then must include the year of application below
          irrigDatesStr = 24-jul 30-jul  # Dates for one or more Irrigation applications (dd-mmm or dd-mmm-yyyy) as a list with a space between dates
          # Irrigation parameters
          amount = 0  # Amount of irrigation to apply (mm)
          eff = 1.0  # Irrigation efficiency (0-1)
          script: same as in Martonvasar_2013_WD.paddock.Manager folder.Irrigate on dateVeg
        manager2 Irrigate on GF
          # Irrigation will be applied on the date(s) below
          sameDays = yes  # Apply Irrigation on the same day(s) each year? (yes/no) - if "no" then must include the year of application below
          irrigDatesStr = 01-aug 10-aug 20-aug 25-aug 30-aug  # Dates for one or more Irrigation applications (dd-mmm or dd-mmm-yyyy) as a list with a space between dates
          # Irrigation parameters
          amount = 15  # Amount of irrigation to apply (mm)
          eff = 1.0  # Irrigation efficiency (0-1)
          script: same as in Martonvasar_2013_WD.paddock.Manager folder.Irrigate on dateVeg
      outputfile: filename=Campagnola_2012_WD.out; title=Campagnola_2012_WD
        variables My Variables: same as Nerac_2013_WD.paddock.outputfile.My Variables
  simulation Campagnola_2012 -> /Simulations/Nerac_2012
    clock
      start_date = 23/05/2012  # Enter the start date of the simulation
      end_date = 04/10/2012  # Enter the end date of the simulation
    metfile met: filename=%apsim%\Model\Met\Campagnola_2012bis.met
    area paddock -> /Simulations/Nerac_2012/paddock
      Soil Deep_soil_MH -> /Simulations/Nerac_2012/paddock/Deep_soil_MH
        Water
          Thickness  BD    AirDry  LL15   DUL    SAT    KS
          50         1.43  0.123   0.127  0.259  0.397  184
          100        1.45  0.132   0.137  0.27   0.401  145
          150        1.48  0.147   0.152  0.286  0.406  145
          300        1.53  0.161   0.166  0.299  0.412  146
          400        1.59  0.161   0.165  0.298  0.411  110
          1000       1.64  0.151   0.156  0.286  0.406  100
          SoilCrop maize: LL=[0.127, 0.145, 0.165, 0.195, 0.22, 0.26]; KL=[0.08, 0.08, 0.08, 0.08, 0.07, 0.07]; XF=[1, 1, 1, 1, 1, 1]
        SoilWater: same as Martonvasar_2013_WD.paddock.Martonvasar.SoilWater
        SoilOrganicMatter: RootCN=45; RootWt=1000; SoilCN=14.5; EnrACoeff=7.4; EnrBCoeff=0.2; OCUnits=Total
          Thickness  OC    FBiom  FInert
          50         1.3   0.03   0.3
          100        0.65  0.01   0.4
          150        0.32  0      0.5
          300        0.11  0      0.7
          400        0.11  0      0.9
          1000       0.11  0      0.9
        Analysis: Thickness=[50, 100, 150, 300, 400, 1000]; PH=[8, 8, 8, 8, 8, 8]; PHUnits=Water; BoronUnits=HotWater
        InitialWater Initial water: FractionFull=1; PercentMethod=EvenlyDistributed; RelativeTo=ll15
        Sample Initial nitrogen: Date=14/05/2011; NO3Units=kgha; NH4Units=kgha; SWUnits=Volumetric; OCUnits=Total; PHUnits=Water
          Thickness  NO3  NH4
          50         46   4
          100        46   1.89
          150        36   1.43
          300        20   1.144
          400        18   1.152
          1000       18   1.152
      folder Manager folder -> /Simulations/Nerac_2012/paddock/Manager folder
        manager Sow on a fixed date
          #
          date = 23/05/2012  # Enter sowing date (dd-mmm)
          #
          crop = maize  # Enter name of crop to sow
          density = 6.43  # Enter sowing density (plants/m2)
          depth = 30  # Enter sowing depth (mm)
          cultivar = B73  # Enter cultivar
          class = plant  # Enter crop growth class
          row_spacing = 800  # Enter row spacing (mm)
          on start_of_day:
          script: same as in Martonvasar_2013_WD.paddock.Manager folder.Sow on a fixed date
        manager Fertilise N at sowing: same as Martonvasar_2013_WD.paddock.Manager folder.Fertilise N at sowing
        irrigation
          automatic_irrigation = on
          asw_depth = 38  # Depth to which ASW is calculated. (mm)
          crit_fr_asw = 1  # Fraction of ASW below which irrigation is applied (0-1.0)
          irrigation_efficiency = 1  # Efficiency of the irrigation. (0-1.0)
          irrigation_allocation = off  # Allocation limits
          allocation = 0  # Allocation in mm
          default_no3_conc = 0.0  # Nitrate concentration (ppm N)
          default_nh4_conc = 0.0  # Ammonium concentration (ppm N)
          default_cl_conc = 0.0  # Chloride concentration (ppm Cl)
        manager End crop on a fixed date
          # Harvesting criteria
          crop = maize  # Enter name of crop to harvest when ripe
          date = 04/10/2012  # Enter ending date (dd-mmm)
          on end_of_day:
          script: same as in Martonvasar_2013_WD.paddock.Manager folder.End crop on a fixed date
        manager2 Irrigate on date
          # Irrigation will be applied on the date(s) below
          sameDays = yes  # Apply Irrigation on the same day(s) each year? (yes/no) - if "no" then must include the year of application below
          irrigDatesStr = 30-may 10-jun 26-jun  # Dates for one or more Irrigation applications (dd-mmm or dd-mmm-yyyy) as a list with a space between dates
          # Irrigation parameters
          amount = 0  # Amount of irrigation to apply (mm)
          eff = 1.0  # Irrigation efficiency (0-1)
          script: same as in Martonvasar_2013_WD.paddock.Manager folder.Irrigate on dateVeg
        manager2 PC
          # Irrigation will be applied on the date(s) below
          sameDays = yes  # Apply Irrigation on the same day(s) each year? (yes/no) - if "no" then must include the year of application below
          irrigDatesStr = 06-jul 14-jul  # Dates for one or more Irrigation applications (dd-mmm or dd-mmm-yyyy) as a list with a space between dates
          # Irrigation parameters
          amount = 0  # Amount of irrigation to apply (mm)
          eff = 1.0  # Irrigation efficiency (0-1)
          script: same as in Martonvasar_2013_WD.paddock.Manager folder.Irrigate on dateVeg
        manager2 Irrigate on date1
          # Irrigation will be applied on the date(s) below
          sameDays = yes  # Apply Irrigation on the same day(s) each year? (yes/no) - if "no" then must include the year of application below
          irrigDatesStr = 28-jul 01-aug 10-aug 20-aug 25-aug 30-aug  # Dates for one or more Irrigation applications (dd-mmm or dd-mmm-yyyy) as a list with a space between dates
          # Irrigation parameters
          amount = 22  # Amount of irrigation to apply (mm)
          eff = 1.0  # Irrigation efficiency (0-1)
          script: same as in Martonvasar_2013_WD.paddock.Manager folder.Irrigate on dateVeg
      maize -> /Simulations/Nerac_2012/paddock/maize
        maizeConstants standard: same as Martonvasar_2013.paddock.maize.standard
      outputfile: filename=Campagnola_2012.out; title=Campagnola_2012
        variables My Variables: same as Martonvasar_2013_WD.paddock.outputfile.My Variables
  simulation Campagnola_2013_WD
    clock
      start_date = 14/06/2013  # Enter the start date of the simulation
      end_date = 20/10/2013  # Enter the end date of the simulation
    summaryfile
    metfile met: filename=D:\SAP-LEPSE\APSIM\1. Met\Campagnola_2013.met
    area paddock
      Soil Deep_soil_MH: Latitude=0; Longitude=0
        Water: same as Campagnola_2012.paddock.Deep_soil_MH.Water
        SoilWater: same as Martonvasar_2013_WD.paddock.Martonvasar.SoilWater
        SoilOrganicMatter: RootCN=45; RootWt=1000; SoilCN=14.5; EnrACoeff=7.4; EnrBCoeff=0.2; OCUnits=Total
          Thickness  OC    FBiom  FInert
          50         1.3   0.03   0.3
          100        0.65  0.01   0.4
          150        0.32  0      0.5
          300        0.11  0      0.7
          400        0.11  0      0.9
          1000       0.11  0      0.9
        Analysis: Thickness=[50, 100, 150, 300, 400, 1000]; PH=[8, 8, 8, 8, 8, 8]; PHUnits=Water; BoronUnits=HotWater
        InitialWater Initial water: FractionFull=1; PercentMethod=EvenlyDistributed; RelativeTo=ll15
        Sample Initial nitrogen: Date=14/05/2011; NO3Units=kgha; NH4Units=kgha; SWUnits=Volumetric; OCUnits=Total; PHUnits=Water
          Thickness  NO3  NH4
          50         46   4
          100        46   1.89
          150        36   1.43
          300        20   1.144
          400        18   1.152
          1000       18   1.152
      fertiliser
      manager Calculator
        on init:
```
TT = 0
```
        on end_of_day:
```
TT = TT + DeltaTT
```
      folder Manager folder
        manager Sow on a fixed date
          #
          date = 14/06/2013  # Enter sowing date (dd-mmm)
          #
          crop = maize  # Enter name of crop to sow
          density = 5  # Enter sowing density (plants/m2)
          depth = 30  # Enter sowing depth (mm)
          cultivar = B73  # Enter cultivar
          class = plant  # Enter crop growth class
          row_spacing = 800  # Enter row spacing (mm)
          on start_of_day:
          script: same as in Martonvasar_2013_WD.paddock.Manager folder.Sow on a fixed date
        manager Fertilise N at sowing: same as Nerac_2012_WD.paddock.Manager folder.Fertilise N at sowing
        manager Harvesting rule
        irrigation: same as Gaillac_2012_WD.paddock.Manager folder.Irrigation
        manager End crop on a fixed date
          # Harvesting criteria
          crop = maize  # Enter name of crop to harvest when ripe
          date = 13/11/2013  # Enter ending date (dd-mmm)
          on end_of_day:
          script: same as in Martonvasar_2013_WD.paddock.Manager folder.End crop on a fixed date
        manager2 Irrigate on date
          # Irrigation will be applied on the date(s) below
          sameDays = yes  # Apply Irrigation on the same day(s) each year? (yes/no) - if "no" then must include the year of application below
          irrigDatesStr = 25-jun 01-jul 07-jul  # Dates for one or more Irrigation applications (dd-mmm or dd-mmm-yyyy) as a list with a space between dates
          # Irrigation parameters
          amount = 0  # Amount of irrigation to apply (mm)
          eff = 1.0  # Irrigation efficiency (0-1)
          script: same as in Martonvasar_2013_WD.paddock.Manager folder.Irrigate on dateVeg
        manager2 Irrigate on PC1
          # Irrigation will be applied on the date(s) below
          sameDays = yes  # Apply Irrigation on the same day(s) each year? (yes/no) - if "no" then must include the year of application below
          irrigDatesStr = 24-jul 25-jul 01-aug  # Dates for one or more Irrigation applications (dd-mmm or dd-mmm-yyyy) as a list with a space between dates
          # Irrigation parameters
          amount = 0  # Amount of irrigation to apply (mm)
          eff = 1.0  # Irrigation efficiency (0-1)
          script: same as in Martonvasar_2013_WD.paddock.Manager folder.Irrigate on dateVeg
        manager2 Irrigate on PC2
          # Irrigation will be applied on the date(s) below
          sameDays = yes  # Apply Irrigation on the same day(s) each year? (yes/no) - if "no" then must include the year of application below
          irrigDatesStr = 12-jul  # Dates for one or more Irrigation applications (dd-mmm or dd-mmm-yyyy) as a list with a space between dates
          # Irrigation parameters
          amount = 0  # Amount of irrigation to apply (mm)
          eff = 1.0  # Irrigation efficiency (0-1)
          script: same as in Martonvasar_2013_WD.paddock.Manager folder.Irrigate on dateVeg
        manager2 Irrigate on GF
          # Irrigation will be applied on the date(s) below
          sameDays = yes  # Apply Irrigation on the same day(s) each year? (yes/no) - if "no" then must include the year of application below
          irrigDatesStr = 25-aug 09-sep 20-sep 30-sep  # Dates for one or more Irrigation applications (dd-mmm or dd-mmm-yyyy) as a list with a space between dates
          # Irrigation parameters
          amount = 0  # Amount of irrigation to apply (mm)
          eff = 1.0  # Irrigation efficiency (0-1)
          script: same as in Martonvasar_2013_WD.paddock.Manager folder.Irrigate on dateVeg
      surfaceom surface organic matter
        PoolName = maize  # Organic Matter pool name
        type = maize  # Organic Matter type
        mass = 0  # Initial surface residue (kg/ha)
        cnr = 80  # C:N ratio of initial residue
        standing_fraction = 0  # Fraction of residue standing
      maize -> /Simulations/Graneros_2013/paddock/maize
      outputfile: filename=Campagnola_2013_WD.out; title=Campagnola_2013_WD
        variables My Variables: same as Nerac_2013_WD.paddock.outputfile.My Variables
  simulation Campagnola_2013 -> /Simulations/Nerac_2012
    clock
      start_date = 14/06/2013  # Enter the start date of the simulation
      end_date = 20/10/2013  # Enter the end date of the simulation
    metfile met: filename=%apsim%\Model\Met\Campagnola_2013.met
    area paddock -> /Simulations/Nerac_2012/paddock
      Soil Deep_soil_MH -> /Simulations/Nerac_2012/paddock/Deep_soil_MH
        Water: same as Campagnola_2012.paddock.Deep_soil_MH.Water
        SoilWater: same as Martonvasar_2013_WD.paddock.Martonvasar.SoilWater
        SoilOrganicMatter: RootCN=45; RootWt=1000; SoilCN=14.5; EnrACoeff=7.4; EnrBCoeff=0.2; OCUnits=Total
          Thickness  OC    FBiom  FInert
          50         1.3   0.03   0.3
          100        0.65  0.01   0.4
          150        0.32  0      0.5
          300        0.11  0      0.7
          400        0.11  0      0.9
          1000       0.11  0      0.9
        Analysis: Thickness=[50, 100, 150, 300, 400, 1000]; PH=[8, 8, 8, 8, 8, 8]; PHUnits=Water; BoronUnits=HotWater
        InitialWater Initial water: FractionFull=1; PercentMethod=EvenlyDistributed; RelativeTo=ll15
        Sample Initial nitrogen: Date=14/05/2011; NO3Units=kgha; NH4Units=kgha; SWUnits=Volumetric; OCUnits=Total; PHUnits=Water
          Thickness  NO3  NH4
          50         46   4
          100        46   1.89
          150        36   1.43
          300        20   1.144
          400        18   1.152
          1000       18   1.152
      folder Manager folder -> /Simulations/Nerac_2012/paddock/Manager folder
        manager Sow on a fixed date
          #
          date = 14/06/2013  # Enter sowing date (dd-mmm)
          #
          crop = maize  # Enter name of crop to sow
          density = 5.71  # Enter sowing density (plants/m2)
          depth = 30  # Enter sowing depth (mm)
          cultivar = B73  # Enter cultivar
          class = plant  # Enter crop growth class
          row_spacing = 700  # Enter row spacing (mm)
          on start_of_day:
          script: same as in Martonvasar_2013_WD.paddock.Manager folder.Sow on a fixed date
        manager Fertilise N at sowing: same as Martonvasar_2013_WD.paddock.Manager folder.Fertilise N at sowing
        irrigation: same as Murony_2013_WD.paddock.Manager folder.Irrigation
        manager End crop on a fixed date
          # Harvesting criteria
          crop = maize  # Enter name of crop to harvest when ripe
          date = 13/11/2013  # Enter ending date (dd-mmm)
          on end_of_day:
          script: same as in Martonvasar_2013_WD.paddock.Manager folder.End crop on a fixed date
        manager2 Irrigate on date
          # Irrigation will be applied on the date(s) below
          sameDays = yes  # Apply Irrigation on the same day(s) each year? (yes/no) - if "no" then must include the year of application below
          irrigDatesStr = 24-jul 11-aug 18-aug 30-aug  # Dates for one or more Irrigation applications (dd-mmm or dd-mmm-yyyy) as a list with a space between dates
          # Irrigation parameters
          amount = 0  # Amount of irrigation to apply (mm)
          eff = 1.0  # Irrigation efficiency (0-1)
          script: same as in Martonvasar_2013_WD.paddock.Manager folder.Irrigate on dateVeg
      maize -> /Simulations/Nerac_2012/paddock/maize
        maizeConstants standard: same as Martonvasar_2013.paddock.maize.standard
      outputfile: filename=Campagnola_2013.out; title=Campagnola_2013
        variables My Variables: same as Martonvasar_2013_WD.paddock.outputfile.My Variables
  simulation Cadriano_2012_WD
    clock
      start_date = 17/05/2012  # Enter the start date of the simulation
      end_date = 30/08/2012  # Enter the end date of the simulation
    summaryfile
    metfile met: filename=D:\SAP-LEPSE\APSIM\1. Met\Cadriano_2012_New.met
    area paddock
      Soil Cadriano: Latitude=0; Longitude=0
        Water
          Thickness  BD    AirDry  LL15   DUL    SAT    KS
          50         1.42  0.122   0.127  0.259  0.397  184
          100        1.44  0.133   0.138  0.27   0.401  145
          150        1.47  0.148   0.153  0.286  0.407  145
          300        1.52  0.164   0.168  0.3    0.412  146
          400        1.58  0.163   0.167  0.298  0.412  110
          1000       1.64  0.153   0.157  0.286  0.406  108
          SoilCrop maize: LL=[0.127, 0.138, 0.153, 0.168, 0.19, 0.25]; KL=[0.08, 0.08, 0.08, 0.08, 0.07, 0.06]; XF=[1, 1, 1, 1, 1, 1]
        SoilWater: same as Martonvasar_2013_WD.paddock.Martonvasar.SoilWater
        SoilOrganicMatter: RootCN=45; RootWt=1000; SoilCN=14.5; EnrACoeff=7.4; EnrBCoeff=0.2; OCUnits=Total
          Thickness  OC    FBiom  FInert
          50         1.3   0.03   0.3
          100        0.65  0.01   0.4
          150        0.32  0      0.5
          300        0.11  0      0.7
          400        0.11  0      0.9
          1000       0.11  0      1
        Analysis: Thickness=[50, 100, 150, 300, 400, 1000]; PH=[8, 8, 8, 8, 8, 8]; PHUnits=Water; BoronUnits=HotWater
        InitialWater Initial water: FractionFull=1; PercentMethod=EvenlyDistributed; RelativeTo=ll15
        Sample Initial nitrogen: Date=14/05/2011; NO3Units=kgha; NH4Units=kgha; SWUnits=Volumetric; OCUnits=Total; PHUnits=Water
          Thickness  NO3  NH4
          50         46   4
          100        46   1.89
          150        36   1.43
          300        20   1.144
          400        18   1.152
          1000       16   0.432
      fertiliser
      manager Calculator
        on init:
```
TT = 0
```
        on end_of_day:
```
TT = TT + DeltaTT
```
      folder Manager folder
        manager Sow on a fixed date
          #
          date = 17/05/2012  # Enter sowing date (dd-mmm)
          #
          crop = maize  # Enter name of crop to sow
          density = 6.25  # Enter sowing density (plants/m2)
          depth = 30  # Enter sowing depth (mm)
          cultivar = B73  # Enter cultivar
          class = plant  # Enter crop growth class
          row_spacing = 800  # Enter row spacing (mm)
          on start_of_day:
          script: same as in Martonvasar_2013_WD.paddock.Manager folder.Sow on a fixed date
        manager Fertilise N at sowing: same as Nerac_2012_WD.paddock.Manager folder.Fertilise N at sowing
        manager Harvesting rule
        irrigation: same as Campagnola_2012_WD.paddock.Manager folder.Irrigation
        manager End crop on a fixed date
          # Harvesting criteria
          crop = maize  # Enter name of crop to harvest when ripe
          date = 30/08/2012  # Enter ending date (dd-mmm)
          on end_of_day:
          script: same as in Martonvasar_2013_WD.paddock.Manager folder.End crop on a fixed date
        manager2 Irrigate on date
          # Irrigation will be applied on the date(s) below
          sameDays = yes  # Apply Irrigation on the same day(s) each year? (yes/no) - if "no" then must include the year of application below
          irrigDatesStr = 25-may 05-jun 15-jun 25-jun  # Dates for one or more Irrigation applications (dd-mmm or dd-mmm-yyyy) as a list with a space between dates
          # Irrigation parameters
          amount = 0  # Amount of irrigation to apply (mm)
          eff = 1.0  # Irrigation efficiency (0-1)
          script: same as in Martonvasar_2013_WD.paddock.Manager folder.Irrigate on dateVeg
        manager2 Irrigate on PC1
          # Irrigation will be applied on the date(s) below
          sameDays = yes  # Apply Irrigation on the same day(s) each year? (yes/no) - if "no" then must include the year of application below
          irrigDatesStr = 2-jul 12-jul  # Dates for one or more Irrigation applications (dd-mmm or dd-mmm-yyyy) as a list with a space between dates
          # Irrigation parameters
          amount = 0  # Amount of irrigation to apply (mm)
          eff = 1.0  # Irrigation efficiency (0-1)
          script: same as in Martonvasar_2013_WD.paddock.Manager folder.Irrigate on dateVeg
        manager2 Irrigate on PC2
          # Irrigation will be applied on the date(s) below
          sameDays = yes  # Apply Irrigation on the same day(s) each year? (yes/no) - if "no" then must include the year of application below
          irrigDatesStr = 19-jul 23-jul  # Dates for one or more Irrigation applications (dd-mmm or dd-mmm-yyyy) as a list with a space between dates
          # Irrigation parameters
          amount = 20  # Amount of irrigation to apply (mm)
          eff = 1.0  # Irrigation efficiency (0-1)
          script: same as in Martonvasar_2013_WD.paddock.Manager folder.Irrigate on dateVeg
        manager2 Irrigate on GF
          # Irrigation will be applied on the date(s) below
          sameDays = yes  # Apply Irrigation on the same day(s) each year? (yes/no) - if "no" then must include the year of application below
          irrigDatesStr = 29-jul 31-jul 09-aug 14-aug 25-aug  # Dates for one or more Irrigation applications (dd-mmm or dd-mmm-yyyy) as a list with a space between dates
          # Irrigation parameters
          amount = 0  # Amount of irrigation to apply (mm)
          eff = 1.0  # Irrigation efficiency (0-1)
          script: same as in Martonvasar_2013_WD.paddock.Manager folder.Irrigate on dateVeg
      surfaceom surface organic matter
        PoolName = maize  # Organic Matter pool name
        type = maize  # Organic Matter type
        mass = 0  # Initial surface residue (kg/ha)
        cnr = 80  # C:N ratio of initial residue
        standing_fraction = 0  # Fraction of residue standing
      maize -> /Simulations/Graneros_2013/paddock/maize
      outputfile: filename=Cadriano_2012_WD.out; title=Cadriano_2012_WD
        variables My Variables: same as Nerac_2013_WD.paddock.outputfile.My Variables
  simulation Cadriano_2012_WW_WD
    clock
      start_date = 17/05/2012  # Enter the start date of the simulation
      end_date = 30/08/2012  # Enter the end date of the simulation
    summaryfile
    metfile met: filename=D:\SAP-LEPSE\APSIM\1. Met\Cadriano_2012_New.met
    area paddock
      Soil Cadriano: Latitude=0; Longitude=0
        Water: same as Cadriano_2012_WD.paddock.Cadriano.Water
        SoilWater: same as Martonvasar_2013_WD.paddock.Martonvasar.SoilWater
        SoilOrganicMatter: RootCN=45; RootWt=1000; SoilCN=14.5; EnrACoeff=7.4; EnrBCoeff=0.2; OCUnits=Total
          Thickness  OC    FBiom  FInert
          200        1.3   0.03   0.3
          200        0.65  0.01   0.4
          200        0.32  0      0.5
          200        0.11  0      0.7
          200        0.11  0      0.9
          500        0.11  0      1
        Analysis: Thickness=[200, 200, 200, 200, 200, 500]; PH=[8, 8, 8, 8, 8, 8]; PHUnits=Water; BoronUnits=HotWater
        InitialWater Initial water: FractionFull=1; PercentMethod=EvenlyDistributed; RelativeTo=ll15
        Sample Initial nitrogen: Date=14/05/2011; NO3Units=kgha; NH4Units=kgha; SWUnits=Volumetric; OCUnits=Total; PHUnits=Water
          Thickness  NO3  NH4
          200        46   4
          200        46   1.89
          200        36   1.43
          200        20   1.144
          200        18   1.152
          500        16   0.432
      fertiliser
      folder Manager folder
        manager Sow on a fixed date: same as Cadriano_2012_WD.paddock.Manager folder.Sow on a fixed date
        manager Fertilise N at sowing: same as Karlsruhe_2013_WD.paddock.Manager folder.Fertilise N at sowing
        manager Harvesting rule (disabled)
          # Harvesting criteria
          crop = maize  # Enter name of crop to harvest when ripe
          on end_of_day:
          script: same as in Nerac_2012.paddock.Manager folder.Harvesting rule
        irrigation
          automatic_irrigation = off
          asw_depth = 40  # Depth to which ASW is calculated. (mm)
          crit_fr_asw = 1  # Fraction of ASW below which irrigation is applied (0-1.0)
          irrigation_efficiency = 1  # Efficiency of the irrigation. (0-1.0)
          irrigation_allocation = off  # Allocation limits
          allocation = 0  # Allocation in mm
          default_no3_conc = 0.0  # Nitrate concentration (ppm N)
          default_nh4_conc = 0.0  # Ammonium concentration (ppm N)
          default_cl_conc = 0.0  # Chloride concentration (ppm Cl)
        manager End crop on a fixed date
          # Harvesting criteria
          crop = maize  # Enter name of crop to harvest when ripe
          date = 30/08/2012  # Enter ending date (dd-mmm)
          on end_of_day:
          script: same as in Martonvasar_2013_WD.paddock.Manager folder.End crop on a fixed date
        manager2 Irrigate on date
          # Irrigation will be applied on the date(s) below
          sameDays = yes  # Apply Irrigation on the same day(s) each year? (yes/no) - if "no" then must include the year of application below
          irrigDatesStr = 02-jul 10-jul  # Dates for one or more Irrigation applications (dd-mmm or dd-mmm-yyyy) as a list with a space between dates
          # Irrigation parameters
          amount = 20  # Amount of irrigation to apply (mm)
          eff = 1.0  # Irrigation efficiency (0-1)
          script: same as in Martonvasar_2013_WD.paddock.Manager folder.Irrigate on dateVeg
        manager2 Irrigate on date1
          # Irrigation will be applied on the date(s) below
          sameDays = yes  # Apply Irrigation on the same day(s) each year? (yes/no) - if "no" then must include the year of application below
          irrigDatesStr = 31-jul  # Dates for one or more Irrigation applications (dd-mmm or dd-mmm-yyyy) as a list with a space between dates
          # Irrigation parameters
          amount = 13  # Amount of irrigation to apply (mm)
          eff = 1.0  # Irrigation efficiency (0-1)
          script: same as in Martonvasar_2013_WD.paddock.Manager folder.Irrigate on dateVeg
        manager2 Irrigate on date2
          # Irrigation will be applied on the date(s) below
          sameDays = yes  # Apply Irrigation on the same day(s) each year? (yes/no) - if "no" then must include the year of application below
          irrigDatesStr = 20-jul 25-jul 09-aug  # Dates for one or more Irrigation applications (dd-mmm or dd-mmm-yyyy) as a list with a space between dates
          # Irrigation parameters
          amount = 25  # Amount of irrigation to apply (mm)
          eff = 1.0  # Irrigation efficiency (0-1)
          script: same as in Martonvasar_2013_WD.paddock.Manager folder.Irrigate on dateVeg
      surfaceom surface organic matter -> /Simulations/Graneros_2013/paddock/surface organic matter
      maize -> /Simulations/Graneros_2013/paddock/maize
      outputfile: filename=Cadriano_2012_WW_WD.out; title=Cadriano_2012_WW_WD
        variables My Variables: same as Nerac_2013_WD.paddock.outputfile.My Variables
      manager Calculator -> /Simulations/Graneros_2013/paddock/Calculator
  simulation Graneros_2013 -> /Simulations/Nerac_2012
    clock
      start_date = 10/11/2013  # Enter the start date of the simulation
      end_date = 08/04/2014  # Enter the end date of the simulation
    metfile met: filename=%apsim%\Model\Met\Graneros_2013.met
    area paddock -> /Simulations/Nerac_2012/paddock
      Soil Deep_soil_MH: Latitude=0; Longitude=0
        Water
          Thickness  BD    AirDry  LL15   DUL    SAT   KS
          200        1.48  0.137   0.147  0.3    0.35  184
          200        1.53  0.133   0.143  0.294  0.35  145
          200        1.56  0.126   0.136  0.282  0.35  145
          200        1.58  0.124   0.134  0.274  0.35  146
          200        1.56  0.142   0.152  0.294  0.35  108
          100        1.56  0.142   0.152  0.294  0.35  108
          SoilCrop maize: LL=[0.147, 0.143, 0.19, 0.22, 0.26, 0.26]; KL=[0.08, 0.08, 0.08, 0.08, 0.06, 0.06]; XF=[1, 1, 1, 1, 1, 1]
        SoilWater: SummerCona=1.5; SummerU=6; SummerDate=1-Nov; WinterCona=1.5; WinterU=6; WinterDate=1-Apr; DiffusConst=88; DiffusSlope=35; Salb=0.13; CN2Bare=81; CNRed=1; CNCov=0.2; Thickness=[200, 200, 200, 200, 200, 100]; SWCON=[0.5, 0.5, 0.5, 0.5, 0.5, 0.5]
        SoilOrganicMatter: RootCN=45; RootWt=1000; SoilCN=14.5; EnrACoeff=7.4; EnrBCoeff=0.2; OCUnits=Total
          Thickness  OC    FBiom  FInert
          200        1.3   0.03   0.3
          200        0.65  0.01   0.4
          200        0.32  0      0.5
          200        0.11  0      0.7
          200        0.11  0      0.9
          100        0.11  0      1
        Analysis: Thickness=[200, 200, 200, 200, 200, 100]; PH=[8, 8, 8, 8, 8, 8]; PHUnits=Water; BoronUnits=HotWater
        InitialWater Initial water: FractionFull=1; PercentMethod=EvenlyDistributed; RelativeTo=ll15
        Sample Initial nitrogen: Date=14/05/2011; NO3Units=kgha; NH4Units=kgha; SWUnits=Volumetric; OCUnits=Total; PHUnits=Water
          Thickness  NO3  NH4
          200        46   4
          200        46   1.89
          200        36   1.43
          200        20   1.144
          200        18   1.152
          100        16   0.432
      folder Manager folder -> /Simulations/Nerac_2012/paddock/Manager folder
        manager Sow on a fixed date
          #
          date = 13/11/2013  # Enter sowing date (dd-mmm)
          #
          crop = maize  # Enter name of crop to sow
          density = 8.5  # Enter sowing density (plants/m2)
          depth = 30  # Enter sowing depth (mm)
          cultivar = B73  # Enter cultivar
          class = plant  # Enter crop growth class
          row_spacing = 800  # Enter row spacing (mm)
          on start_of_day:
          script: same as in Martonvasar_2013_WD.paddock.Manager folder.Sow on a fixed date
        manager Fertilise N at sowing: same as Martonvasar_2013_WD.paddock.Manager folder.Fertilise N at sowing
        manager Harvesting rule (disabled)
          # Harvesting criteria
          crop = maize  # Enter name of crop to harvest when ripe
          on end_of_day:
          script: same as in Nerac_2012.paddock.Manager folder.Harvesting rule
        irrigation
          automatic_irrigation = on
          asw_depth = 230  # Depth to which ASW is calculated. (mm)
          crit_fr_asw = 0.8  # Fraction of ASW below which irrigation is applied (0-1.0)
          irrigation_efficiency = 1  # Efficiency of the irrigation. (0-1.0)
          irrigation_allocation = off  # Allocation limits
          allocation = 0  # Allocation in mm
          default_no3_conc = 0.0  # Nitrate concentration (ppm N)
          default_nh4_conc = 0.0  # Ammonium concentration (ppm N)
          default_cl_conc = 0.0  # Chloride concentration (ppm Cl)
        manager End crop on a fixed date
          # Harvesting criteria
          crop = maize  # Enter name of crop to harvest when ripe
          date = 08/04/2014  # Enter ending date (dd-mmm)
          on end_of_day:
          script: same as in Martonvasar_2013_WD.paddock.Manager folder.End crop on a fixed date
      maize -> /Simulations/Nerac_2012/paddock/maize
        maizeConstants standard
          crop_type = maize
          default_crop_class = plant
          stage_names = sowing germination emergence end_of_juvenile floral_initiation flag_leaf flowering start_grain_fill end_grain_fill maturity harvest_ripe end_crop
          phase_names = sowing germination emergence end_of_juvenile floral_initiation flag_leaf flowering start_grain_fill end_grain_fill maturity harvest_ripe end_crop
          phase_type = generic generic    generic   generic         generic           generic   generic   generic          generic        generic  generic      generic
          stage_code = 1   2   3    4      5     6     7    8    9    10   11   12
          pesw_germ = 0.0  # plant extractable soil water in seedling layer inadequate for germination (mm/mm)
          shoot_lag = 15.0  # Time lag before linear coleoptile growth starts (deg days)
          shoot_rate = 0.60  # Growing deg day increase with depth for coleoptile (deg day/mm depth)
          fasw_emerg = 0.0  1.0  # Fraction of available soil water
          rel_emerg_rate = 1.0  1.0  # Stress factor for thermal time calculation between germination and emergence
          twilight = -6.0  # Twilight is defined as the interval between sunrise or sunset and the time when the true
          x_temp = 0  18.0 26.0 34.0 44.0  # cardinal temps.
          y_tt = 0  10.0 18.0 26.0  0.0  # thermal time
          leaf_no_at_emerg = 0.5  # (expanded) leaf number at emergence ()
          leaf_no_seed = 6.0  # number of leaf primordia present in seed
          leaf_no_min = 5.0  # minimum leaf number
          leaf_no_max = 40  # maximum leaf number
          leaf_init_rate = 23.2  # degree days to initiate each leaf primordium until floral init (deg day)
          leaf_app_rate1 = 65.0
          leaf_app_rate2 = 36.0
          leaf_app_rate3 = 36.0
          leaf_no_rate_change1 = 8
          leaf_no_rate_change2 = 3
          rue = 0   0  1.69 1.69  1.69  1.69 1.69 1.69  1.69   1.69   0    0
          row_spacing_default = 1.0
          skiprow_default = 0
          x_row_spacing = 0.20   0.50   1.00  # Row spacing
          y_extinct_coef = 0.70   0.50   0.50  # extinction coefficient for green leaf
          y_extinct_coef_dead = 0.3    0.3    0.3  # extinction coefficient for dead material
          x_ave_temp = 8 15 35 50  # mean daily temperature
          y_stress_photo = 0  1  1  0  # multiplier on RUE
          dm_leaf_init = 0.01  # leaf weight at emergence (g/plant)
          dm_root_init = 0.01  # root weight at emergence (g/plant)
          dm_stem_init = 0.01  # stem weight at emergence (g/plant)
          stem_trans_frac = 0.20  # fraction of stem used in translocation to grain - not used for i_wheat option
          leaf_trans_frac = 0.15  # fraction of leaf used in translocation to grain
          retransRate = 0.15
          ratio_root_shoot = 0   0   1    1     0.33  0.33  0.087 0    0     0    0    0
          partition_rate_leaf = 0.0182  # coefficient of sigmoidal function between leaf partition fraction and internode no**2 (0-1)
          frac_stem2flower = 0.17  # fraction of dm allocated to stem that goes to developing head
          PGRt0 = 130
          PGRt1 = 260
          PGRbase = 1.2
          GNk = 0.83
          GrainTempWindow = -150 50
          GrainTempOrdinals = 36 40
          grn_water_cont = 0.155  # water content of grain g/g
          leaf_no_correction = 2.0  # corrects for other growing leaves
          x_lai = 0.1    4
          y_lai_sla_max = 50000 25000  # maximum specific leaf area for delta LAI
          lai_sla_min = 8000  8000  # minimum specific leaf area for delta LAI
          initial_tpla = 380
          root_depth_rate = 0  10    15    33     33    33    33   0      0       0    0    0
          x_sw_ratio = 0.1 0.5  # water availability for effects on root depth growth
          y_sw_fac_root = 0   1  # stress factor for root depth growth, This may be probably the same for all crops
          initial_root_depth = 50  # initial depth of roots (mm)
          specific_root_length = 100000
          x_plant_rld = 0   0.0001  0.0003  # root branching
          y_rel_root_rate = 0.02  0.10  1.0
          transp_eff_cf = 0.009 0.009 0.009 0.009 0.009  0.009  0.009   0.009  0.009  0.009  0.009  0.009
          svp_fract = 0.75  # (0-1)
          x_sw_demand_ratio = 0.5 1.1  # water availability
          y_swdef_leaf = 0   1  # stress indices
          x_sw_avail_ratio = 0 0.16  # water availability
          y_swdef_pheno = 0 1  # stress index for phenology
          n_supply_preference = active
          no3_diffn_const = 2.0
          maxUptakeRate = 0.029
          initialRootNConc = 0.020
          targetRootNConc = 0.002
          initialLeafSLN = 1.7
          targetLeafSLN = 1.7
          newLeafSLN = 1.1
          senescedLeafSLN = 0.3
          leafDilnNSlope = 0.0037
          leafDilnNInt = -0.0015
          initialStemNConc = 0.01
          x_stem_n = 3         5       7         10
          targetStemNConc = 0.04   0.04   0.01      0.005
          structStemNConc = 0.0045  0.0045   0.0021   0.0021
          stemDilnNSlope = 0.005
          stemDilnNInt = -0.00052
          initialRachisNConc = 0.000
          targetRachisNConc = 0.01
          structRachisNConc = 0.0021
          rachisDilnNSlope = 0.005
          rachisDilnNInt = -0.00052
          grainNFillRate = 0.01
          targetGrainNConc = 0.0143
          nUptakeCease = 523
          nSupplyFrac = 5
          dm_root_sen_frac = 0.002  # fraction of root dry matter senesced each day
          leaf_no_dead_const = -0.025  # coefficients for rate of leaf number senescence following flowering
          leaf_no_dead_slope = 0.00035
          lai_sen_light = 4.0  # induced senescence occurs (m^2/m^2)
          sen_light_slope = 0.008  # sensitivity of leaf area senescence to shading
          x_temp_senescence = -2.0 2.0  # minimum temperature for frost senescence table (oC)
          y_senescence_fac = 1   0  # daily fraction of leaf area senesced due to frost (0-1)
          sen_rate_water = 0.05  # slope in linear eqn relating soil water stress during photosynthesis to leaf senesence rate
          sen_light_time_const = 10.0  # delay factor for light senescence
          sen_radn_crit = 2  # radiation level for onset of light senescence
          frost_kill = -3.0  # temperature threshold for leaf death
          sen_water_time_const = 10.0  # delay factor for water senescence
          sen_threshold = 0.25  # supply:demand ratio for onset of water senescence
          tt_emerg_limit = 150.0  # maximum degree days allowed for emergence to take place
          stress_determinants = leaf stem grain
          yield_parts = grain  # energy
          retrans_parts = leaf stem  flower  # MEP added leaf and flower
          pfact_photo_slope = 2.5  # 2.0 !1.0
          pfact_expansion_slope = 2.5
          pfact_pheno_slope = 6  # 10 !20
          pfact_grain_slope = 20
          p_uptake_factor = 1.5  # factor to calc total P uptake from demand for today's growth
          x_p_stage_code = 3       4      5      6      7      8      10
          y_p_conc_max_leaf = 0.0045  0.0045 0.004  0.0025 0.0025 0.0024 0.0024
          y_p_conc_min_leaf = 0.003   0.003  0.0029 0.0011 0.0011 0.0008 0.0006
          y_p_conc_sen_leaf = 0.0005  0.0005 0.0005 0.0005 0.0005 0.0005 0.0005
          y_p_conc_max_stem = 0.0045   0.0045 0.003  0.0011  0.001  0.0007 0.0007
          y_p_conc_min_stem = 0.003    0.003  0.002  0.0006 0.0006 0.0002 0.0002
          y_p_conc_sen_stem = 0.0002  0.0002 0.0002 0.0002 0.0002 0.0002 0.0002
          y_p_conc_max_root = 0.0010  0.0010 0.0010 0.0010 0.0010 0.0010 0.0010  # assume P conc in roots non-varying
          y_p_conc_min_root = 0.0010  0.0010 0.0010 0.0010 0.0010 0.0010 0.0010
          y_p_conc_sen_root = 0.0010  0.0010 0.0010 0.0010 0.0010 0.0010 0.0010
          y_p_conc_max_flower = 0.0045  0.0045  0.003  0.0011  0.001  0.0007 0.0007  # assumed same as stem
          y_p_conc_min_flower = 0.003   0.003   0.002  0.0006 0.0006 0.0002 0.0002
          y_p_conc_sen_flower = 0.0002  0.0002 0.0002 0.0002 0.0002 0.0002 0.0002
          y_p_conc_max_grain = 0.001   0.001  0.001  0.001  0.001  0.0030  0.0030  # based on Mallarino (1996)
          y_p_conc_min_grain = 0.001   0.001  0.001  0.001  0.001  0.0015  0.0015  # based on Kenya data
          y_p_conc_sen_grain = 0.001   0.001  0.001  0.001  0.001  0.0015  0.0015
          y_p_conc_max_energy = 0.001   0.001  0.001  0.001  0.001  0.001  0.001
          y_p_conc_min_energy = 0.001   0.001  0.001  0.001  0.001  0.001  0.001
          y_p_conc_sen_energy = 0.001   0.001  0.001  0.001  0.001  0.001  0.001
          p_conc_init_leaf = 0.0045
          p_conc_init_stem = 0.0045
          p_conc_init_root = 0.0010  # 0.0014
          p_conc_init_flower = 0.0045
          p_conc_init_grain = 0.0030
          p_conc_init_energy = 0.0
          ll_ub = 1000.0  # upper limit of lower limit
          kl_ub = 1.0  # upper limit of water uptake factor
          minsw = 0.00001  # lowest acceptable value for ll
          year_ub = 2000  # year upper limit
          year_lb = 1800  # year lower limit
          latitude_ub = 90  # latitude upper limit
          latitude_lb = -90  # latitude lower limit
          maxt_ub = 55  # max. temperature upper limit
          maxt_lb = -50  # max. temperature lower limit
          mint_ub = 40  # min. temperature upper limit
          mint_lb = -50  # min. temperature lower limit
          radn_ub = 50  # radiation upper limit
          radn_lb = 1  # radiation lower limit
          dlayer_ub = 1000  # layer depth upper limit
          dlayer_lb = 0  # layer depth lower limit
          sat_dep_ub = 1000  # saturated water content upper limit
          sat_dep_lb = 0  # saturated water content upper limit
          dul_dep_ub = 1000  # drained upper limit upper limit
          dul_dep_lb = 0  # drained upper limit lower limit
          sw_dep_ub = 1000  # soil water upper limit
          sw_dep_lb = 0  # soil water lower limit
          no3_ub = 10000  # soil nitrate upper limit
          no3_lb = 0  # soil nitrate lower limit
          no3_min_ub = 10000  # min. soil nitrate upper limit
          no3_min_lb = 0  # min. soil nitrate lower limit
          nh4_ub = 10000  # soil nitrate upper limit
          nh4_lb = 0  # soil nitrate lower limit
          nh4_min_ub = 10000  # min. soil nitrate upper limit
          nh4_min_lb = 0  # min. soil nitrate lower limit
          head_grain_no_max_ub = 1000.0
          grain_gth_rate_ub = 20.0
          tt_emerg_to_endjuv_ub = 500.0
          tt_flower_to_maturity_ub = 1000.0
          tt_maturity_to_ripe_ub = 1000.0
          tt_flower_to_start_grain_ub = 1000.0
          tt_flag_to_flower_ub = 1000.0
          x_stem_wt = 0    80  # look up table for canopy height
          y_height = 0  2000  # plant canopy height
          canopy_height_max = 3000.0
          x_co2_te_modifier = 350.0
          y_co2_te_modifier = 1.0
          RootAngle = 45  # Root Angle (45 degrees)
          pmax = 2.07021
          n0 = 0.1968
          alpha = 2.5662
          BiomassConv = 0.409
          ScatterCoef = 0.15
          LeafAngles = 60 60 60 60 60
          SlnHeadPc = 10
          frequencyS = 60
          maxFlux = 0.8
          x_sw_ear_demand_ratio = 0.5 1.6
          y_swdef_ear = 0   1
          maxTrans = 0.75
          maxtransEffect = 0.5
          LeafClass = LER
          GrainClass = LER
          Radiation = Classic  # Radiation interception method
          HydCondLimitMechanism = Roots  # Mechanism for limiting hydraulic conductance
          maxNumStrikes = 3  # Max Number of Strikes for silking Cohort model
          GrainTempWindow = -50 100
          GrainHiTemperature = 33 36 39  # Grain High Temperature
          GrainStressSeverity = 0.00 0.00 0.45  # Severity of seed set stress
          aX0 = 0.67  # Largest leaf position multiplier
          largestLeafParams = 1000  -1.17 0.047  # Largest Leaf Area Params
          bellCurveParams = -0.009 -0.2 0.0006 -0.43  # Leaf Curve Params
      outputfile: filename=Graneros_2013.out; title=Graneros_2013
        variables My Variables: same as Gaillac_2012.paddock.outputfile.My Variables
  simulation Graneros_2013_WD -> /Simulations/Graneros_2013
    area paddock -> /Simulations/Graneros_2013/paddock
      Soil Deep_soil_MH: Latitude=0; Longitude=0
        Water
          Thickness  BD    AirDry  LL15   DUL    SAT   KS
          200        1.48  0.137   0.147  0.3    0.35  184
          200        1.53  0.133   0.143  0.294  0.35  145
          200        1.56  0.126   0.136  0.282  0.35  145
          200        1.58  0.124   0.134  0.274  0.35  146
          200        1.56  0.136   0.146  0.293  0.35  110
          200        1.56  0.142   0.152  0.294  0.35  108
          SoilCrop maize: LL=[0.147, 0.143, 0.19, 0.22, 0.23, 0.26]; KL=[0.08, 0.08, 0.08, 0.08, 0.07, 0.06]; XF=[1, 1, 1, 1, 1, 1]
        SoilWater: SummerCona=1.5; SummerU=6; SummerDate=1-Nov; WinterCona=1.5; WinterU=6; WinterDate=1-Apr; DiffusConst=88; DiffusSlope=35; Salb=0.13; CN2Bare=81; CNRed=1; CNCov=0.2; Thickness=[200, 200, 200, 200, 200, 200]; SWCON=[0.5, 0.5, 0.5, 0.5, 0.5, 0.5]
        SoilOrganicMatter: RootCN=45; RootWt=1000; SoilCN=14.5; EnrACoeff=7.4; EnrBCoeff=0.2; OCUnits=Total
          Thickness  OC    FBiom  FInert
          200        1.3   0.03   0.3
          200        0.65  0.01   0.4
          200        0.32  0      0.5
          200        0.11  0      0.7
          200        0.11  0      0.9
          200        0.11  0      1
        Analysis: Thickness=[200, 200, 200, 200, 200, 200]; PH=[8, 8, 8, 8, 8, 8]; PHUnits=Water; BoronUnits=HotWater
        InitialWater Initial water -> /Simulations/Graneros_2013/paddock/Deep_soil_MH/Initial water
        Sample Initial nitrogen: Date=14/05/2011; NO3Units=kgha; NH4Units=kgha; SWUnits=Volumetric; OCUnits=Total; PHUnits=Water
          Thickness  NO3  NH4
          200        46   4
          200        46   1.89
          200        36   1.43
          200        20   1.144
          200        18   1.152
          200        16   0.432
      folder Manager folder -> /Simulations/Graneros_2013/paddock/Manager folder
        manager Sow on a fixed date: same as Graneros_2013.paddock.Manager folder.Sow on a fixed date
        irrigation
          automatic_irrigation = on
          asw_depth = 60  # Depth to which ASW is calculated. (mm)
          crit_fr_asw = 1  # Fraction of ASW below which irrigation is applied (0-1.0)
          irrigation_efficiency = 1  # Efficiency of the irrigation. (0-1.0)
          irrigation_allocation = off  # Allocation limits
          allocation = 0  # Allocation in mm
          default_no3_conc = 0.0  # Nitrate concentration (ppm N)
          default_nh4_conc = 0.0  # Ammonium concentration (ppm N)
          default_cl_conc = 0.0  # Chloride concentration (ppm Cl)
        manager2 Irrigate on date
          # Irrigation will be applied on the date(s) below
          sameDays = yes  # Apply Irrigation on the same day(s) each year? (yes/no) - if "no" then must include the year of application below
          irrigDatesStr = 18-nov 08-dec30-dec  # Dates for one or more Irrigation applications (dd-mmm or dd-mmm-yyyy) as a list with a space between dates
          # Irrigation parameters
          amount = 40  # Amount of irrigation to apply (mm)
          eff = 1.0  # Irrigation efficiency (0-1)
          script: same as in Martonvasar_2013_WD.paddock.Manager folder.Irrigate on dateVeg
        manager2 Irrigate on PC1
          # Irrigation will be applied on the date(s) below
          sameDays = yes  # Apply Irrigation on the same day(s) each year? (yes/no) - if "no" then must include the year of application below
          irrigDatesStr = 08-jan 16-jan  # Dates for one or more Irrigation applications (dd-mmm or dd-mmm-yyyy) as a list with a space between dates
          # Irrigation parameters
          amount = 25  # Amount of irrigation to apply (mm)
          eff = 1.0  # Irrigation efficiency (0-1)
          script: same as in Martonvasar_2013_WD.paddock.Manager folder.Irrigate on dateVeg
        manager2 Irrigate on PC2
          # Irrigation will be applied on the date(s) below
          sameDays = yes  # Apply Irrigation on the same day(s) each year? (yes/no) - if "no" then must include the year of application below
          irrigDatesStr = 25-jan 28-jan 05-feb  # Dates for one or more Irrigation applications (dd-mmm or dd-mmm-yyyy) as a list with a space between dates
          # Irrigation parameters
          amount = 20  # Amount of irrigation to apply (mm)
          eff = 1.0  # Irrigation efficiency (0-1)
          script: same as in Martonvasar_2013_WD.paddock.Manager folder.Irrigate on dateVeg
        manager2 Irrigate on GF
          # Irrigation will be applied on the date(s) below
          sameDays = yes  # Apply Irrigation on the same day(s) each year? (yes/no) - if "no" then must include the year of application below
          irrigDatesStr = 13-feb 24-feb 10-mar 20-mar  # Dates for one or more Irrigation applications (dd-mmm or dd-mmm-yyyy) as a list with a space between dates
          # Irrigation parameters
          amount = 20  # Amount of irrigation to apply (mm)
          eff = 1.0  # Irrigation efficiency (0-1)
          script: same as in Martonvasar_2013_WD.paddock.Manager folder.Irrigate on dateVeg
      outputfile: filename=Graneros_2013_WD.out; title=Graneros_2013_WD
        variables My Variables: same as Karlsruhe_2012_WD.paddock.outputfile.My Variables
  simulation Niederhergheim_2014
    clock
      start_date = 05/05/2014  # Enter the start date of the simulation
      end_date = 30/10/2014  # Enter the end date of the simulation
    summaryfile
    metfile met: filename=D:\SAP-LEPSE\APSIM\1. Met\Niederhergheim_2014_Santi.prn
    area paddock
      Soil Niederhergheim_LN: Latitude=0; Longitude=0
        Water
          Thickness  BD    AirDry  LL15       DUL         SAT   KS
          250        1.5   0.09    0.1173615  0.29692965  0.32  184
          200        1.55  0.08    0.091585   0.241405    0.29  145
          150        1.5   0.08    0.0929937  0.21911655  0.26  145
          150        1.5   0.09    0.1345914  0.28452645  0.3   145
          SoilCrop maize: LL=[0.147, 0.143, 0.19, 0.19]; KL=[0.08, 0.08, 0.08, 0.08]; XF=[1, 1, 1, 1]
        SoilWater: SummerCona=1.5; SummerU=6; SummerDate=1-Nov; WinterCona=1.5; WinterU=6; WinterDate=1-Apr; DiffusConst=88; DiffusSlope=35; Salb=0.13; CN2Bare=81; CNRed=1; CNCov=0.2; Thickness=[250, 200, 150, 150]; SWCON=[0.5, 0.5, 0.5, 0.5]
        SoilOrganicMatter: RootCN=45; RootWt=1000; SoilCN=5.8; EnrACoeff=7.4; EnrBCoeff=0.2; OCUnits=Total
          Thickness  OC   FBiom  FInert
          250        2    0.03   0.3
          200        0.4  0.015  0.6
          150        0.3  0.01   0.9
          150        0.1  0      1
        Analysis: PHUnits=Water; BoronUnits=HotWater
          Thickness  PH    ParticleSizeSand  ParticleSizeSilt  ParticleSizeClay
          250        6.25  54.9              28.3              14.8
          200        6.65  62.6              26.5              10.5
          150        7     73.4              17.2              9.1
          150        5.5   42                41.7              16.2
        InitialWater Initial water: FractionFull=1; PercentMethod=EvenlyDistributed; RelativeTo=ll15
        Sample Initial nitrogen: Date=05/05/2014; NO3Units=kgha; NH4Units=kgha; SWUnits=Volumetric; OCUnits=Total; PHUnits=Water
          Thickness  NO3   NH4
          250        12.2  10.9
          200        20    2.7
          150        13.9  2
          150        6     2
      fertiliser
      manager Calculator
      folder Manager folder
        manager Sow on a fixed date
          #
          date = 05-may  # Enter sowing date (dd-mmm)
          #
          crop = maize  # Enter name of crop to sow
          density = 6  # Enter sowing density (plants/m2)
          depth = 30  # Enter sowing depth (mm)
          cultivar = B73  # Enter cultivar
          class = plant  # Enter crop growth class
          row_spacing = 800  # Enter row spacing (mm)
          on start_of_day:
          script: same as in Martonvasar_2013_WD.paddock.Manager folder.Sow on a fixed date
        manager Fertilise N at sowing
        manager Harvesting rule (disabled)
          # Harvesting criteria
          crop = maize  # Enter name of crop to harvest when ripe
          on end_of_day:
          script: same as in Nerac_2012.paddock.Manager folder.Harvesting rule
        irrigation
          automatic_irrigation = off
          asw_depth = 750  # Depth to which ASW is calculated. (mm)
          crit_fr_asw = 1  # Fraction of ASW below which irrigation is applied (0-1.0)
          irrigation_efficiency = 1  # Efficiency of the irrigation. (0-1.0)
          irrigation_allocation = off  # Allocation limits
          allocation = 0  # Allocation in mm
          default_no3_conc = 0.0  # Nitrate concentration (ppm N)
          default_nh4_conc = 0.0  # Ammonium concentration (ppm N)
          default_cl_conc = 0.0  # Chloride concentration (ppm Cl)
        manager End crop on a fixed date
          # Harvesting criteria
          crop = maize  # Enter name of crop to harvest when ripe
          date = 20-oct  # Enter ending date (dd-mmm)
          on end_of_day:
          script: same as in Martonvasar_2013_WD.paddock.Manager folder.End crop on a fixed date
        manager2 FertiliseOnFixedDates
          # Fertiliser will be applied on the date(s) below
          SameDays = yes  # Apply fertiliser on the same day(s) each year? (yes/no) - if "no" then must include the year of application below
          FertDatesStr = 13-may  # Dates for one or more fertiliser applications (dd-mmm or dd-mmm-yyyy) as a list with a space between dates
          # Test for the mineral N in the soil and don't apply the fertiliser if greater than X kgN/ha is stored in the soil above a depth of Y mm
          UseSoilN = yes  # Use a critical soil mineral N to prevent application above a threshold? (yes/no)
          FertAmtCriteria = 50  # Don't add fertiliser if N in the soil to the depth below exceeds (kg/ha)
          FertDepthCriteria = 75  # Depth to which the amount of N in the soil should be calculated (mm)
          # Fertiliser application details
          FertDepth = 50  # Depth at which to apply the fertiliser (mm)
          FertAmt = 134.1  # Annual fertiliser addition (kg N /ha) - assumes an even split between applications (if more than one application date)
          FertType = urea_n  # Fertiliser type - select from the list
```vb
Imports System
Imports ModelFramework

Public Class Script 
   <Link()> Dim MyPaddock As Paddock
   <Link()> Dim Fert As Fertiliser
   
   'Parameters - user inputs from the Properties tab
   <Param> Private FertDatesStr() As String     'The array of fertiliser "dates" as a atring array of dd-mmm's 
   <Param> Private SameDays As String           'Yes/No as to whether the fertiliser should be applied every year - if no then will only be on the dd-mmm-yyyy in FertDates
   <Param> Private UseSoilN As String           'Yes/No as to whether to use the soil mineral N stored to further control the fertiliser application
   <Param> Private FertAmtCriteria As Single    'Don't apply fertiliser if the N stored in the soil is greater than this.  Disregard the test if the value is -ve
   <Param> Private FertDepthCriteria As Single  'Depth in the soil to calculate the N storage
   <Param> Private FertDepth As Single          'Depth in the soil that the fertilser will be applied
   <Param> Private FertAmt As Single            'Total annual application - needs to be split up between the various application dates listed
   <Param> Private FertType As String           'Type of fertliser to apply
   
   'Inputs - got by this Manager from elsewhere in APSIM
   <Input> Private Today As DateTime            'Today's date from APSIM 
   <Input> Private dlayer As Single()           'Array of soil layer thicknesses - for calculation of mineral N in the soil
   <Input> Private no3 As Single()              'Array of nitrate-N (kg N /ha) for each soil layer - for calculation of mineral N in the soil
   <Input> Private nh4 As Single()              'Array of ammonium-N (kg N /ha) for each soil layer - for calculation of mineral N in the soil
   <Input> Private urea As Single()             'Array of urea-N (kg N /ha) for each soil layer - for calculation of mineral N in the soil

   'Outputs - calculated by this Manager and available to be output by the user
   <Output> Private Add_fert As Boolean         'Test to see if Today is a day that fertiliser should be added
   <Output> Private FertCriteriaOK As Boolean   'Test to see if the criteria related to the amount of mineral N in the soil is satisfied
   <Output> Private CumSoilN As Single          'Mineral-N stored in the soil to a depth of FertDepthCriteria

   'Other variables that are calculated but not needed for outputs
   Private FertDates As Date()                  'Array to hold the application dates once converted to dates from the string
   Private LayerWeights As Single()             'Weigthing of each layer for FertAmtCriteria calculation


   <EventHandler()> Public Sub OnInit2()
      '"OnInit2" is an event handler gets called once at the start of the simulation 
      
      'Get the right length for the array of dates and then convert the strings of dd-mmm into proper dates - VB will assume the current year if it is not already supplied
      ReDim FertDates(FertDatesStr.length - 1)
      For i As Integer = 0 To FertDatesStr.Length - 1
         FertDates(i) = Date.Parse(FertDatesStr(i))
      Next

      'Calculate the application amount per application (user input was the total annaul application)
      FertAmt = FertAmt / FertDatesStr.length

   End Sub
   
   <EventHandler()> Public Sub OnPrepare()
      '"OnPrepare" is an event handler gets called once at the start of every day (before Prepare and Post) 
      
      'By default no fertiliser added today
      'Run through all the dates and see if any of the dd-mmm's match those for Today, if so then will add fertiliser provided that other criteria are met
      'If the use has selected "no" to applying on the same dates each year then also test for the current year
      Add_Fert = False                                                                     
      For i As Integer = 0 To FertDates.length - 1
         If SameDays.ToLower = "yes" Then
            If (FertDates(i).Day = Today.Day) And (FertDates(i).Month = Today.Month) Then
               Add_Fert = True
            End If         
         Else
            If (FertDates(i).Day = Today.Day) And (FertDates(i).Month = Today.Month) And (FertDates(i).Year = Today.Year) Then
               Add_Fert = True
            End If         
         End If
      Next
      
      'If the user has decided not to user a soil minerla N criteria then FertCriteriaOK is always true
      If UseSoilN.ToLower = "no" Then
         FertCriteriaOK = True
      Else
         CumSoilN = 0.0
         FertCriteriaOK = False

         'Set the number of elements in the LayerWeights array to equal the number of soil layers - do this here because erosion can change the layering
         'Then move through the array and assign a LayerWeighting from 0 to 1 quantifying what proportion of the soil and mineral N in this layer is above FertDepthCriteria
         ReDim LayerWeights(dlayer.length - 1)                
         Dim CumDepth As Single = 0.0
         For i As Integer = 0 To dlayer.Length - 1     
            CumDepth += dlayer(i)                      
            If CumDepth <= FertDepthCriteria Then
               LayerWeights(i) = 1.0                   
            ElseIf (CumDepth - dlayer(i)) <= FertDepthCriteria Then
               LayerWeights(i) = (FertDepthCriteria - (CumDepth - dlayer(i))) / dlayer(i)
            Else
               LayerWeights(i) = 0.0
            End If
         Next

         'Add up the no3, nh4 and urea (all already in kg N /ha) in each layer and multiply by the layer weighting to get the total mineral N to the set depth
         For i As Integer = 0 To dlayer.Length - 1     
            CumSoilN += (no3(i) + nh4(i) + urea(i)) * LayerWeights(i)                         
         Next

         'If there is less mineral N in the soil than FertAmtCriteria then it is OK to add fertiliser
         If CumSoilN <= FertAmtCriteria Then
            FertCriteriaOK = True                             
         End If
      End If

      'Only add the fertiliser if both conditions are true
      '"Fert.Apply" send the command to apply the specified amount of fertiliser at the specified depth of the specified type of fertiliser
      If Add_Fert And FertCriteriaOK Then
         Fert.Apply(FertAmt, FertDepth, FertType)
      End If
      
   End Sub

End Class
```
        manager2 Irrigate on date
          # Irrigation will be applied on the date(s) below
          sameDays = yes  # Apply Irrigation on the same day(s) each year? (yes/no) - if "no" then must include the year of application below
          irrigDatesStr = 21-apr 20-may 14-jun 23-jun  # Dates for one or more Irrigation applications (dd-mmm or dd-mmm-yyyy) as a list with a space between dates
          # Irrigation parameters
          amount = 23  # Amount of irrigation to apply (mm)
          eff = 1.0  # Irrigation efficiency (0-1)
          script: same as in Martonvasar_2013_WD.paddock.Manager folder.Irrigate on dateVeg
      surfaceom surface organic matter
        PoolName = maize  # Organic Matter pool name
        type = maize  # Organic Matter type
        mass = 0  # Initial surface residue (kg/ha)
        cnr = 80  # C:N ratio of initial residue
        standing_fraction = 0  # Fraction of residue standing
      maize -> /Simulations/Graneros_2013/paddock/maize
      outputfile: filename=Niederhergheim_2014.out; title=Niederhergheim_2014
        variables My Variables
          variables: DaysAfterSowing, Stage, stagename, LeafNo, TT, yield, Biomass, GrainNo, GrainSize, maxlai, LAI, ESW, SLN, WaterSD, HI, TPLA, Height, vpd, actual_te, sw_uptake(), leaflength(1), leaflength(2), leaflength(3), leaflength(4), leaflength(5), leaflength(6), leaflength(7), leaflength(8), leaflength(9), leaflength(10), leaflength(11), leaflength(12), leaflength(13), leaflength(14), leaflength(15), leaflength(16), leafwidth(1), leafwidth(2), leafwidth(3), leafwidth(4), leafwidth(5), leafwidth(6), leafwidth(7), leafwidth(8), leafwidth(9), leafwidth(10), leafwidth(11), leafwidth(12), leafwidth(13), leafwidth(14), leafwidth(15), leafwidth(16), nInitLeaves, nLeafTips, nLeafExp, nLeafFullyExp, nLigules, LER, dlt_dm_green, dltDmGreen, RADi, TLeaf, radn_int, GrainLossTnight, MeanTnight, transp_eff
  simulation Niederhergheim_2014_WD
    clock
      start_date = 01/04/2014  # Enter the start date of the simulation
      end_date = 11/11/2014  # Enter the end date of the simulation
    summaryfile
    metfile met: filename=D:\SAP-LEPSE\APSIM\1. Met\Niederhergheim_2014_Santi.prn
    area paddock
      Soil Niederhergheim: Latitude=0; Longitude=0
        Water
          Thickness  BD    AirDry  LL15       DUL         SAT   KS
          250        1.5   0.09    0.1173615  0.29692965  0.32  184
          200        1.55  0.08    0.091585   0.241405    0.29  145
          150        1.5   0.08    0.0929937  0.21911655  0.26  145
          250        1.5   0.09    0.1345914  0.28452645  0.3   145
          SoilCrop maize: LL=[0.147, 0.143, 0.19, 0.19]; KL=[0.08, 0.08, 0.08, 0.08]; XF=[1, 1, 1, 1]
        SoilWater: SummerCona=1.5; SummerU=6; SummerDate=1-Nov; WinterCona=1.5; WinterU=6; WinterDate=1-Apr; DiffusConst=88; DiffusSlope=35; Salb=0.13; CN2Bare=81; CNRed=1; CNCov=0.2; Thickness=[250, 200, 150, 250]; SWCON=[0.5, 0.5, 0.5, 0.5]
        SoilOrganicMatter: RootCN=45; RootWt=1000; SoilCN=5.8; EnrACoeff=7.4; EnrBCoeff=0.2; OCUnits=Total
          Thickness  OC   FBiom  FInert
          250        2    0.03   0.3
          200        0.4  0.015  0.6
          150        0.3  0.01   0.9
          250        0.1  0      1
        Analysis: PHUnits=Water; BoronUnits=HotWater
          Thickness  PH    ParticleSizeSand  ParticleSizeSilt  ParticleSizeClay
          250        6.25  54.9              28.3              14.8
          200        6.65  62.6              26.5              10.5
          150        7     73.4              17.2              9.1
          250        5.5   42                41.7              16.2
        InitialWater Initial water: FractionFull=1; PercentMethod=EvenlyDistributed; RelativeTo=ll15
        Sample Initial nitrogen: Date=01/04/2014; NO3Units=kgha; NH4Units=kgha; SWUnits=Volumetric; OCUnits=Total; PHUnits=Water
          Thickness  NO3   NH4
          250        12.2  10.9
          200        18.3  3.7
          150        15    1
          250        18.6  3
      fertiliser
      manager Calculator
      folder Manager folder
        manager Sow on a fixed date
          #
          date = 06-may  # Enter sowing date (dd-mmm)
          #
          crop = maize  # Enter name of crop to sow
          density = 6  # Enter sowing density (plants/m2)
          depth = 30  # Enter sowing depth (mm)
          cultivar = B73  # Enter cultivar
          class = plant  # Enter crop growth class
          row_spacing = 800  # Enter row spacing (mm)
          on start_of_day:
          script: same as in Martonvasar_2013_WD.paddock.Manager folder.Sow on a fixed date
        manager Fertilise N at sowing
        manager Harvesting rule (disabled)
          # Harvesting criteria
          crop = maize  # Enter name of crop to harvest when ripe
          on end_of_day:
          script: same as in Nerac_2012.paddock.Manager folder.Harvesting rule
        irrigation
          automatic_irrigation = off
          asw_depth = 850  # Depth to which ASW is calculated. (mm)
          crit_fr_asw = 1  # Fraction of ASW below which irrigation is applied (0-1.0)
          irrigation_efficiency = 1  # Efficiency of the irrigation. (0-1.0)
          irrigation_allocation = off  # Allocation limits
          allocation = 0  # Allocation in mm
          default_no3_conc = 0.0  # Nitrate concentration (ppm N)
          default_nh4_conc = 0.0  # Ammonium concentration (ppm N)
          default_cl_conc = 0.0  # Chloride concentration (ppm Cl)
        manager End crop on a fixed date
          # Harvesting criteria
          crop = maize  # Enter name of crop to harvest when ripe
          date = 29-oct  # Enter ending date (dd-mmm)
          on end_of_day:
          script: same as in Martonvasar_2013_WD.paddock.Manager folder.End crop on a fixed date
        manager2 FertiliseOnFixedDates
          # Fertiliser will be applied on the date(s) below
          SameDays = yes  # Apply fertiliser on the same day(s) each year? (yes/no) - if "no" then must include the year of application below
          FertDatesStr = 13-may  # Dates for one or more fertiliser applications (dd-mmm or dd-mmm-yyyy) as a list with a space between dates
          # Test for the mineral N in the soil and don't apply the fertiliser if greater than X kgN/ha is stored in the soil above a depth of Y mm
          UseSoilN = yes  # Use a critical soil mineral N to prevent application above a threshold? (yes/no)
          FertAmtCriteria = 50  # Don't add fertiliser if N in the soil to the depth below exceeds (kg/ha)
          FertDepthCriteria = 75  # Depth to which the amount of N in the soil should be calculated (mm)
          # Fertiliser application details
          FertDepth = 2  # Depth at which to apply the fertiliser (mm)
          FertAmt = 134.1  # Annual fertiliser addition (kg N /ha) - assumes an even split between applications (if more than one application date)
          FertType = urea_n  # Fertiliser type - select from the list
          script: same as in Niederhergheim_2014.paddock.Manager folder.FertiliseOnFixedDates
        manager2 Irrigate on date
          # Irrigation will be applied on the date(s) below
          sameDays = yes  # Apply Irrigation on the same day(s) each year? (yes/no) - if "no" then must include the year of application below
          irrigDatesStr = 21-apr 14-jun 23-jun  # Dates for one or more Irrigation applications (dd-mmm or dd-mmm-yyyy) as a list with a space between dates
          # Irrigation parameters
          amount = 23  # Amount of irrigation to apply (mm)
          eff = 1.0  # Irrigation efficiency (0-1)
          script: same as in Martonvasar_2013_WD.paddock.Manager folder.Irrigate on dateVeg
      surfaceom surface organic matter
        PoolName = maize  # Organic Matter pool name
        type = maize  # Organic Matter type
        mass = 0  # Initial surface residue (kg/ha)
        cnr = 80  # C:N ratio of initial residue
        standing_fraction = 0  # Fraction of residue standing
      maize -> /Simulations/Graneros_2013/paddock/maize
      outputfile: filename=Niederhergheim_2014_WD.out; title=Niederhergheim_2014_WD
        variables My Variables: same as Niederhergheim_2014.paddock.outputfile.My Variables
  simulation Blois_2014
    clock
      start_date = 19/04/2014  # Enter the start date of the simulation
      end_date = 03/11/2014  # Enter the end date of the simulation
    summaryfile
    metfile met: filename=D:\SAP-LEPSE\APSIM\1. Met\Blois_2014_Santi.prn
    area paddock
      Soil Blois: Latitude=0; Longitude=0
        Water
          Thickness  BD         AirDry  LL15      DUL         SAT  KS
          250        1.387308   0.12    0.165     0.328823    0.4  184
          250        1.54712    0.14    0.262497  0.374036    0.4  145
          200        1.57577    0.14    0.266064  0.375759    0.4  145
          700        1.5248233  0.18    0.293655  0.38452174  0.4  145
          SoilCrop maize: LL=[0.147, 0.143, 0.19, 0.19]; KL=[0.08, 0.08, 0.08, 0.08]; XF=[1, 1, 1, 1]
        SoilWater: SummerCona=1.5; SummerU=6; SummerDate=1-Nov; WinterCona=1.5; WinterU=6; WinterDate=1-Apr; DiffusConst=88; DiffusSlope=35; Salb=0.13; CN2Bare=81; CNRed=1; CNCov=0.2; Thickness=[250, 250, 200, 700]; SWCON=[0.5, 0.5, 0.5, 0.5]
        SoilOrganicMatter: RootCN=45; RootWt=1000; SoilCN=6.9; EnrACoeff=7.4; EnrBCoeff=0.2; OCUnits=Total
          Thickness  OC   FBiom  FInert
          250        1.8  0.03   0.3
          250        0.7  0.015  0.6
          200        0.7  0.01   0.7
          700        0.1  0.005  0.9
        Analysis: PHUnits=Water; BoronUnits=HotWater
          Thickness  PH  ParticleSizeSand  ParticleSizeSilt  ParticleSizeClay
          250        7   10.4              63                26.6
          250        7   5.4               53                41.6
          200        7   5.4               53                41.6
          700        7   4.9               45                50
          999999     -   -                 -                 -
        InitialWater Initial water: FractionFull=1; PercentMethod=EvenlyDistributed; RelativeTo=ll15
        Sample Initial nitrogen: Date=07/05/2014; NO3Units=kgha; NH4Units=kgha; SWUnits=Volumetric; OCUnits=Total; PHUnits=Water
          Thickness  NO3  NH4
          250        5.7  1.6
          250        6.2  6.2
          200        5    4
          700        2    2
      fertiliser
      manager Calculator
        on init:
```
TT = 0
```
        on end_of_day:
```
TT = TT + DeltaTT
```
      folder Manager folder
        manager Sow on a fixed date
          #
          date = 08-may  # Enter sowing date (dd-mmm)
          #
          crop = maize  # Enter name of crop to sow
          density = 9.5  # Enter sowing density (plants/m2)
          depth = 30  # Enter sowing depth (mm)
          cultivar = B73  # Enter cultivar
          class = plant  # Enter crop growth class
          row_spacing = 800  # Enter row spacing (mm)
          on start_of_day:
          script: same as in Martonvasar_2013_WD.paddock.Manager folder.Sow on a fixed date
        manager Fertilise N at sowing: same as Martonvasar_2013.paddock.Manager folder.Fertilise N at sowing
        manager Harvesting rule (disabled)
          # Harvesting criteria
          crop = maize  # Enter name of crop to harvest when ripe
          on end_of_day:
          script: same as in Nerac_2012.paddock.Manager folder.Harvesting rule
        irrigation
          automatic_irrigation = on
          asw_depth = 1400  # Depth to which ASW is calculated. (mm)
          crit_fr_asw = 1  # Fraction of ASW below which irrigation is applied (0-1.0)
          irrigation_efficiency = 1  # Efficiency of the irrigation. (0-1.0)
          irrigation_allocation = off  # Allocation limits
          allocation = 0  # Allocation in mm
          default_no3_conc = 0.0  # Nitrate concentration (ppm N)
          default_nh4_conc = 0.0  # Ammonium concentration (ppm N)
          default_cl_conc = 0.0  # Chloride concentration (ppm Cl)
        manager End crop on a fixed date
          # Harvesting criteria
          crop = maize  # Enter name of crop to harvest when ripe
          date = 31-oct  # Enter ending date (dd-mmm)
          on end_of_day:
          script: same as in Martonvasar_2013_WD.paddock.Manager folder.End crop on a fixed date
        manager2 FertiliseOnFixedDates
          # Fertiliser will be applied on the date(s) below
          SameDays = no  # Apply fertiliser on the same day(s) each year? (yes/no) - if "no" then must include the year of application below
          FertDatesStr = 14-may-2014  # Dates for one or more fertiliser applications (dd-mmm or dd-mmm-yyyy) as a list with a space between dates
          # Test for the mineral N in the soil and don't apply the fertiliser if greater than X kgN/ha is stored in the soil above a depth of Y mm
          UseSoilN = yes  # Use a critical soil mineral N to prevent application above a threshold? (yes/no)
          FertAmtCriteria = 50  # Don't add fertiliser if N in the soil to the depth below exceeds (kg/ha)
          FertDepthCriteria = 75  # Depth to which the amount of N in the soil should be calculated (mm)
          # Fertiliser application details
          FertDepth = 50  # Depth at which to apply the fertiliser (mm)
          FertAmt = 92  # Annual fertiliser addition (kg N /ha) - assumes an even split between applications (if more than one application date)
          FertType = urea_n  # Fertiliser type - select from the list
          script: same as in Niederhergheim_2014.paddock.Manager folder.FertiliseOnFixedDates
        manager2 Irrigate on date
          # Irrigation will be applied on the date(s) below
          sameDays = yes  # Apply Irrigation on the same day(s) each year? (yes/no) - if "no" then must include the year of application below
          irrigDatesStr = 22-aug 05-sep  # Dates for one or more Irrigation applications (dd-mmm or dd-mmm-yyyy) as a list with a space between dates
          # Irrigation parameters
          amount = 28  # Amount of irrigation to apply (mm)
          eff = 1.0  # Irrigation efficiency (0-1)
          script: same as in Martonvasar_2013_WD.paddock.Manager folder.Irrigate on dateVeg
      surfaceom surface organic matter
        PoolName = maize  # Organic Matter pool name
        type = maize  # Organic Matter type
        mass = 0  # Initial surface residue (kg/ha)
        cnr = 80  # C:N ratio of initial residue
        standing_fraction = 0  # Fraction of residue standing
      maize -> /Simulations/Graneros_2013/paddock/maize
      outputfile: filename=Blois_2014.out; title=Blois_2014
        variables My Variables: same as Niederhergheim_2014.paddock.outputfile.My Variables
  simulation Blois_2014_WD
    clock
      start_date = 08/05/2014  # Enter the start date of the simulation
      end_date = 31/10/2014  # Enter the end date of the simulation
    summaryfile
    metfile met: filename=D:\SAP-LEPSE\APSIM\1. Met\Blois_2014_Santi.prn
    area paddock
      Soil Blois: Latitude=0; Longitude=0
        Water
          Thickness  BD         AirDry  LL15      DUL         SAT  KS
          250        1.387308   0.12    0.165424  0.35        0.4  184
          250        1.54712    0.13    0.18      0.374036    0.4  145
          200        1.57577    0.14    0.22      0.375759    0.4  145
          700        1.5248233  0.14    0.293655  0.38452174  0.4  145
          SoilCrop maize: LL=[0.147, 0.143, 0.19, 0.19]; KL=[0.08, 0.08, 0.08, 0.08]; XF=[1, 1, 1, 1]
        SoilWater: same as Blois_2014.paddock.Blois.SoilWater
        SoilOrganicMatter: RootCN=45; RootWt=1000; SoilCN=6.9; EnrACoeff=7.4; EnrBCoeff=0.2; OCUnits=Total
          Thickness  OC   FBiom  FInert
          250        1.8  0.03   0.3
          250        0.7  0.015  0.6
          200        0.7  0.01   0.7
          700        0.1  0.005  0.9
        Analysis: same as Blois_2014.paddock.Blois.Analysis
        InitialWater Initial water: FractionFull=1; PercentMethod=EvenlyDistributed; RelativeTo=ll15
        Sample Initial nitrogen: Date=07/05/2014; NO3Units=kgha; NH4Units=kgha; SWUnits=Volumetric; OCUnits=Total; PHUnits=Water
          Thickness  NO3  NH4
          250        5.7  1.6
          250        6.2  6.2
          200        5    4
          700        2    2
      fertiliser
      manager Calculator
      folder Manager folder
        manager Sow on a fixed date
          #
          date = 08/05/2014  # Enter sowing date (dd-mmm)
          #
          crop = maize  # Enter name of crop to sow
          density = 9.2  # Enter sowing density (plants/m2)
          depth = 30  # Enter sowing depth (mm)
          cultivar = B73  # Enter cultivar
          class = plant  # Enter crop growth class
          row_spacing = 800  # Enter row spacing (mm)
          on start_of_day:
          script: same as in Martonvasar_2013_WD.paddock.Manager folder.Sow on a fixed date
        manager Fertilise N at sowing
        manager Harvesting rule (disabled)
          # Harvesting criteria
          crop = maize  # Enter name of crop to harvest when ripe
          on end_of_day:
          script: same as in Nerac_2012.paddock.Manager folder.Harvesting rule
        irrigation
          automatic_irrigation = off
          asw_depth = 1400  # Depth to which ASW is calculated. (mm)
          crit_fr_asw = 1  # Fraction of ASW below which irrigation is applied (0-1.0)
          irrigation_efficiency = 1  # Efficiency of the irrigation. (0-1.0)
          irrigation_allocation = off  # Allocation limits
          allocation = 0  # Allocation in mm
          default_no3_conc = 0.0  # Nitrate concentration (ppm N)
          default_nh4_conc = 0.0  # Ammonium concentration (ppm N)
          default_cl_conc = 0.0  # Chloride concentration (ppm Cl)
        manager End crop on a fixed date
          # Harvesting criteria
          crop = maize  # Enter name of crop to harvest when ripe
          date = 31-oct  # Enter ending date (dd-mmm)
          on end_of_day:
          script: same as in Martonvasar_2013_WD.paddock.Manager folder.End crop on a fixed date
        manager2 FertiliseOnFixedDates
          # Fertiliser will be applied on the date(s) below
          SameDays = no  # Apply fertiliser on the same day(s) each year? (yes/no) - if "no" then must include the year of application below
          FertDatesStr = 14-may-2014  # Dates for one or more fertiliser applications (dd-mmm or dd-mmm-yyyy) as a list with a space between dates
          # Test for the mineral N in the soil and don't apply the fertiliser if greater than X kgN/ha is stored in the soil above a depth of Y mm
          UseSoilN = yes  # Use a critical soil mineral N to prevent application above a threshold? (yes/no)
          FertAmtCriteria = 50  # Don't add fertiliser if N in the soil to the depth below exceeds (kg/ha)
          FertDepthCriteria = 75  # Depth to which the amount of N in the soil should be calculated (mm)
          # Fertiliser application details
          FertDepth = 50  # Depth at which to apply the fertiliser (mm)
          FertAmt = 200  # Annual fertiliser addition (kg N /ha) - assumes an even split between applications (if more than one application date)
          FertType = urea_n  # Fertiliser type - select from the list
          script: same as in Niederhergheim_2014.paddock.Manager folder.FertiliseOnFixedDates
      surfaceom surface organic matter
        PoolName = maize  # Organic Matter pool name
        type = maize  # Organic Matter type
        mass = 0  # Initial surface residue (kg/ha)
        cnr = 80  # C:N ratio of initial residue
        standing_fraction = 0  # Fraction of residue standing
      maize -> /Simulations/Graneros_2013/paddock/maize
      outputfile: filename=Blois_2014_WD.out; title=Blois_2014_WD
        variables My Variables: same as Niederhergheim_2014.paddock.outputfile.My Variables
  simulation Satolas_2014
    clock
      start_date = 15/05/2014  # Enter the start date of the simulation
      end_date = 29/10/2014  # Enter the end date of the simulation
    summaryfile
    metfile met: filename=D:\SAP-LEPSE\APSIM\1. Met\Satolas_2014_Santi.prn
    area paddock
      Soil Satolas: Latitude=0; Longitude=0
        Water
          Thickness  BD   AirDry  LL15        DUL         SAT   KS
          250        1    0.05    0.06        0.15        0.2   184
          450        1.1  0.09    0.118       0.227       0.25  145
          270        1.1  0.09    0.09959873  0.20849917  0.23  145
          SoilCrop maize: LL=[0.147, 0.143, 0.19]; KL=[0.08, 0.08, 0.08]; XF=[1, 1, 1]
        SoilWater: SummerCona=1.5; SummerU=6; SummerDate=1-Nov; WinterCona=1.5; WinterU=6; WinterDate=1-Apr; DiffusConst=88; DiffusSlope=35; Salb=0.13; CN2Bare=81; CNRed=1; CNCov=0.2; Thickness=[250, 450, 270]; SWCON=[0.5, 0.5, 0.5]
        SoilOrganicMatter: RootCN=45; RootWt=1000; SoilCN=6.3; EnrACoeff=7.4; EnrBCoeff=0.2; OCUnits=Total
          Thickness  OC   FBiom  FInert
          250        1.7  0.03   0.3
          450        0.6  0.015  0.6
          270        0    0      0
        Analysis: PHUnits=Water; BoronUnits=HotWater
          Thickness  Rocks  PH   ParticleSizeSand  ParticleSizeSilt  ParticleSizeClay
          250        39     6.7  66.3              19                13
          450        30     6.6  71.1              19.3              9
          270        40     6    69.1              23.7              7.2
        InitialWater Initial water: FractionFull=1; PercentMethod=EvenlyDistributed; RelativeTo=ll15
        Sample Initial nitrogen: Date=15/05/2014; NO3Units=kgha; NH4Units=kgha; SWUnits=Volumetric; OCUnits=Total; PHUnits=Water
          Thickness  NO3  NH4
          250        15   16
          450        10   2
          270        10   0
      fertiliser
      manager Calculator
        on init:
```
TT = 0
```
        on end_of_day:
```
TT = TT + DeltaTT
```
      folder Manager folder
        manager Sow on a fixed date
          #
          date = 15-may  # Enter sowing date (dd-mmm)
          #
          crop = maize  # Enter name of crop to sow
          density = 9.5  # Enter sowing density (plants/m2)
          depth = 30  # Enter sowing depth (mm)
          cultivar = B73  # Enter cultivar
          class = plant  # Enter crop growth class
          row_spacing = 800  # Enter row spacing (mm)
          on start_of_day:
          script: same as in Martonvasar_2013_WD.paddock.Manager folder.Sow on a fixed date
        manager Fertilise N at sowing
          # When should fertiliser be applied
          modulename = maize  # On which module should the event come from
          eventname = sowing  # On which event should fertiliser be applied
          # Fertiliser application details
          fertmodule = Fertiliser  # Module used to apply the fertiliser
          fert_amount_sow = 76  # Amount of starter fertiliser at sowing (kg/ha)
          fert_type_sow = NO3_N  # Sowing fertiliser type
          on [modulename].[eventname]:
          script: same as in Martonvasar_2013_WD.paddock.Manager folder.Fertilise N at sowing
        manager Harvesting rule (disabled)
          # Harvesting criteria
          crop = maize  # Enter name of crop to harvest when ripe
          on end_of_day:
          script: same as in Nerac_2012.paddock.Manager folder.Harvesting rule
        irrigation
          automatic_irrigation = off
          asw_depth = 970  # Depth to which ASW is calculated. (mm)
          crit_fr_asw = 1  # Fraction of ASW below which irrigation is applied (0-1.0)
          irrigation_efficiency = 1  # Efficiency of the irrigation. (0-1.0)
          irrigation_allocation = off  # Allocation limits
          allocation = 0  # Allocation in mm
          default_no3_conc = 0.0  # Nitrate concentration (ppm N)
          default_nh4_conc = 0.0  # Ammonium concentration (ppm N)
          default_cl_conc = 0.0  # Chloride concentration (ppm Cl)
        manager End crop on a fixed date
          # Harvesting criteria
          crop = maize  # Enter name of crop to harvest when ripe
          date = 31-oct  # Enter ending date (dd-mmm)
          on end_of_day:
          script: same as in Martonvasar_2013_WD.paddock.Manager folder.End crop on a fixed date
        manager2 FertiliseOnFixedDates
          # Fertiliser will be applied on the date(s) below
          SameDays = yes  # Apply fertiliser on the same day(s) each year? (yes/no) - if "no" then must include the year of application below
          FertDatesStr = 18-jun  # Dates for one or more fertiliser applications (dd-mmm or dd-mmm-yyyy) as a list with a space between dates
          # Test for the mineral N in the soil and don't apply the fertiliser if greater than X kgN/ha is stored in the soil above a depth of Y mm
          UseSoilN = yes  # Use a critical soil mineral N to prevent application above a threshold? (yes/no)
          FertAmtCriteria = 50  # Don't add fertiliser if N in the soil to the depth below exceeds (kg/ha)
          FertDepthCriteria = 75  # Depth to which the amount of N in the soil should be calculated (mm)
          # Fertiliser application details
          FertDepth = 50  # Depth at which to apply the fertiliser (mm)
          FertAmt = 174.8  # Annual fertiliser addition (kg N /ha) - assumes an even split between applications (if more than one application date)
          FertType = urea_n  # Fertiliser type - select from the list
          script: same as in Niederhergheim_2014.paddock.Manager folder.FertiliseOnFixedDates
        manager2 Irrigate on date
          # Irrigation will be applied on the date(s) below
          sameDays = yes  # Apply Irrigation on the same day(s) each year? (yes/no) - if "no" then must include the year of application below
          irrigDatesStr = 20-jun 01-sep 09-sep 15-sep  # Dates for one or more Irrigation applications (dd-mmm or dd-mmm-yyyy) as a list with a space between dates
          # Irrigation parameters
          amount = 35  # Amount of irrigation to apply (mm)
          eff = 1.0  # Irrigation efficiency (0-1)
          script: same as in Martonvasar_2013_WD.paddock.Manager folder.Irrigate on dateVeg
      surfaceom surface organic matter
        PoolName = maize  # Organic Matter pool name
        type = maize  # Organic Matter type
        mass = 0  # Initial surface residue (kg/ha)
        cnr = 80  # C:N ratio of initial residue
        standing_fraction = 0  # Fraction of residue standing
      maize -> /Simulations/Graneros_2013/paddock/maize
      outputfile: filename=Satolas_2014.out; title=Satolas_2014
        variables My Variables: same as Niederhergheim_2014.paddock.outputfile.My Variables
  simulation Bernburg_2014
    clock
      start_date = 16/05/2014  # Enter the start date of the simulation
      end_date = 30/10/2014  # Enter the end date of the simulation
    summaryfile
    metfile met: filename=D:\SAP-LEPSE\APSIM\1. Met\Bernburg_2014_Santi.prn
    area paddock
      Soil Bernburg: Latitude=0; Longitude=0
        Water
          Thickness  BD         AirDry  LL15      DUL       SAT   KS
          300        1.437398   0.09    0.130778  0.284978  0.34  184
          500        1.5718725  0.1     0.159136  0.318641  0.36  145
          700        1.565553   0.12    0.172941  0.325952  0.35  145
          1100       1.57458    0.13    0.161232  0.318064  0.34  145
          SoilCrop maize: LL=[0.147, 0.143, 0.15, 0.15]; KL=[0.08, 0.08, 0.08, 0.08]; XF=[1, 1, 1, 1]
        SoilWater: SummerCona=1.5; SummerU=6; SummerDate=1-Nov; WinterCona=1.5; WinterU=6; WinterDate=1-Apr; DiffusConst=88; DiffusSlope=35; Salb=0.13; CN2Bare=81; CNRed=1; CNCov=0.2; Thickness=[300, 500, 700, 1100]; SWCON=[0.5, 0.5, 0.5, 0.5]
        SoilOrganicMatter: RootCN=45; RootWt=1000; SoilCN=7.8; EnrACoeff=7.4; EnrBCoeff=0.2; OCUnits=Total
          Thickness  OC   FBiom  FInert
          300        1.4  0.03   0.3
          500        1.5  0.02   0.6
          700        1    0.01   0.4
          1100       1    0.005  0.2
        Analysis: PHUnits=Water; BoronUnits=HotWater
          Thickness  PH   ParticleSizeSand  ParticleSizeSilt  ParticleSizeClay
          300        8.1  43                37                20
          500        8.1  39                40                21
          700        8.1  19                57                24
          1100       8.1  27                52                21
        InitialWater Initial water: FractionFull=1; PercentMethod=EvenlyDistributed; RelativeTo=ll15
        Sample Initial nitrogen: Date=16/05/2014; NO3Units=kgha; NH4Units=kgha; SWUnits=Volumetric; OCUnits=Total; PHUnits=Water
          Thickness  NO3         NH4
          300        115.421     20
          500        37.6548     7
          700        39.175      4
          1100       22.2742188  4
      fertiliser
      manager Calculator
        on init:
```
TT = 0
```
        on end_of_day:
```
TT = TT + DeltaTT
```
      folder Manager folder
        manager Sow on a fixed date
          #
          date = 16-may  # Enter sowing date (dd-mmm)
          #
          crop = maize  # Enter name of crop to sow
          density = 8  # Enter sowing density (plants/m2)
          depth = 30  # Enter sowing depth (mm)
          cultivar = B73  # Enter cultivar
          class = plant  # Enter crop growth class
          row_spacing = 800  # Enter row spacing (mm)
          on start_of_day:
          script: same as in Martonvasar_2013_WD.paddock.Manager folder.Sow on a fixed date
        manager Fertilise N at sowing
          # When should fertiliser be applied
          modulename = maize  # On which module should the event come from
          eventname = sowing  # On which event should fertiliser be applied
          # Fertiliser application details
          fertmodule = Fertiliser  # Module used to apply the fertiliser
          fert_amount_sow = 200  # Amount of starter fertiliser at sowing (kg/ha)
          fert_type_sow = NO3_N  # Sowing fertiliser type
          on [modulename].[eventname]:
          script: same as in Martonvasar_2013_WD.paddock.Manager folder.Fertilise N at sowing
        manager Harvesting rule (disabled)
          # Harvesting criteria
          crop = maize  # Enter name of crop to harvest when ripe
          on end_of_day:
          script: same as in Nerac_2012.paddock.Manager folder.Harvesting rule
        irrigation
          automatic_irrigation = on
          asw_depth = 2600  # Depth to which ASW is calculated. (mm)
          crit_fr_asw = 1  # Fraction of ASW below which irrigation is applied (0-1.0)
          irrigation_efficiency = 1  # Efficiency of the irrigation. (0-1.0)
          irrigation_allocation = off  # Allocation limits
          allocation = 0  # Allocation in mm
          default_no3_conc = 0.0  # Nitrate concentration (ppm N)
          default_nh4_conc = 0.0  # Ammonium concentration (ppm N)
          default_cl_conc = 0.0  # Chloride concentration (ppm Cl)
        manager End crop on a fixed date
          # Harvesting criteria
          crop = maize  # Enter name of crop to harvest when ripe
          date = 30-oct  # Enter ending date (dd-mmm)
          on end_of_day:
          script: same as in Martonvasar_2013_WD.paddock.Manager folder.End crop on a fixed date
      surfaceom surface organic matter
        PoolName = maize  # Organic Matter pool name
        type = maize  # Organic Matter type
        mass = 0  # Initial surface residue (kg/ha)
        cnr = 80  # C:N ratio of initial residue
        standing_fraction = 0  # Fraction of residue standing
      maize -> /Simulations/Graneros_2013/paddock/maize
      outputfile: filename=Bernburg_2014.out; title=Bernburg_2014
        variables My Variables: same as Niederhergheim_2014.paddock.outputfile.My Variables
  simulation Bernburg_2015
    clock
      start_date = 10/04/2015  # Enter the start date of the simulation
      end_date = 25/09/2015  # Enter the end date of the simulation
    summaryfile
    metfile met: filename=D:\SAP-LEPSE\APSIM\1. Met\Bernburg_2015_Santi.prn
    area paddock
      Soil Bernburg: Latitude=0; Longitude=0
        Water
          Thickness  BD         AirDry  LL15       DUL       SAT   KS
          330        1.4128     0.09    0.145221   0.308601  0.36  184
          500        1.5412155  0.1     0.158112   0.33134   0.38  145
          780        1.567434   0.07    0.0872892  0.301587  0.36  145
          990        1.68638    0.1     0.144714   0.287133  0.3   145
          SoilCrop maize: LL=[0.147, 0.143, 0.15, 0.15]; KL=[0.08, 0.08, 0.08, 0.08]; XF=[1, 1, 1, 1]
        SoilWater: SummerCona=1.5; SummerU=6; SummerDate=1-Nov; WinterCona=1.5; WinterU=6; WinterDate=1-Apr; DiffusConst=88; DiffusSlope=35; Salb=0.13; CN2Bare=81; CNRed=1; CNCov=0.2; Thickness=[330, 500, 780, 990]; SWCON=[0.5, 0.5, 0.5, 0.5]
        SoilOrganicMatter: RootCN=45; RootWt=1000; SoilCN=7.8; EnrACoeff=7.4; EnrBCoeff=0.2; OCUnits=Total
          Thickness  OC   FBiom  FInert
          330        1.4  0.03   0.3
          500        1.5  0.02   0.6
          780        1    0.01   0.4
          990        0.8  0.005  0.1
        Analysis: PHUnits=Water; BoronUnits=HotWater
          Thickness  PH   ParticleSizeSand  ParticleSizeSilt  ParticleSizeClay
          330        8.1  43                37                20
          500        8.1  39                40                21
          780        8.1  19                57                24
          990        8.1  27                52                21
          999999     -    -                 -                 -
        InitialWater Initial water: FractionFull=1; PercentMethod=EvenlyDistributed; RelativeTo=ll15
        Sample Initial nitrogen: Date=16/05/2014; NO3Units=kgha; NH4Units=kgha; SWUnits=Volumetric; OCUnits=Total; PHUnits=Water
          Thickness  NO3  NH4
          330        100  16
          500        80   2
          780        54   2
          990        20   2
      fertiliser
      manager Calculator
        on init:
```
TT = 0
```
        on end_of_day:
```
TT = TT + DeltaTT
```
      folder Manager folder
        manager Sow on a fixed date
          #
          date = 10-apr  # Enter sowing date (dd-mmm)
          #
          crop = maize  # Enter name of crop to sow
          density = 6.7  # Enter sowing density (plants/m2)
          depth = 30  # Enter sowing depth (mm)
          cultivar = B73  # Enter cultivar
          class = plant  # Enter crop growth class
          row_spacing = 800  # Enter row spacing (mm)
          on start_of_day:
          script: same as in Martonvasar_2013_WD.paddock.Manager folder.Sow on a fixed date
        manager Fertilise N at sowing: same as Bernburg_2014.paddock.Manager folder.Fertilise N at sowing
        manager Harvesting rule (disabled)
          # Harvesting criteria
          crop = maize  # Enter name of crop to harvest when ripe
          on end_of_day:
          script: same as in Nerac_2012.paddock.Manager folder.Harvesting rule
        irrigation
          automatic_irrigation = off
          asw_depth = 2600  # Depth to which ASW is calculated. (mm)
          crit_fr_asw = 1  # Fraction of ASW below which irrigation is applied (0-1.0)
          irrigation_efficiency = 1  # Efficiency of the irrigation. (0-1.0)
          irrigation_allocation = off  # Allocation limits
          allocation = 0  # Allocation in mm
          default_no3_conc = 0.0  # Nitrate concentration (ppm N)
          default_nh4_conc = 0.0  # Ammonium concentration (ppm N)
          default_cl_conc = 0.0  # Chloride concentration (ppm Cl)
        manager End crop on a fixed date
          # Harvesting criteria
          crop = maize  # Enter name of crop to harvest when ripe
          date = 25-sep  # Enter ending date (dd-mmm)
          on end_of_day:
          script: same as in Martonvasar_2013_WD.paddock.Manager folder.End crop on a fixed date
      surfaceom surface organic matter
        PoolName = maize  # Organic Matter pool name
        type = maize  # Organic Matter type
        mass = 0  # Initial surface residue (kg/ha)
        cnr = 80  # C:N ratio of initial residue
        standing_fraction = 0  # Fraction of residue standing
      maize -> /Simulations/Graneros_2013/paddock/maize
      outputfile: filename=Bernburg_2015.out; title=Bernburg_2015
        variables My Variables: same as Niederhergheim_2014.paddock.outputfile.My Variables
  simulation Estrees-Mons_2014
    clock
      start_date = 06/05/2014  # Enter the start date of the simulation
      end_date = 04/11/2014  # Enter the end date of the simulation
    summaryfile
    metfile met: filename=D:\SAP-LEPSE\APSIM\1. Met\Estrees-Mons_2014_Santi.prn
    area paddock
      Soil Estrees-Mons: Latitude=0; Longitude=0
        Water
          Thickness  BD   AirDry  LL15        DUL         SAT   KS
          300        1.4  0.11    0.12204262  0.3361687   0.38  184
          150        1.5  0.14    0.1581012   0.341565    0.38  145
          350        1.5  0.15    0.18052785  0.34179465  0.37  145
          400        1.5  0.13    0.16709715  0.3339969   0.37  145
          SoilCrop maize: LL=[0.147, 0.143, 0.15, 0.15]; KL=[0.08, 0.08, 0.08, 0.08]; XF=[1, 1, 1, 1]
        SoilWater: SummerCona=1.5; SummerU=6; SummerDate=1-Nov; WinterCona=1.5; WinterU=6; WinterDate=1-Apr; DiffusConst=88; DiffusSlope=35; Salb=0.13; CN2Bare=81; CNRed=1; CNCov=0.2; Thickness=[300, 150, 350, 400]; SWCON=[0.5, 0.5, 0.5, 0.5]
        SoilOrganicMatter: RootCN=45; RootWt=1000; SoilCN=7.2; EnrACoeff=7.4; EnrBCoeff=0.2; OCUnits=Total
          Thickness  OC    FBiom  FInert
          300        1.9   0.7    0.3
          150        0.3   0.4    0.6
          350        0.1   0.2    0.8
          400        0.01  0.1    0.9
        Analysis: PHUnits=Water; BoronUnits=HotWater
          Thickness  PH   ParticleSizeSand  ParticleSizeSilt  ParticleSizeClay
          300        6.7  6.1               75                17
          150        6.7  3.7               75                21
          350        6.7  4.9               70                25
          400        6.7  7                 70                23
        InitialWater Initial water: FractionFull=1; PercentMethod=EvenlyDistributed; RelativeTo=ll15
        Sample Initial nitrogen: Date=06/05/2014; NO3Units=kgha; NH4Units=kgha; SWUnits=Volumetric; OCUnits=Total; PHUnits=Water
          Thickness  NO3   NH4
          300        18.3  33.2
          150        9.9   4.3
          350        7.9   1.5
          400        5     0.5
      fertiliser
      manager Calculator
        on init:
```
TT = 0
```
        on end_of_day:
```
TT = TT + DeltaTT
```
      folder Manager folder
        manager Sow on a fixed date
          #
          date = 06-may  # Enter sowing date (dd-mmm)
          #
          crop = maize  # Enter name of crop to sow
          density = 4.0  # Enter sowing density (plants/m2)
          depth = 30  # Enter sowing depth (mm)
          cultivar = B73  # Enter cultivar
          class = plant  # Enter crop growth class
          row_spacing = 800  # Enter row spacing (mm)
          on start_of_day:
          script: same as in Martonvasar_2013_WD.paddock.Manager folder.Sow on a fixed date
        manager Fertilise N at sowing
          # When should fertiliser be applied
          modulename = maize  # On which module should the event come from
          eventname = sowing  # On which event should fertiliser be applied
          # Fertiliser application details
          fertmodule = Fertiliser  # Module used to apply the fertiliser
          fert_amount_sow = 170  # Amount of starter fertiliser at sowing (kg/ha)
          fert_type_sow = NO3_N  # Sowing fertiliser type
          on [modulename].[eventname]:
          script: same as in Martonvasar_2013_WD.paddock.Manager folder.Fertilise N at sowing
        manager Harvesting rule (disabled)
          # Harvesting criteria
          crop = maize  # Enter name of crop to harvest when ripe
          on end_of_day:
          script: same as in Nerac_2012.paddock.Manager folder.Harvesting rule
        irrigation
          automatic_irrigation = off
          asw_depth = 1200  # Depth to which ASW is calculated. (mm)
          crit_fr_asw = 1  # Fraction of ASW below which irrigation is applied (0-1.0)
          irrigation_efficiency = 1  # Efficiency of the irrigation. (0-1.0)
          irrigation_allocation = off  # Allocation limits
          allocation = 0  # Allocation in mm
          default_no3_conc = 0.0  # Nitrate concentration (ppm N)
          default_nh4_conc = 0.0  # Ammonium concentration (ppm N)
          default_cl_conc = 0.0  # Chloride concentration (ppm Cl)
        manager End crop on a fixed date
          # Harvesting criteria
          crop = maize  # Enter name of crop to harvest when ripe
          date = 04-nov  # Enter ending date (dd-mmm)
          on end_of_day:
          script: same as in Martonvasar_2013_WD.paddock.Manager folder.End crop on a fixed date
      surfaceom surface organic matter
        PoolName = maize  # Organic Matter pool name
        type = maize  # Organic Matter type
        mass = 0  # Initial surface residue (kg/ha)
        cnr = 80  # C:N ratio of initial residue
        standing_fraction = 0  # Fraction of residue standing
      maize -> /Simulations/Graneros_2013/paddock/maize
      outputfile: filename=Estrees-Mons_2014.out; title=Estrees-Mons_2014
        variables My Variables: same as Niederhergheim_2014.paddock.outputfile.My Variables
  simulation Estrees-Mons_2015
    clock
      start_date = 21/04/2015  # Enter the start date of the simulation
      end_date = 20/10/2015  # Enter the end date of the simulation
    summaryfile
    metfile met: filename=D:\SAP-LEPSE\APSIM\1. Met\Estrees-Mons_2015_Santi.prn
    area paddock
      Soil Estrees-Mons: Latitude=0; Longitude=0
        Water: same as Estrees-Mons_2014.paddock.Estrees-Mons.Water
        SoilWater: same as Estrees-Mons_2014.paddock.Estrees-Mons.SoilWater
        SoilOrganicMatter: RootCN=45; RootWt=1000; SoilCN=7.2; EnrACoeff=7.4; EnrBCoeff=0.2; OCUnits=Total
          Thickness  OC    FBiom  FInert
          300        1.9   0.7    0.3
          150        0.3   0.5    0.5
          350        0.1   0.2    0.8
          400        0.01  0.1    0.9
        Analysis: PHUnits=Water; BoronUnits=HotWater
          Thickness  PH   ParticleSizeSand  ParticleSizeSilt  ParticleSizeClay
          300        6.7  6.1               75                17
          150        6.7  3.7               75                21
          350        6.7  4.9               70                25
          400        6.7  7                 70                23
        InitialWater Initial water: FractionFull=1; PercentMethod=EvenlyDistributed; RelativeTo=ll15
        Sample Initial nitrogen: Date=21/04/2015; NO3Units=kgha; NH4Units=kgha; SWUnits=Volumetric; OCUnits=Total; PHUnits=Water
          Thickness  NO3   NH4
          300        12.1  8
          150        17.5  2.6
          350        9.8   1
          400        5     0.5
      fertiliser
      manager Calculator
        on init:
```
TT = 0
```
        on end_of_day:
```
TT = TT + DeltaTT
```
      folder Manager folder
        manager Sow on a fixed date
          #
          date = 21-apr  # Enter sowing date (dd-mmm)
          #
          crop = maize  # Enter name of crop to sow
          density = 7.5  # Enter sowing density (plants/m2)
          depth = 30  # Enter sowing depth (mm)
          cultivar = B73  # Enter cultivar
          class = plant  # Enter crop growth class
          row_spacing = 800  # Enter row spacing (mm)
          on start_of_day:
          script: same as in Martonvasar_2013_WD.paddock.Manager folder.Sow on a fixed date
        manager Fertilise N at sowing
          # When should fertiliser be applied
          modulename = maize  # On which module should the event come from
          eventname = sowing  # On which event should fertiliser be applied
          # Fertiliser application details
          fertmodule = Fertiliser  # Module used to apply the fertiliser
          fert_amount_sow = 454  # Amount of starter fertiliser at sowing (kg/ha)
          fert_type_sow = NO3_N  # Sowing fertiliser type
          on [modulename].[eventname]:
          script: same as in Martonvasar_2013_WD.paddock.Manager folder.Fertilise N at sowing
        manager Harvesting rule (disabled)
          # Harvesting criteria
          crop = maize  # Enter name of crop to harvest when ripe
          on end_of_day:
          script: same as in Nerac_2012.paddock.Manager folder.Harvesting rule
        irrigation: same as Estrees-Mons_2014.paddock.Manager folder.Irrigation
        manager End crop on a fixed date
          # Harvesting criteria
          crop = maize  # Enter name of crop to harvest when ripe
          date = 20-oct  # Enter ending date (dd-mmm)
          on end_of_day:
          script: same as in Martonvasar_2013_WD.paddock.Manager folder.End crop on a fixed date
        manager2 Irrigate on date
          # Irrigation will be applied on the date(s) below
          sameDays = no  # Apply Irrigation on the same day(s) each year? (yes/no) - if "no" then must include the year of application below
          irrigDatesStr = 03-jul-2015 09-jul-2015 18-jul-2015 04-aug-2015 11-aug-2015  # Dates for one or more Irrigation applications (dd-mmm or dd-mmm-yyyy) as a list with a space between dates
          # Irrigation parameters
          amount = 30  # Amount of irrigation to apply (mm)
          eff = 1.0  # Irrigation efficiency (0-1)
          script: same as in Martonvasar_2013_WD.paddock.Manager folder.Irrigate on dateVeg
      surfaceom surface organic matter
        PoolName = maize  # Organic Matter pool name
        type = maize  # Organic Matter type
        mass = 0  # Initial surface residue (kg/ha)
        cnr = 80  # C:N ratio of initial residue
        standing_fraction = 0  # Fraction of residue standing
      maize -> /Simulations/Graneros_2013/paddock/maize
      outputfile: filename=Estrees-Mons_2015.out; title=Estrees-Mons_2015
        variables My Variables: same as Niederhergheim_2014.paddock.outputfile.My Variables
  simulation Souprosse_2014
    clock
      start_date = 08/05/2014  # Enter the start date of the simulation
      end_date = 24/09/2014  # Enter the end date of the simulation
    summaryfile
    metfile met: filename=D:\SAP-LEPSE\APSIM\1. Met\Souprosse_2014_Santi.met
    area paddock
      Soil Souprosse_WW: Latitude=0; Longitude=0
        Water
          Thickness  BD        AirDry  LL15       DUL       SAT    KS
          250        1.447762  0.07    0.0872048  0.258639  0.28   184
          200        1.57986   0.1     0.119103   0.290101  0.3    145
          950        1.63123   0.105   0.13237    0.297654  0.305  145
          SoilCrop maize: LL=[0.147, 0.143, 0.19]; KL=[0.08, 0.08, 0.08]; XF=[1, 1, 1]
        SoilWater: SummerCona=1.5; SummerU=6; SummerDate=1-Nov; WinterCona=1.5; WinterU=6; WinterDate=1-Apr; DiffusConst=88; DiffusSlope=35; Salb=0.13; CN2Bare=81; CNRed=1; CNCov=0.2; Thickness=[250, 200, 950]; SWCON=[0.5, 0.5, 0.5]
        SoilOrganicMatter: RootCN=45; RootWt=1000; SoilCN=7.5; EnrACoeff=7.4; EnrBCoeff=0.2; OCUnits=Total
          Thickness  OC   FBiom  FInert
          250        1.4  0.03   0.3
          200        1    0.01   0.6
          950        0.8  0      0.9
        Analysis: PHUnits=Water; BoronUnits=HotWater
          Thickness  PH   ParticleSizeSand  ParticleSizeSilt  ParticleSizeClay
          250        5.7  55.6              32.2              10.6
          200        5.7  50.3              35                13.7
          950        6    48.6              35.5              14.8
        InitialWater Initial water: FractionFull=1; PercentMethod=EvenlyDistributed; RelativeTo=ll15
        Sample Initial nitrogen: Date=07/05/2014; NO3Units=kgha; NH4Units=kgha; SWUnits=Volumetric; OCUnits=Total; PHUnits=Water
          Thickness  NO3  NH4
          250        10   1.6
          200        5    5
          950        5    5
      fertiliser
      manager Calculator
      folder Manager folder
        manager Sow on a fixed date
          #
          date = 08-may  # Enter sowing date (dd-mmm)
          #
          crop = maize  # Enter name of crop to sow
          density = 6.5  # Enter sowing density (plants/m2)
          depth = 30  # Enter sowing depth (mm)
          cultivar = B73  # Enter cultivar
          class = plant  # Enter crop growth class
          row_spacing = 800  # Enter row spacing (mm)
          on start_of_day:
          script: same as in Martonvasar_2013_WD.paddock.Manager folder.Sow on a fixed date
        manager Fertilise N at sowing
        manager Harvesting rule (disabled)
          # Harvesting criteria
          crop = maize  # Enter name of crop to harvest when ripe
          on end_of_day:
          script: same as in Nerac_2012.paddock.Manager folder.Harvesting rule
        irrigation: same as Blois_2014_WD.paddock.Manager folder.Irrigation
        manager End crop on a fixed date
          # Harvesting criteria
          crop = maize  # Enter name of crop to harvest when ripe
          date = 24-sep  # Enter ending date (dd-mmm)
          on end_of_day:
          script: same as in Martonvasar_2013_WD.paddock.Manager folder.End crop on a fixed date
        manager2 FertiliseOnFixedDates
          # Fertiliser will be applied on the date(s) below
          SameDays = yes  # Apply fertiliser on the same day(s) each year? (yes/no) - if "no" then must include the year of application below
          FertDatesStr = 10-jun  # Dates for one or more fertiliser applications (dd-mmm or dd-mmm-yyyy) as a list with a space between dates
          # Test for the mineral N in the soil and don't apply the fertiliser if greater than X kgN/ha is stored in the soil above a depth of Y mm
          UseSoilN = yes  # Use a critical soil mineral N to prevent application above a threshold? (yes/no)
          FertAmtCriteria = 50  # Don't add fertiliser if N in the soil to the depth below exceeds (kg/ha)
          FertDepthCriteria = 75  # Depth to which the amount of N in the soil should be calculated (mm)
          # Fertiliser application details
          FertDepth = 50  # Depth at which to apply the fertiliser (mm)
          FertAmt = 240  # Annual fertiliser addition (kg N /ha) - assumes an even split between applications (if more than one application date)
          FertType = urea_n  # Fertiliser type - select from the list
          script: same as in Niederhergheim_2014.paddock.Manager folder.FertiliseOnFixedDates
        manager2 Irrigate on date
          # Irrigation will be applied on the date(s) below
          sameDays = yes  # Apply Irrigation on the same day(s) each year? (yes/no) - if "no" then must include the year of application below
          irrigDatesStr = 21-jun 01-jul 18-jul 06-aug  # Dates for one or more Irrigation applications (dd-mmm or dd-mmm-yyyy) as a list with a space between dates
          # Irrigation parameters
          amount = 30  # Amount of irrigation to apply (mm)
          eff = 1.0  # Irrigation efficiency (0-1)
          script: same as in Martonvasar_2013_WD.paddock.Manager folder.Irrigate on dateVeg
        manager Calculator
      surfaceom surface organic matter
        PoolName = maize  # Organic Matter pool name
        type = maize  # Organic Matter type
        mass = 0  # Initial surface residue (kg/ha)
        cnr = 80  # C:N ratio of initial residue
        standing_fraction = 0  # Fraction of residue standing
      maize -> /Simulations/Graneros_2013/paddock/maize
      outputfile: filename=Souprosse_2014.out; title=Souprosse_2014
        variables My Variables: same as Niederhergheim_2014.paddock.outputfile.My Variables
  simulation Souprosse_2014_WD
    clock
      start_date = 08/05/2014  # Enter the start date of the simulation
      end_date = 24/09/2014  # Enter the end date of the simulation
    summaryfile
    metfile met: filename=D:\SAP-LEPSE\APSIM\1. Met\Souprosse_2014_Santi.met
    area paddock
      Soil Souprosse: Latitude=0; Longitude=0
        Water
          Thickness  BD        AirDry  LL15       DUL       SAT   KS
          250        1.447762  0.07    0.0872048  0.258639  0.32  184
          200        1.57986   0.1     0.119103   0.290101  0.33  145
          950        1.63123   0.1     0.13237    0.297654  0.33  145
          SoilCrop maize: LL=[0.147, 0.143, 0.19]; KL=[0.08, 0.08, 0.08]; XF=[1, 1, 1]
        SoilWater: same as Souprosse_2014.paddock.Souprosse_WW.SoilWater
        SoilOrganicMatter: RootCN=45; RootWt=1000; SoilCN=7.5; EnrACoeff=7.4; EnrBCoeff=0.2; OCUnits=Total
          Thickness  OC   FBiom  FInert
          250        1.4  0.03   0.3
          200        1    0.02   0.6
          950        0.8  0.001  0.9
        Analysis: PHUnits=Water; BoronUnits=HotWater
          Thickness  PH   ParticleSizeSand  ParticleSizeSilt  ParticleSizeClay
          250        5.7  55.6              32.2              10.6
          200        5.7  50.3              35                13.7
          950        6    48.6              35.5              14.8
        InitialWater Initial water: FractionFull=1; PercentMethod=EvenlyDistributed; RelativeTo=ll15
        Sample Initial nitrogen: Date=07/05/2014; NO3Units=kgha; NH4Units=kgha; SWUnits=Volumetric; OCUnits=Total; PHUnits=Water
          Thickness  NO3  NH4
          250        10   1.6
          200        5    5
          950        5    5
      fertiliser
      manager Calculator
      folder Manager folder
        manager Sow on a fixed date
          #
          date = 08-may  # Enter sowing date (dd-mmm)
          #
          crop = maize  # Enter name of crop to sow
          density = 6.4  # Enter sowing density (plants/m2)
          depth = 30  # Enter sowing depth (mm)
          cultivar = B73  # Enter cultivar
          class = plant  # Enter crop growth class
          row_spacing = 800  # Enter row spacing (mm)
          on start_of_day:
          script: same as in Martonvasar_2013_WD.paddock.Manager folder.Sow on a fixed date
        manager Fertilise N at sowing
        manager Harvesting rule (disabled)
          # Harvesting criteria
          crop = maize  # Enter name of crop to harvest when ripe
          on end_of_day:
          script: same as in Nerac_2012.paddock.Manager folder.Harvesting rule
        irrigation: same as Blois_2014_WD.paddock.Manager folder.Irrigation
        manager End crop on a fixed date
          # Harvesting criteria
          crop = maize  # Enter name of crop to harvest when ripe
          date = 24-sep  # Enter ending date (dd-mmm)
          on end_of_day:
          script: same as in Martonvasar_2013_WD.paddock.Manager folder.End crop on a fixed date
        manager2 FertiliseOnFixedDates: same as Souprosse_2014.paddock.Manager folder.FertiliseOnFixedDates
      surfaceom surface organic matter
        PoolName = maize  # Organic Matter pool name
        type = maize  # Organic Matter type
        mass = 0  # Initial surface residue (kg/ha)
        cnr = 80  # C:N ratio of initial residue
        standing_fraction = 0  # Fraction of residue standing
      maize -> /Simulations/Graneros_2013/paddock/maize
      outputfile: filename=Souprosse_2014_WD.out; title=Souprosse_2014_WD
        variables My Variables: same as Niederhergheim_2014.paddock.outputfile.My Variables
  simulation Reclainville_2015
    clock
      start_date = 09/04/2015  # Enter the start date of the simulation
      end_date = 21/10/2015  # Enter the end date of the simulation
    summaryfile
    metfile met
      filename=D:\SAP-LEPSE\APSIM\1. Met\Reclainville_2015_Santi - Copie.prn
    area paddock
      Soil Reclainville: Latitude=0; Longitude=0
        Water
          Thickness  BD          AirDry  LL15      DUL       SAT   KS
          250        1.382811    0.07    0.169118  0.338875  0.38  184
          250        1.57765158  0.1     0.192336  0.342202  0.38  145
          800        1.6086279   0.15    0.239632  0.354981  0.39  145
          100        1.5248233   0.17    0.29359   0.384433  0.39  145
          SoilCrop maize: LL=[0.147, 0.143, 0.19, 0.19]; KL=[0.08, 0.08, 0.08, 0.08]; XF=[1, 1, 1, 1]
        SoilWater: SummerCona=1.5; SummerU=6; SummerDate=1-Nov; WinterCona=1.5; WinterU=6; WinterDate=1-Apr; DiffusConst=88; DiffusSlope=35; Salb=0.13; CN2Bare=81; CNRed=1; CNCov=0.2; Thickness=[250, 250, 800, 100]; SWCON=[0.5, 0.5, 0.5, 0.5]
        SoilOrganicMatter: RootCN=45; RootWt=1000; SoilCN=6.3; EnrACoeff=7.4; EnrBCoeff=0.2; OCUnits=Total
          Thickness  OC   FBiom  FInert
          250        1.9  0.03   0.3
          250        0.8  0.015  0.6
          800        0.1  0.01   0.9
          100        0.1  0      1
        Analysis: PHUnits=Water; BoronUnits=HotWater
          Thickness  PH  ParticleSizeSand  ParticleSizeSilt  ParticleSizeClay
          250        7   5.8               67.2              27
          250        7   8.82              63                28
          800        7   9.95              55                35
          100        7   4.95              45                50
        InitialWater Initial water: FractionFull=1; PercentMethod=EvenlyDistributed; RelativeTo=ll15
        Sample Initial nitrogen: Date=08/04/2015; NO3Units=kgha; NH4Units=kgha; SWUnits=Volumetric; OCUnits=Total; PHUnits=Water
          Thickness  NO3  NH4
          250        15   1.6
          250        7    5
          800        5    5
          100        5    4
      fertiliser
      manager Calculator
      folder Manager folder
        manager Sow on a fixed date
          #
          date = 09-apr  # Enter sowing date (dd-mmm)
          #
          crop = maize  # Enter name of crop to sow
          density = 8.6  # Enter sowing density (plants/m2)
          depth = 30  # Enter sowing depth (mm)
          cultivar = B73  # Enter cultivar
          class = plant  # Enter crop growth class
          row_spacing = 800  # Enter row spacing (mm)
          on start_of_day:
          script: same as in Martonvasar_2013_WD.paddock.Manager folder.Sow on a fixed date
        manager Fertilise N at sowing
        manager Harvesting rule (disabled)
          # Harvesting criteria
          crop = maize  # Enter name of crop to harvest when ripe
          on end_of_day:
          script: same as in Nerac_2012.paddock.Manager folder.Harvesting rule
        irrigation: same as Blois_2014_WD.paddock.Manager folder.Irrigation
        manager End crop on a fixed date
          # Harvesting criteria
          crop = maize  # Enter name of crop to harvest when ripe
          date = 21-oct  # Enter ending date (dd-mmm)
          on end_of_day:
          script: same as in Martonvasar_2013_WD.paddock.Manager folder.End crop on a fixed date
        manager2 FertiliseOnFixedDates
          # Fertiliser will be applied on the date(s) below
          SameDays = yes  # Apply fertiliser on the same day(s) each year? (yes/no) - if "no" then must include the year of application below
          FertDatesStr = 04-may  # Dates for one or more fertiliser applications (dd-mmm or dd-mmm-yyyy) as a list with a space between dates
          # Test for the mineral N in the soil and don't apply the fertiliser if greater than X kgN/ha is stored in the soil above a depth of Y mm
          UseSoilN = yes  # Use a critical soil mineral N to prevent application above a threshold? (yes/no)
          FertAmtCriteria = 50  # Don't add fertiliser if N in the soil to the depth below exceeds (kg/ha)
          FertDepthCriteria = 75  # Depth to which the amount of N in the soil should be calculated (mm)
          # Fertiliser application details
          FertDepth = 50  # Depth at which to apply the fertiliser (mm)
          FertAmt = 54  # Annual fertiliser addition (kg N /ha) - assumes an even split between applications (if more than one application date)
          FertType = urea_n  # Fertiliser type - select from the list
          script: same as in Niederhergheim_2014.paddock.Manager folder.FertiliseOnFixedDates
        manager2 Irrigate on date
          # Irrigation will be applied on the date(s) below
          sameDays = yes  # Apply Irrigation on the same day(s) each year? (yes/no) - if "no" then must include the year of application below
          irrigDatesStr = 20-apr 19-jun 26-jun 03-jul 11-jul 18-jul 28-jul 04-aug 12-aug 19-aug  # Dates for one or more Irrigation applications (dd-mmm or dd-mmm-yyyy) as a list with a space between dates
          # Irrigation parameters
          amount = 50  # Amount of irrigation to apply (mm)
          eff = 1.0  # Irrigation efficiency (0-1)
          script: same as in Martonvasar_2013_WD.paddock.Manager folder.Irrigate on dateVeg
      surfaceom surface organic matter
        PoolName = maize  # Organic Matter pool name
        type = maize  # Organic Matter type
        mass = 0  # Initial surface residue (kg/ha)
        cnr = 80  # C:N ratio of initial residue
        standing_fraction = 0  # Fraction of residue standing
      maize -> /Simulations/Graneros_2013/paddock/maize
      outputfile: filename=Reclainville_2015.out; title=Reclainville_2015
        variables My Variables: same as Niederhergheim_2014.paddock.outputfile.My Variables
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