folder Simulations: version=36; creator=Apsim 7.6-r0
  targets
  vars
  factorial Factorials: active=0
    settings
    factor Geno
      targets
        Target=[/Simulations/Austria_Leibnitz/paddock/maize/B73, /Simulations/Bulgaria_General_Toshevo/paddock/maize/B73, /Simulations/Bulgaria_Glavinitsa/paddock/maize/B73, /Simulations/France_Achenheim/paddock/maize/B73, /Simulations/France_Chemille/paddock/maize/B73, /Simulations/France_Marmande/paddock/maize/B73, /Simulations/France_Montelier/paddock/maize/B73, /Simulations/France_Orthez/paddock/maize/B73, /Simulations/France_Palaminy/paddock/maize/B73, /Simulations/France_Pamproux/paddock/maize/B73, /Simulations/France_Patay/paddock/maize/B73, /Simulations/France_Saint_Bonnet/paddock/maize/B73, /Simulations/France_Toulouse/paddock/maize/B73, /Simulations/France_Vitre/paddock/maize/B73, /Simulations/Germany_Augsburg/paddock/maize/B73, /Simulations/Germany_Hanover/paddock/maize/B73, /Simulations/Germany_Werl/paddock/maize/B73, /Simulations/Greece_Evropos/paddock/maize/B73, /Simulations/Hungary_Foldeak/paddock/maize/B73, /Simulations/Hungary_Kondoros/paddock/maize/B73, /Simulations/Hungary_Kormend/paddock/maize/B73, /Simulations/Hungary_Lajoskomarom/paddock/maize/B73, /Simulations/Hungary_Nyirbator/paddock/maize/B73, /Simulations/Hungary_Ormenyes/paddock/maize/B73, /Simulations/Hungary_Papa/paddock/maize/B73, /Simulations/Hungary_Szederkeny/paddock/maize/B73, /Simulations/Italy_Asola/paddock/maize/B73, /Simulations/Italy_Bologna/paddock/maize/B73, /Simulations/Italy_Campoformido/paddock/maize/B73, /Simulations/Italy_Orgiano/paddock/maize/B73, /Simulations/Italy_Paese/paddock/maize/B73, /Simulations/Italy_Pantigliate/paddock/maize/B73, /Simulations/Italy_Santena/paddock/maize/B73, /Simulations/Poland_Tuszyn/paddock/maize/B73, /Simulations/Poland_Wrzesnia/paddock/maize/B73, /Simulations/Romania_Alexandria/paddock/maize/B73, /Simulations/Romania_Arad/paddock/maize/B73, /Simulations/Romania_Barca/paddock/maize/B73, /Simulations/Romania_Botosani/paddock/maize/B73, /Simulations/Romania_Barlad/paddock/maize/B73, /Simulations/Romania_Bulbacata/paddock/maize/B73, /Simulations/Romania_Chirnogeni/paddock/maize/B73, /Simulations/Romania_Daia_Romana/paddock/maize/B73, /Simulations/Romania_Dochia/paddock/maize/B73, /Simulations/Romania_Dor_Marunt/paddock/maize/B73, /Simulations/Romania_Gataia/paddock/maize/B73, /Simulations/Romania_Lovrin/paddock/maize/B73, /Simulations/Romania_Medgidia/paddock/maize/B73, /Simulations/Romania_Parscoveni/paddock/maize/B73, /Simulations/Romania_Puchenii_Mari/paddock/maize/B73, /Simulations/Romania_Salard/paddock/maize/B73, /Simulations/Romania_Viziru/paddock/maize/B73, /Simulations/Spain_Barbues/paddock/maize/B73, /Simulations/Spain_Gomecello/paddock/maize/B73, /Simulations/Spain_Villamanan/paddock/maize/B73]
      vars
        c=5.39,4.48,5.60,4.12,5.89,6.09,4.27,3.85,5.94,5.15,4.77,4.76,3.33,5.64,5.55,5.19,6.23,4.90,3.20,3.70,4.98,5.64,4.85,4.53,3.31,2.91,4.67,5.77,4.03,4.93,6.44,2.87,5.74,5.79,5.64,6.29,4.99,4.47,3.84,3.94,5.00,3.22,5.01,5.36,4.89,6.13,3.41,4.93,3.03,5.80,5.09,4.18,4.92,3.83,5.53,4.27,3.56,2.09,4.32,5.13,6.39,4.48,6.79,2.46,5.57,2.69,2.79,5.43,5.19,5.14,6.35,5.61,4.89,4.86,5.07,3.21,5.30,4.58,6.09,5.09,5.21,3.43,4.32,3.29,3.74,4.27,6.43,6.29,6.02,4.25,6.45,5.67,4.45,3.69,4.29,4.25,5.09,4.33,5.01,6.32,4.93,4.36,5.61,6.99,5.28,5.98,4.64,4.81,3.82,3.56,7.94,5.58,4.08,5.21,6.47,5.56,5.28,7.79,4.79,2.37,5.80,4.01,4.58,4.95,3.82,6.18,6.59,5.40,3.30,3.41,3.16,3.08,5.81,5.50,3.75,4.16,4.38,3.80,2.28,3.33,3.56,3.89,6.14,3.77,6.86,3.84,7.57,5.26,4.42,5.32,4.83,4.95,4.70,4.68,6.13,2.61,6.37,4.41,7.08,5.60,3.99,4.82,4.93,3.27,3.63,3.19,4.67,4.43,4.24,4.97,4.14,3.96,4.93,7.19,2.10,4.51,4.44,5.29,4.82,3.48,4.20,4.18,5.60,5.12,4.08,6.57,4.15,3.44,4.95,3.36,4.46,5.40,4.43,5.89,4.12,4.16,3.73,6.12,1.89,4.45,5.08,3.48,5.63,3.67,4.03,2.23,4.35,4.21,5.99,3.59,4.90,9.53,4.85,2.30,6.31,5.12,3.80,4.05,5.93,6.09,6.22,4.82,6.16,6.41,5.05,6.80,4.66,6.04,4.15,6.26,4.85,6.33,5.11,5.22,4.75,5.88,6.89,4.02,6.87,5.60,5.96,4.04,6.11,7.29,5.64,2.37,4.60,4.57,3.75,5.43,4.06,3.32,5.53,7.03,3.83
      maizeGenotype B73
        LER = LER
        LeafDevelopment = ------------------
        UseLER = 1
        UseProfileFTSW = 1
        a = 4.59
        b = -0.85
        c = 3.69
        T0 = 10
        TLeaf_function = Tapex
        Environment = ------------------
        TAir = 1.5 4.0 1.0
        TSoil = 0.5 1.81 0.48
        LeafTempSD = 0.0 0.25 0.5 0.75 1.0 1.2
        LeafTempDiff = 5.4 3.5 2.5 2.1 0 -0.4
        Phenology = ****************
        photoperiod_crit1 = 12.5
        photoperiod_crit2 = 24.0
        photoperiod_slope = 0.0
        tt_flower_to_maturity = 800
        tt_flag_to_flower = 10
        tt_flower_to_start_grain = 170
        tt_maturity_to_ripe = 1
        tt_emerg_to_endjuv = 100
        tt_endjuv_to_init = 128
        New_Phyllochron = *******************
        Nfinal = 16
        leaf_no_init_at_emerg = 6.59
        LIR = 0.068
        Leaf_tip_emerg = 2
        Phyllochron = 0.0193
        tt_firstligule_sinceapp = 37
        use_Observed_EoE = 0
        ttLeafEofE = 178 230 280 331 382 418 478 520 580 615 655 665 676 708 741 750
        First_LiguloChrone = 0.0111
        Lagmax = 6
        Width = ------------------
        UseLeafWidthFn = 1
        LargestLeafSize = 102
        RelRank = 4
        SmallLeafSize = 15
        SLNparam = 0.18
        LeafWidth = 15.5 15.1 17.8 29.2 38.6 44.6 50.4 69.9 81 90 100 105 102 97 91.9 69
        Leaf_Length = *********************************
        LER_Class = Gombertz
        UseLERCoef = 1
        MaxLER = 0.4
        New_LERmax = ****************
        Sigma = 0.35
        Alpha = 0.59
        Amax = 0.94
        arank = 11.5
        brank = 5.5
        SENESCENCE = **********************
        Ntip_at_sen = 5
        k_phyllo_to_sen = 0.29
        GrainNumber = ****************
        PGR_Class = Classic
        PGRbase = 1.2
        aPGR = -0.10471
        bPGR = 1.7969
        PGRt0 = 130
        PGRt1 = 260
        GNmax = 500
        GNk = 0.83
        potKernelWt = 320
  simulation Austria_Leibnitz
    clock
      start_date = 01/01/1975  # Enter the start date of the simulation
      end_date = 31/12/2010  # Enter the end date of the simulation
    summaryfile
    metfile met: filename=%apsim%\Model\Met\Austria_leibnitz_JRC_1975_2010.txt
    area paddock
      Soil Aus_lei: Latitude=0; Longitude=0
        Water
          Thickness  BD   AirDry  LL15   DUL    SAT
          200        1.3  0.018   0.055  0.333  0.433
          200        1.4  0.018   0.055  0.333  0.433
          200        1.5  0.018   0.055  0.333  0.433
          200        1.6  0.018   0.055  0.333  0.433
          200        1.6  0.018   0.055  0.333  0.433
          200        1.6  0.018   0.055  0.333  0.433
          300        1.6  0.018   0.055  0.333  0.433
          SoilCrop maize: LL=[0.055, 0.055, 0.055, 0.055, 0.055, 0.055, 0.055]; KL=[0.08, 0.08, 0.08, 0.07, 0.06, 0.06, 0.06]; XF=[1, 1, 1, 1, 1, 1, 1]
        SoilWater: SummerCona=1.5; SummerU=6; SummerDate=1-Nov; WinterCona=1.5; WinterU=6; WinterDate=1-Apr; DiffusConst=88; DiffusSlope=35; Salb=0.13; CN2Bare=81; CNRed=1; CNCov=0.2; Thickness=[200, 200, 200, 200, 200, 200, 300]; SWCON=[0.5, 0.5, 0.5, 0.5, 0.5, 0.5, 0.5]
        SoilOrganicMatter: RootCN=45; RootWt=1000; SoilCN=14.5; EnrACoeff=7.4; EnrBCoeff=0.2; OCUnits=Total
          Thickness  OC   FBiom  FInert
          200        3    0.03   0.3
          200        2.8  0.01   0.4
          200        2.6  0      0.5
          200        2.4  0      0.7
          200        2.2  0      0.9
          200        2    0      0.9
          300        1.8  0      0.9
        Analysis: Thickness=[200, 200, 200, 200, 200, 200, 300]; PH=[4.5, 4.4, 4.3, 4.2, 4.1, 4, 3.9]; PHUnits=Water; BoronUnits=HotWater
        InitialWater Initial water: FractionFull=1; PercentMethod=FilledFromTop; RelativeTo=ll15
        Sample Initial nitrogen: Date=14/05/1976; NO3Units=kgha; NH4Units=ppm; SWUnits=Volumetric; OCUnits=Total; PHUnits=Water
          Thickness  NO3  NH4
          200        60   2
          200        30   0.7
          200        20   0.5
          200        20   0.4
          200        20   0.4
          200        20   0.4
          300        30   0.4
      fertiliser
      manager Calculator
        on init:
```
ftn = 0
InCropRain = 0
tt = 0
```
        on end_of_day:
```
if (paddock_is_fallow() = 0) then
   outputfile do_output
endif

InCropRain = InCropRain + rain

TT = TT + DeltaTT
if (day > 152) then
     current_season = year
else
     current_season = year - 1
endif
```
      irrigation
        automatic_irrigation = off
        asw_depth = 1500  # Depth to which ASW is calculated. (mm)
        crit_fr_asw = 0.9  # Fraction of ASW below which irrigation is applied (0-1.0)
        irrigation_efficiency = 1  # Efficiency of the irrigation. (0-1.0)
        irrigation_allocation = off  # Allocation limits
        allocation = 0  # Allocation in mm
        default_no3_conc = 0.0  # Nitrate concentration (ppm N)
        default_nh4_conc = 0.0  # Ammonium concentration (ppm N)
        default_cl_conc = 0.0  # Chloride concentration (ppm Cl)
      folder Manager folder
        manager Sow on a fixed date
          #
          date = 30-apr  # Enter sowing date (dd-mmm)
          #
          crop = maize  # Enter name of crop to sow
          density = 7.63  # Enter sowing density (plants/m2)
          depth = 30  # Enter sowing depth (mm)
          cultivar = B73  # Enter cultivar
          class = plant  # Enter crop growth class
          row_spacing = 800  # Enter row spacing (mm)
          on start_of_day:
```
if (today = date('[date]')) then
   season = current_season
   SowDay = day
   SowYear = year
   TT = DeltaTT
   InCropRain = rain
   [crop] sow plants =[density], sowing_depth = [depth], cultivar = [cultivar], row_spacing = [row_spacing], crop_class = [class]
endif
```
        manager Reset on sowing
          # When should a reset be done
          modulename = maize  # The module the event is to come from
          eventname = sowing  # On which event should a reset be done
          # Reset details
          soilmodule = Aus_lei  # Name of your soil module
          surfaceommodule = surface organic matter  # Name of your surface organic matter module
          resetWater = yes  # Reset soil water?
          resetNitrogen = yes  # Reset soil nitrogen?
          resetSurfaceOM = yes  # Reset surface organic matter?
          on [modulename].[eventname]:
```
            resetWater = '[resetWater]'
            resetNitrogen  = '[resetNitrogen]'
            resetSurfaceOM = '[resetSurfaceOM]'
            if (resetWater = 'yes') then
                '[soilmodule] Water' reset
            endif
            if (resetNitrogen = 'yes') then
                '[soilmodule] Nitrogen' reset
            endif
            if (resetSurfaceOM = 'yes') then
                '[surfaceommodule]' reset
            endif
            if (resetWater = 'yes' or resetNitrogen = 'yes' or resetSurfaceOM = 'yes') then
               act_mods reseting
            endif
```
        manager Fertilise N at sowing
          # When should fertiliser be applied
          modulename = maize  # On which module should the event come from
          eventname = sowing  # On which event should fertiliser be applied
          # Fertiliser application details
          fertmodule = Fertiliser  # Module used to apply the fertiliser
          fert_amount_sow = 400  # Amount of starter fertiliser at sowing (kg/ha)
          fert_type_sow = NO3_N  # Sowing fertiliser type
          on [modulename].[eventname]:
```
        [fertmodule] apply amount = [fert_amount_sow] (kg/ha), depth = 50 (mm), type = [fert_type_sow]
```
        manager Harvesting rule
          # Harvesting criteria
          crop = maize  # Enter name of crop to harvest when ripe
          date1 = 15-may  # Enter harvest window START date (dd-mmm)
          date2 = 31-oct  # Enter harvest window END date (dd-mmm)
          date3 = 01-nov  # Enter the date before which the maize can't be harvest (dd-mmm)
          humcrit = 0.9  # Soil humidity threshold (%)
          on end_of_day:
```
if (date_within('[date1], [date2]') = 1) then
if (([crop].StageName = 'harvest_ripe' and sw_dep(1) < [humcrit]*sat_dep(1)) or ([crop].plant_status = 'dead' and sw_dep(1) < [humcrit]*sat_dep(1)))then
[crop]  harvest
[crop]  end_crop
endif
endif
if (today = date('[date3]') then
[crop]  end_crop
endif
```
      surfaceom surface organic matter
        PoolName = maize  # Organic Matter pool name
        type = maize  # Organic Matter type
        mass = 0  # Initial surface residue (kg/ha)
        cnr = 80  # C:N ratio of initial residue
        standing_fraction = 0  # Fraction of residue standing
      outputfile: filename=Austria_Leibnitz.out; title=Austria_Leibnitz
        events Reporting Frequency: event=event
        variables
          variables: dd/mm/yyyy as Date, day_of_month, month, day, year, DaysAfterSowing, Stage, stagename, plant_status, yield, TT, MaxT, MinT, Rain, Radn, radn_int, waterSD, irrigation, biomass, lai, GrainNo, GrainSize, leaflength(14), leaflength(15)
      maize
        maizeConstants standard
          crop_type = maize
          default_crop_class = plant
          stage_names = sowing germination emergence end_of_juvenile floral_initiation flag_leaf flowering start_grain_fill end_grain_fill maturity harvest_ripe end_crop
          phase_names = sowing germination emergence end_of_juvenile floral_initiation flag_leaf flowering start_grain_fill end_grain_fill maturity harvest_ripe end_crop
          phase_type = generic generic    generic   generic         generic           generic   generic   generic          generic        generic  generic      generic
          stage_code = 1   2   3    4      5     6     7    8    9    10   11   12
          pesw_germ = 0.0  # plant extractable soil water in seedling layer inadequate for germination (mm/mm)
          shoot_lag = 15.0  # Time lag before linear coleoptile growth starts (deg days)
          shoot_rate = 0.60  # Growing deg day increase with depth for coleoptile (deg day/mm depth)
          fasw_emerg = 0.0  1.0  # Fraction of available soil water
          rel_emerg_rate = 1.0  1.0  # Stress factor for thermal time calculation between germination and emergence
          twilight = -6.0  # Twilight is defined as the interval between sunrise or sunset and the time when the true
          x_temp = 0  18.0 26.0 34.0 44.0  # cardinal temps.
          y_tt = 0  10.0 18.0 26.0  0.0  # thermal time
          leaf_no_at_emerg = 0.5  # (expanded) leaf number at emergence ()
          leaf_no_seed = 6.0  # number of leaf primordia present in seed
          leaf_no_min = 5.0  # minimum leaf number
          leaf_no_max = 40  # maximum leaf number
          leaf_init_rate = 23.2  # degree days to initiate each leaf primordium until floral init (deg day)
          leaf_app_rate1 = 65.0
          leaf_app_rate2 = 36.0
          leaf_app_rate3 = 36.0
          leaf_no_rate_change1 = 8
          leaf_no_rate_change2 = 3
          rue = 0   0  1.85 1.85  1.85  1.85 1.85 1.85  1.85   1.85   0    0
          row_spacing_default = 1.0
          skiprow_default = 0
          x_row_spacing = 0.20   0.50   1.00  # Row spacing
          y_extinct_coef = 0.70   0.50   0.50  # extinction coefficient for green leaf
          y_extinct_coef_dead = 0.3    0.3    0.3  # extinction coefficient for dead material
          x_ave_temp = 8 15 35 50  # mean daily temperature
          y_stress_photo = 0  1  1  0  # multiplier on RUE
          dm_leaf_init = 0.01  # leaf weight at emergence (g/plant)
          dm_root_init = 0.01  # root weight at emergence (g/plant)
          dm_stem_init = 0.01  # stem weight at emergence (g/plant)
          stem_trans_frac = 0.20  # fraction of stem used in translocation to grain - not used for i_wheat option
          leaf_trans_frac = 0.15  # fraction of leaf used in translocation to grain
          retransRate = 0.15
          ratio_root_shoot = 0   0   1    1     0.33  0.33  0.087 0    0     0    0    0
          partition_rate_leaf = 0.0182  # coefficient of sigmoidal function between leaf partition fraction and internode no**2 (0-1)
          frac_stem2flower = 0.17  # fraction of dm allocated to stem that goes to developing head
          PGRt0 = 130
          PGRt1 = 260
          PGRbase = 1.2
          GNk = 0.83
          GrainTempWindow = -150 50
          GrainTempOrdinals = 36 40
          grn_water_cont = 0.155  # water content of grain g/g
          leaf_no_correction = 2.0  # corrects for other growing leaves
          x_lai = 0.1    4
          y_lai_sla_max = 50000 25000  # maximum specific leaf area for delta LAI
          lai_sla_min = 8000  8000  # minimum specific leaf area for delta LAI
          initial_tpla = 380
          root_depth_rate = 0  10    15    33     33    33    33   0      0       0    0    0
          x_sw_ratio = 0.1 0.5  # water availability for effects on root depth growth
          y_sw_fac_root = 0   1  # stress factor for root depth growth, This may be probably the same for all crops
          initial_root_depth = 50  # initial depth of roots (mm)
          specific_root_length = 100000
          x_plant_rld = 0   0.0001  0.0003  # root branching
          y_rel_root_rate = 0.02  0.10  1.0
          transp_eff_cf = 0.009 0.009 0.009 0.009    0.009  0.009  0.009   0.009  0.009  0.009  0.009  0.009
          svp_fract = 0.75  # (0-1)
          x_sw_demand_ratio = 0.5 1.1  # water availability
          y_swdef_leaf = 0   1  # stress indices
          x_sw_avail_ratio = 0 0.16  # water availability
          y_swdef_pheno = 0 1  # stress index for phenology
          n_supply_preference = active
          no3_diffn_const = 2.0
          maxUptakeRate = 0.029
          initialRootNConc = 0.020
          targetRootNConc = 0.002
          initialLeafSLN = 1.7
          targetLeafSLN = 1.7
          newLeafSLN = 1.1
          senescedLeafSLN = 0.3
          leafDilnNSlope = 0.0037
          leafDilnNInt = -0.0015
          initialStemNConc = 0.01
          x_stem_n = 3         5       7         10
          targetStemNConc = 0.04   0.04   0.01      0.005
          structStemNConc = 0.0045  0.0045   0.0021   0.0021
          stemDilnNSlope = 0.005
          stemDilnNInt = -0.00052
          initialRachisNConc = 0.000
          targetRachisNConc = 0.01
          structRachisNConc = 0.0021
          rachisDilnNSlope = 0.005
          rachisDilnNInt = -0.00052
          grainNFillRate = 0.01
          targetGrainNConc = 0.0143
          nUptakeCease = 523
          nSupplyFrac = 5
          dm_root_sen_frac = 0.002  # fraction of root dry matter senesced each day
          leaf_no_dead_const = -0.025  # coefficients for rate of leaf number senescence following flowering
          leaf_no_dead_slope = 0.00035
          lai_sen_light = 4.0  # induced senescence occurs (m^2/m^2)
          sen_light_slope = 0.008  # sensitivity of leaf area senescence to shading
          x_temp_senescence = -2.0 2.0  # minimum temperature for frost senescence table (oC)
          y_senescence_fac = 1   0  # daily fraction of leaf area senesced due to frost (0-1)
          sen_rate_water = 0.05  # slope in linear eqn relating soil water stress during photosynthesis to leaf senesence rate
          sen_light_time_const = 10.0  # delay factor for light senescence
          sen_radn_crit = 2  # radiation level for onset of light senescence
          frost_kill = -3.0  # temperature threshold for leaf death
          sen_water_time_const = 10.0  # delay factor for water senescence
          sen_threshold = 0.25  # supply:demand ratio for onset of water senescence
          tt_emerg_limit = 150.0  # maximum degree days allowed for emergence to take place
          stress_determinants = leaf stem grain
          yield_parts = grain  # energy
          retrans_parts = leaf stem  flower  # MEP added leaf and flower
          pfact_photo_slope = 2.5  # 2.0 !1.0
          pfact_expansion_slope = 2.5
          pfact_pheno_slope = 6  # 10 !20
          pfact_grain_slope = 20
          p_uptake_factor = 1.5  # factor to calc total P uptake from demand for today's growth
          x_p_stage_code = 3       4      5      6      7      8      10
          y_p_conc_max_leaf = 0.0045  0.0045 0.004  0.0025 0.0025 0.0024 0.0024
          y_p_conc_min_leaf = 0.003   0.003  0.0029 0.0011 0.0011 0.0008 0.0006
          y_p_conc_sen_leaf = 0.0005  0.0005 0.0005 0.0005 0.0005 0.0005 0.0005
          y_p_conc_max_stem = 0.0045   0.0045 0.003  0.0011  0.001  0.0007 0.0007
          y_p_conc_min_stem = 0.003    0.003  0.002  0.0006 0.0006 0.0002 0.0002
          y_p_conc_sen_stem = 0.0002  0.0002 0.0002 0.0002 0.0002 0.0002 0.0002
          y_p_conc_max_root = 0.0010  0.0010 0.0010 0.0010 0.0010 0.0010 0.0010  # assume P conc in roots non-varying
          y_p_conc_min_root = 0.0010  0.0010 0.0010 0.0010 0.0010 0.0010 0.0010
          y_p_conc_sen_root = 0.0010  0.0010 0.0010 0.0010 0.0010 0.0010 0.0010
          y_p_conc_max_flower = 0.0045  0.0045  0.003  0.0011  0.001  0.0007 0.0007  # assumed same as stem
          y_p_conc_min_flower = 0.003   0.003   0.002  0.0006 0.0006 0.0002 0.0002
          y_p_conc_sen_flower = 0.0002  0.0002 0.0002 0.0002 0.0002 0.0002 0.0002
          y_p_conc_max_grain = 0.001   0.001  0.001  0.001  0.001  0.0030  0.0030  # based on Mallarino (1996)
          y_p_conc_min_grain = 0.001   0.001  0.001  0.001  0.001  0.0015  0.0015  # based on Kenya data
          y_p_conc_sen_grain = 0.001   0.001  0.001  0.001  0.001  0.0015  0.0015
          y_p_conc_max_energy = 0.001   0.001  0.001  0.001  0.001  0.001  0.001
          y_p_conc_min_energy = 0.001   0.001  0.001  0.001  0.001  0.001  0.001
          y_p_conc_sen_energy = 0.001   0.001  0.001  0.001  0.001  0.001  0.001
          p_conc_init_leaf = 0.0045
          p_conc_init_stem = 0.0045
          p_conc_init_root = 0.0010  # 0.0014
          p_conc_init_flower = 0.0045
          p_conc_init_grain = 0.0030
          p_conc_init_energy = 0.0
          ll_ub = 1000.0  # upper limit of lower limit
          kl_ub = 1.0  # upper limit of water uptake factor
          minsw = 0.00001  # lowest acceptable value for ll
          year_ub = 2000  # year upper limit
          year_lb = 1800  # year lower limit
          latitude_ub = 90  # latitude upper limit
          latitude_lb = -90  # latitude lower limit
          maxt_ub = 55  # max. temperature upper limit
          maxt_lb = -50  # max. temperature lower limit
          mint_ub = 40  # min. temperature upper limit
          mint_lb = -50  # min. temperature lower limit
          radn_ub = 50  # radiation upper limit
          radn_lb = 1  # radiation lower limit
          dlayer_ub = 1000  # layer depth upper limit
          dlayer_lb = 0  # layer depth lower limit
          sat_dep_ub = 1000  # saturated water content upper limit
          sat_dep_lb = 0  # saturated water content upper limit
          dul_dep_ub = 1000  # drained upper limit upper limit
          dul_dep_lb = 0  # drained upper limit lower limit
          sw_dep_ub = 1000  # soil water upper limit
          sw_dep_lb = 0  # soil water lower limit
          no3_ub = 10000  # soil nitrate upper limit
          no3_lb = 0  # soil nitrate lower limit
          no3_min_ub = 10000  # min. soil nitrate upper limit
          no3_min_lb = 0  # min. soil nitrate lower limit
          nh4_ub = 10000  # soil nitrate upper limit
          nh4_lb = 0  # soil nitrate lower limit
          nh4_min_ub = 10000  # min. soil nitrate upper limit
          nh4_min_lb = 0  # min. soil nitrate lower limit
          head_grain_no_max_ub = 1000.0
          grain_gth_rate_ub = 20.0
          tt_emerg_to_endjuv_ub = 500.0
          tt_flower_to_maturity_ub = 1000.0
          tt_maturity_to_ripe_ub = 1000.0
          tt_flower_to_start_grain_ub = 1000.0
          tt_flag_to_flower_ub = 1000.0
          x_stem_wt = 0    80  # look up table for canopy height
          y_height = 0  2000  # plant canopy height
          canopy_height_max = 3000.0
          x_co2_te_modifier = 350.0
          y_co2_te_modifier = 1.0
          RootAngle = 45  # Root Angle (45 degrees)
          pmax = 2.07021
          n0 = 0.1968
          alpha = 2.5662
          BiomassConv = 0.409
          ScatterCoef = 0.15
          LeafAngles = 60 60 60 60 60
          SlnHeadPc = 10
          frequencyS = 60
          maxFlux = 0.8
          x_sw_ear_demand_ratio = 0.5 1.6
          y_swdef_ear = 0   1
          maxTrans = 0.75
          maxtransEffect = 0.5
          LeafClass = LER
          GrainClass = LER
          Radiation = Classic  # Radiation interception method
          HydCondLimitMechanism = Roots  # Mechanism for limiting hydraulic conductance
          maxNumStrikes = 3  # Max Number of Strikes for silking Cohort model
          GrainTempWindow = -50 100
          GrainHiTemperature = 33 36 39  # Grain High Temperature
          GrainStressSeverity = 0.00 0.00 0.45  # Severity of seed set stress
          aX0 = 0.67  # Largest leaf position multiplier
          largestLeafParams = 1000  -1.17 0.047  # Largest Leaf Area Params
          bellCurveParams = -0.009 -0.2 0.0006 -0.43  # Leaf Curve Params
        maizeGenotype B73
          LER = LER
          LeafDevelopment = ------------------
          UseLER = 1
          leaf_no_init_at_emerg = 6.59
          LIR = 0.068
          UseProfileFTSW = 1
          a = 3.19
          b = -1.17
          c = 3.52
          T0 = 10
          TLeaf_function = Tapex
          Width = ------------------
          UseLeafWidthFn = 1
          LargestLeafSize = 100
          RelRank = 4
          SmallLeafSize = 15
          SLNparam = 0.125
          LeafWidth = 15.5 15.1 17.8 29.2 38.6 44.6 50.4 69.9 81 90 100 105 102 97 91.9 69
          BetaW = 0.61
          SigmaW = 0.24
          W6 = 60
          rRAD = 24
          Width_Class = RAD
          Environment = ------------------
          TAir = 1.5 4.0 1.0
          TSoil = 0.5 1.81 0.48
          LeafTempSD = 0.0 0.25 0.5 0.75 1.0 1.2
          LeafTempDiff = 5.4 3.5 2.5 2.1 0 -0.4
          GrainNumber = ****************
          PGRt0 = 130
          PGRt1 = 260
          GNmax = 600
          PGRbase = 1.2
          GNk = 0.83
          potKernelWt = 350
          GNmaxCoef = 210
          Phenology = ****************
          photoperiod_crit1 = 12.5
          photoperiod_crit2 = 24.0
          photoperiod_slope = 0.0
          tt_flower_to_maturity = 820
          tt_flag_to_flower = 10
          tt_flower_to_start_grain = 170
          tt_maturity_to_ripe = 1
          tt_emerg_to_endjuv = 100
          tt_endjuv_to_init = 258
          New_Phyllochron = *******************
          Nfinal = 16
          btip = -49
          atip = 51
          bll1 = 137
          use_Observed_EoE = 0
          ttLeafEofE = 178 230 280 331 382 418 478 520 580 615 655 665 676 708 741 750
          all1 = 86
          alag = 5.4
          Nlast = 2
          k_bl = 0.708
          Nb_lim = 6
          alpha_ll = 0.52
          LagW = 39
          k_ll = 0.454
          RADbase = 0.1
          leafElongationRankCoef = *********************************
          LER_Class = Gombertz
          UseLERCoef = 1
          MaxLER = 0.4
          New_LERmax = ****************
          SigmaL = 0.46
          BetaL = 0.68
          SENESCENCE = ********************
          Ntip_at_sen = 5
          k_phyllo_to_sen = 0.29
          PGR_Class = ******************************
          aPGR = 0.14
          bPGR = 0.69
          respTnight = 0.05
          TnightBP = 15
  simulation Bulgaria_General_Toshevo -> /Simulations/Austria_Leibnitz
    metfile met
      filename=%apsim%\Model\Met\Bulgaria_general_toshevo_JRC_1975_2010.txt
    area paddock -> /Simulations/Austria_Leibnitz/paddock
      Soil Bul_gen: Latitude=0; Longitude=0
        Water
          Thickness  BD   AirDry  LL15   DUL    SAT
          200        1.3  0.072   0.217  0.407  0.475
          200        1.4  0.072   0.217  0.407  0.475
          200        1.5  0.072   0.217  0.407  0.475
          200        1.6  0.072   0.217  0.407  0.475
          200        1.6  0.072   0.217  0.407  0.475
          200        1.6  0.072   0.217  0.407  0.475
          300        1.6  0.072   0.217  0.407  0.475
          SoilCrop maize: LL=[0.217, 0.217, 0.217, 0.217, 0.217, 0.217, 0.217]; KL=[0.08, 0.08, 0.08, 0.07, 0.06, 0.06, 0.06]; XF=[1, 1, 1, 1, 1, 1, 1]
        SoilWater: same as Austria_Leibnitz.paddock.Aus_lei.SoilWater
        SoilOrganicMatter: same as Austria_Leibnitz.paddock.Aus_lei.SoilOrganicMatter
        Analysis: Thickness=[200, 200, 200, 200, 200, 200, 300]; PH=[4.5, 4.4, 4.3, 4.2, 4.1, 4, 3.9]; PHUnits=Water; BoronUnits=HotWater
        InitialWater Initial water: FractionFull=1; PercentMethod=FilledFromTop; RelativeTo=ll15
        Sample Initial nitrogen: Date=14/05/1976; NO3Units=kgha; NH4Units=ppm; SWUnits=Volumetric; OCUnits=Total; PHUnits=Water
          Thickness  NO3  NH4
          200        60   2
          200        30   0.7
          200        20   0.5
          200        20   0.4
          200        20   0.4
          200        20   0.4
          300        30   0.4
      folder Manager folder -> /Simulations/Austria_Leibnitz/paddock/Manager folder
        manager Sow on a fixed date
          #
          date = 10-apr  # Enter sowing date (dd-mmm)
          #
          crop = maize  # Enter name of crop to sow
          density = 7.45  # Enter sowing density (plants/m2)
          depth = 30  # Enter sowing depth (mm)
          cultivar = B73  # Enter cultivar
          class = plant  # Enter crop growth class
          row_spacing = 800  # Enter row spacing (mm)
          on start_of_day:
          script: same as in Austria_Leibnitz.paddock.Manager folder.Sow on a fixed date
        manager Reset on sowing
          # When should a reset be done
          modulename = maize  # The module the event is to come from
          eventname = sowing  # On which event should a reset be done
          # Reset details
          soilmodule = Bul_gen  # Name of your soil module
          surfaceommodule = surface organic matter  # Name of your surface organic matter module
          resetWater = yes  # Reset soil water?
          resetNitrogen = yes  # Reset soil nitrogen?
          resetSurfaceOM = yes  # Reset surface organic matter?
          on [modulename].[eventname]:
          script: same as in Austria_Leibnitz.paddock.Manager folder.Reset on sowing
      outputfile: filename=Bulgaria_General_Toshevo.out; title=Bulgaria_General_Toshevo
        events Reporting Frequency -> /Simulations/Austria_Leibnitz/paddock/Outputfile/Reporting Frequency
        variables
          variables: dd/mm/yyyy as Date, day_of_month, month, day, year, DaysAfterSowing, Stage, stagename, plant_status, yield, TT, MaxT, MinT, Rain, Radn, radn_int, waterSD, irrigation, biomass, lai, GrainNo, GrainSize
      maize: same as Austria_Leibnitz.paddock.maize
  simulation Bulgaria_Glavinitsa -> /Simulations/Austria_Leibnitz
    metfile met: filename=%apsim%\Model\Met\Bulgaria_glavinitsa_JRC_1975_2010.txt
    area paddock -> /Simulations/Austria_Leibnitz/paddock
      Soil Bul_gla: Latitude=0; Longitude=0
        Water
          Thickness  BD   AirDry  LL15   DUL    SAT
          200        1.3  0.07    0.211  0.389  0.46
          200        1.4  0.07    0.211  0.389  0.46
          200        1.5  0.07    0.211  0.389  0.46
          200        1.6  0.07    0.211  0.389  0.46
          200        1.6  0.07    0.211  0.389  0.46
          200        1.6  0.07    0.211  0.389  0.46
          300        1.6  0.07    0.211  0.389  0.46
          SoilCrop maize: LL=[0.211, 0.211, 0.211, 0.211, 0.211, 0.211, 0.211]; KL=[0.08, 0.08, 0.08, 0.07, 0.06, 0.06, 0.06]; XF=[1, 1, 1, 1, 1, 1, 1]
        SoilWater: same as Austria_Leibnitz.paddock.Aus_lei.SoilWater
        SoilOrganicMatter: RootCN=45; RootWt=1000; SoilCN=14.5; EnrACoeff=7.4; EnrBCoeff=0.2; OCUnits=Total
          Thickness  OC   FBiom  FInert
          200        2    0.03   0.3
          200        1.8  0.01   0.4
          200        1.6  0      0.5
          200        1.4  0      0.7
          200        1.2  0      0.9
          200        1    0      0.9
          300        0.8  0      0.9
        Analysis: Thickness=[200, 200, 200, 200, 200, 200, 300]; PH=[5, 4.9, 4.8, 4.7, 4.6, 4.5, 4.4]; PHUnits=Water; BoronUnits=HotWater
        InitialWater Initial water: FractionFull=1; PercentMethod=FilledFromTop; RelativeTo=ll15
        Sample Initial nitrogen: Date=14/05/1976; NO3Units=kgha; NH4Units=ppm; SWUnits=Volumetric; OCUnits=Total; PHUnits=Water
          Thickness  NO3  NH4
          200        60   2
          200        30   0.7
          200        20   0.5
          200        20   0.4
          200        20   0.4
          200        20   0.4
          300        30   0.4
      folder Manager folder -> /Simulations/Austria_Leibnitz/paddock/Manager folder
        manager Sow on a fixed date: same as Bulgaria_General_Toshevo.paddock.Manager folder.Sow on a fixed date
        manager Reset on sowing
          # When should a reset be done
          modulename = maize  # The module the event is to come from
          eventname = sowing  # On which event should a reset be done
          # Reset details
          soilmodule = Bul_gla  # Name of your soil module
          surfaceommodule = surface organic matter  # Name of your surface organic matter module
          resetWater = yes  # Reset soil water?
          resetNitrogen = yes  # Reset soil nitrogen?
          resetSurfaceOM = yes  # Reset surface organic matter?
          on [modulename].[eventname]:
          script: same as in Austria_Leibnitz.paddock.Manager folder.Reset on sowing
      outputfile: filename=Bulgaria_Glavinitsa.out; title=Bulgaria_Glavinitsa
        events Reporting Frequency -> /Simulations/Austria_Leibnitz/paddock/Outputfile/Reporting Frequency
        variables
          variables: dd/mm/yyyy as Date, day_of_month, month, day, year, DaysAfterSowing, Stage, stagename, plant_status, yield, TT, MaxT, MinT, Rain, Radn, radn_int, waterSD, irrigation, biomass, lai, GrainNo, GrainSize
      maize: same as Austria_Leibnitz.paddock.maize
  simulation France_Achenheim -> /Simulations/Austria_Leibnitz
    metfile met: filename=%apsim%\Model\Met\France_achenheim_JRC_1975_2010.txt
    area paddock -> /Simulations/Austria_Leibnitz/paddock
      folder Manager folder -> /Simulations/Austria_Leibnitz/paddock/Manager folder
        manager Sow on a fixed date
          #
          date = 20-apr  # Enter sowing date (dd-mmm)
          #
          crop = maize  # Enter name of crop to sow
          density = 7.75  # Enter sowing density (plants/m2)
          depth = 30  # Enter sowing depth (mm)
          cultivar = B73  # Enter cultivar
          class = plant  # Enter crop growth class
          row_spacing = 800  # Enter row spacing (mm)
          on start_of_day:
          script: same as in Austria_Leibnitz.paddock.Manager folder.Sow on a fixed date
        manager Reset on sowing
          # When should a reset be done
          modulename = maize  # The module the event is to come from
          eventname = sowing  # On which event should a reset be done
          # Reset details
          soilmodule = Fra_ach  # Name of your soil module
          surfaceommodule = surface organic matter  # Name of your surface organic matter module
          resetWater = yes  # Reset soil water?
          resetNitrogen = yes  # Reset soil nitrogen?
          resetSurfaceOM = yes  # Reset surface organic matter?
          on [modulename].[eventname]:
          script: same as in Austria_Leibnitz.paddock.Manager folder.Reset on sowing
      Soil Fra_ach
        Water
          Thickness  BD   AirDry  LL15   DUL    SAT
          200        1.3  0.046   0.139  0.254  0.394
          200        1.4  0.046   0.139  0.254  0.394
          200        1.5  0.046   0.139  0.254  0.394
          200        1.6  0.046   0.139  0.254  0.394
          200        1.6  0.046   0.139  0.254  0.394
          200        1.6  0.046   0.139  0.254  0.394
          300        1.6  0.046   0.139  0.254  0.394
          SoilCrop maize: LL=[0.139, 0.139, 0.139, 0.139, 0.139, 0.139, 0.139]; KL=[0.08, 0.08, 0.08, 0.07, 0.06, 0.06, 0.06]; XF=[1, 1, 1, 1, 1, 1, 1]
        SoilWater: same as Austria_Leibnitz.paddock.Aus_lei.SoilWater
        SoilOrganicMatter: same as Bulgaria_Glavinitsa.paddock.Bul_gla.SoilOrganicMatter
        Analysis: Thickness=[200, 200, 200, 200, 200, 200, 300]; PH=[4, 3.9, 3.8, 3.7, 3.6, 3.5, 3.4]; PHUnits=Water; BoronUnits=HotWater
        InitialWater Initial water: FractionFull=1; PercentMethod=FilledFromTop; RelativeTo=ll15
        Sample Initial nitrogen: Date=14/05/1976; NO3Units=kgha; NH4Units=ppm; SWUnits=Volumetric; OCUnits=Total; PHUnits=Water
          Thickness  NO3  NH4
          200        60   2
          200        30   0.7
          200        20   0.5
          200        20   0.4
          200        20   0.4
          200        20   0.4
          300        30   0.4
      outputfile: filename=France_Achenheim.out; title=France_Achenheim
        events Reporting Frequency -> /Simulations/Austria_Leibnitz/paddock/Outputfile/Reporting Frequency
        variables
          variables: dd/mm/yyyy as Date, day_of_month, month, day, year, DaysAfterSowing, Stage, stagename, plant_status, yield, TT, MaxT, MinT, Rain, Radn, radn_int, waterSD, irrigation, biomass, lai, GrainNo, GrainSize
      maize: same as Austria_Leibnitz.paddock.maize
  simulation France_Avignon -> /Simulations/Austria_Leibnitz
    metfile met: filename=%apsim%\Model\Met\France_Avignon _1975_2010.txt
    area paddock -> /Simulations/Austria_Leibnitz/paddock
      Soil Fra_av: Latitude=0; Longitude=0
        Water
          Thickness  BD   AirDry  LL15   DUL    SAT
          200        1.3  0.012   0.036  0.318  0.417
          200        1.4  0.012   0.036  0.318  0.417
          200        1.5  0.012   0.036  0.318  0.417
          200        1.6  0.012   0.036  0.318  0.417
          200        1.6  0.012   0.036  0.318  0.417
          200        1.6  0.012   0.036  0.318  0.417
          300        1.6  0.012   0.036  0.318  0.417
          SoilCrop maize: LL=[0.036, 0.036, 0.036, 0.036, 0.036, 0.036, 0.036]; KL=[0.08, 0.08, 0.08, 0.07, 0.06, 0.06, 0.06]; XF=[1, 1, 1, 1, 1, 1, 1]
        SoilWater: same as Austria_Leibnitz.paddock.Aus_lei.SoilWater
        SoilOrganicMatter: RootCN=45; RootWt=1000; SoilCN=14.5; EnrACoeff=7.4; EnrBCoeff=0.2; OCUnits=Total
          Thickness  OC   FBiom  FInert
          200        1.5  0.03   0.3
          200        1.3  0.01   0.4
          200        1.1  0      0.5
          200        0.9  0      0.7
          200        0.7  0      0.9
          200        0.5  0      0.9
          300        0.3  0      0.9
        Analysis: Thickness=[200, 200, 200, 200, 200, 200, 300]; PH=[6, 5.9, 5.8, 5.7, 5.6, 5.5, 5.4]; PHUnits=Water; BoronUnits=HotWater
        InitialWater Initial water: FractionFull=1; PercentMethod=FilledFromTop; RelativeTo=ll15
        Sample Initial nitrogen: Date=14/05/1975; NO3Units=kgha; NH4Units=ppm; SWUnits=Volumetric; OCUnits=Total; PHUnits=Water
          Thickness  NO3  NH4
          200        400  50
          200        400  50
          200        400  50
          200        400  50
          200        400  50
          200        400  50
          300        400  50
      folder Manager folder -> /Simulations/Austria_Leibnitz/paddock/Manager folder
        manager Sow on a fixed date
          #
          date = 20-mar  # Enter sowing date (dd-mmm)
          #
          crop = maize  # Enter name of crop to sow
          density = 7.51  # Enter sowing density (plants/m2)
          depth = 30  # Enter sowing depth (mm)
          cultivar = B73  # Enter cultivar
          class = plant  # Enter crop growth class
          row_spacing = 800  # Enter row spacing (mm)
          on start_of_day:
          script: same as in Austria_Leibnitz.paddock.Manager folder.Sow on a fixed date
        manager Reset on sowing
          # When should a reset be done
          modulename = maize  # The module the event is to come from
          eventname = sowing  # On which event should a reset be done
          # Reset details
          soilmodule = Fra_av  # Name of your soil module
          surfaceommodule = surface organic matter  # Name of your surface organic matter module
          resetWater = yes  # Reset soil water?
          resetNitrogen = yes  # Reset soil nitrogen?
          resetSurfaceOM = yes  # Reset surface organic matter?
          on [modulename].[eventname]:
          script: same as in Austria_Leibnitz.paddock.Manager folder.Reset on sowing
        manager Fertilise N at sowing
          # When should fertiliser be applied
          modulename = maize  # On which module should the event come from
          eventname = sowing  # On which event should fertiliser be applied
          # Fertiliser application details
          fertmodule = Fertiliser  # Module used to apply the fertiliser
          fert_amount_sow = 500  # Amount of starter fertiliser at sowing (kg/ha)
          fert_type_sow = NO3_N  # Sowing fertiliser type
          on [modulename].[eventname]:
          script: same as in Austria_Leibnitz.paddock.Manager folder.Fertilise N at sowing
      outputfile: filename=France_Avignon.out; title=France_Avignon
        events Reporting Frequency -> /Simulations/Austria_Leibnitz/paddock/Outputfile/Reporting Frequency
        variables
          variables: dd/mm/yyyy as Date, day_of_month, month, day, year, DaysAfterSowing, Stage, stagename, plant_status, yield, TT, MaxT, MinT, Rain, Radn, radn_int, waterSD, irrigation, biomass, lai, GrainNo, GrainSize
      maize: same as Austria_Leibnitz.paddock.maize
  simulation France_Chemille -> /Simulations/Austria_Leibnitz
    metfile met: filename=%apsim%\Model\Met\France_chemille_JRC_1975_2010.txt
    area paddock -> /Simulations/Austria_Leibnitz/paddock
      folder Manager folder -> /Simulations/Austria_Leibnitz/paddock/Manager folder
        manager Sow on a fixed date
          #
          date = 10-apr  # Enter sowing date (dd-mmm)
          #
          crop = maize  # Enter name of crop to sow
          density = 7.66  # Enter sowing density (plants/m2)
          depth = 30  # Enter sowing depth (mm)
          cultivar = B73  # Enter cultivar
          class = plant  # Enter crop growth class
          row_spacing = 800  # Enter row spacing (mm)
          on start_of_day:
          script: same as in Austria_Leibnitz.paddock.Manager folder.Sow on a fixed date
        manager Reset on sowing
          # When should a reset be done
          modulename = maize  # The module the event is to come from
          eventname = sowing  # On which event should a reset be done
          # Reset details
          soilmodule = Fra_che  # Name of your soil module
          surfaceommodule = surface organic matter  # Name of your surface organic matter module
          resetWater = yes  # Reset soil water?
          resetNitrogen = yes  # Reset soil nitrogen?
          resetSurfaceOM = yes  # Reset surface organic matter?
          on [modulename].[eventname]:
          script: same as in Austria_Leibnitz.paddock.Manager folder.Reset on sowing
      Soil Fra_che: Latitude=0; Longitude=0
        Water
          Thickness  BD   AirDry  LL15   DUL    SAT
          200        1.3  0.068   0.204  0.311  0.401
          200        1.4  0.068   0.204  0.311  0.401
          200        1.5  0.068   0.204  0.311  0.401
          200        1.6  0.068   0.204  0.311  0.401
          200        1.6  0.068   0.204  0.311  0.401
          200        1.6  0.068   0.204  0.311  0.401
          300        1.6  0.068   0.204  0.311  0.401
          SoilCrop maize: LL=[0.204, 0.204, 0.204, 0.204, 0.204, 0.204, 0.204]; KL=[0.08, 0.08, 0.08, 0.07, 0.06, 0.06, 0.06]; XF=[1, 1, 1, 1, 1, 1, 1]
        SoilWater: same as Austria_Leibnitz.paddock.Aus_lei.SoilWater
        SoilOrganicMatter: RootCN=45; RootWt=1000; SoilCN=14.5; EnrACoeff=7.4; EnrBCoeff=0.2; OCUnits=Total
          Thickness  OC   FBiom  FInert
          200        0.5  0.03   0.3
          200        0.3  0.01   0.4
          200        0.1  0      0.5
          200        0.1  0      0.7
          200        0.1  0      0.9
          200        0.1  0      0.9
          300        0.1  0      0.9
        Analysis: Thickness=[200, 200, 200, 200, 200, 200, 300]; PH=[4.5, 4.4, 4.3, 4.2, 4.1, 4, 3.9]; PHUnits=Water; BoronUnits=HotWater
        InitialWater Initial water: FractionFull=1; PercentMethod=FilledFromTop; RelativeTo=ll15
        Sample Initial nitrogen: Date=14/05/1976; NO3Units=kgha; NH4Units=ppm; SWUnits=Volumetric; OCUnits=Total; PHUnits=Water
          Thickness  NO3  NH4
          200        60   2
          200        30   0.7
          200        20   0.5
          200        20   0.4
          200        20   0.4
          200        20   0.4
          300        30   0.4
      outputfile: filename=France_Chemille.out; title=France_Chemille
        events Reporting Frequency -> /Simulations/Austria_Leibnitz/paddock/Outputfile/Reporting Frequency
        variables
          variables: dd/mm/yyyy as Date, day_of_month, month, day, year, DaysAfterSowing, Stage, stagename, plant_status, yield, TT, MaxT, MinT, Rain, Radn, radn_int, waterSD, irrigation, biomass, lai, GrainNo, GrainSize
      maize: same as Austria_Leibnitz.paddock.maize
  simulation France_Clermont_Ferrand -> /Simulations/Austria_Leibnitz
    metfile met: filename=%apsim%\Model\Met\France_Clermont_Ferrand_1975_2010.txt
    area paddock -> /Simulations/Austria_Leibnitz/paddock
      Soil Fra_cf: same as France_Avignon.paddock.Fra_av
      folder Manager folder -> /Simulations/Austria_Leibnitz/paddock/Manager folder
        manager Sow on a fixed date
          #
          date = 30-apr  # Enter sowing date (dd-mmm)
          #
          crop = maize  # Enter name of crop to sow
          density = 7.51  # Enter sowing density (plants/m2)
          depth = 30  # Enter sowing depth (mm)
          cultivar = B73  # Enter cultivar
          class = plant  # Enter crop growth class
          row_spacing = 800  # Enter row spacing (mm)
          on start_of_day:
          script: same as in Austria_Leibnitz.paddock.Manager folder.Sow on a fixed date
        manager Reset on sowing
          # When should a reset be done
          modulename = maize  # The module the event is to come from
          eventname = sowing  # On which event should a reset be done
          # Reset details
          soilmodule = Fra_cf  # Name of your soil module
          surfaceommodule = surface organic matter  # Name of your surface organic matter module
          resetWater = yes  # Reset soil water?
          resetNitrogen = yes  # Reset soil nitrogen?
          resetSurfaceOM = yes  # Reset surface organic matter?
          on [modulename].[eventname]:
          script: same as in Austria_Leibnitz.paddock.Manager folder.Reset on sowing
        manager Fertilise N at sowing: same as France_Avignon.paddock.Manager folder.Fertilise N at sowing
      outputfile: filename=France_Clermont_Ferrand.out; title=France_Clermont_Ferrand
        events Reporting Frequency -> /Simulations/Austria_Leibnitz/paddock/Outputfile/Reporting Frequency
        variables
          variables: dd/mm/yyyy as Date, day_of_month, month, day, year, DaysAfterSowing, Stage, stagename, plant_status, yield, TT, MaxT, MinT, Rain, Radn, radn_int, waterSD, irrigation, biomass, lai, GrainNo, GrainSize
      maize: same as Austria_Leibnitz.paddock.maize
  simulation France_Estrees_Mons -> /Simulations/Austria_Leibnitz
    clock
      start_date = 01/01/1987  # Enter the start date of the simulation
      end_date = 31/12/2010  # Enter the end date of the simulation
    metfile met: filename=%apsim%\Model\Met\France_Estrees_Mons_1986_2010.txt
    area paddock -> /Simulations/Austria_Leibnitz/paddock
      Soil Fra_mons: Latitude=0; Longitude=0
        Water
          Thickness  BD   AirDry  LL15   DUL    SAT
          200        1.3  0.075   0.224  0.334  0.419
          200        1.4  0.075   0.224  0.334  0.419
          200        1.5  0.075   0.224  0.334  0.419
          200        1.6  0.075   0.224  0.334  0.419
          200        1.6  0.075   0.224  0.334  0.419
          200        1.6  0.075   0.224  0.334  0.419
          300        1.6  0.075   0.224  0.334  0.419
          SoilCrop maize: LL=[0.224, 0.224, 0.224, 0.224, 0.224, 0.224, 0.224]; KL=[0.08, 0.08, 0.08, 0.07, 0.06, 0.06, 0.06]; XF=[1, 1, 1, 1, 1, 1, 1]
        SoilWater: same as Austria_Leibnitz.paddock.Aus_lei.SoilWater
        SoilOrganicMatter: same as Austria_Leibnitz.paddock.Aus_lei.SoilOrganicMatter
        Analysis: Thickness=[200, 200, 200, 200, 200, 200, 300]; PH=[4.5, 4.4, 4.3, 4.2, 4.1, 4, 3.9]; PHUnits=Water; BoronUnits=HotWater
        InitialWater Initial water: FractionFull=1; PercentMethod=FilledFromTop; RelativeTo=ll15
        Sample Initial nitrogen: Date=14/05/1976; NO3Units=kgha; NH4Units=ppm; SWUnits=Volumetric; OCUnits=Total; PHUnits=Water
          Thickness  NO3  NH4
          200        60   2
          200        30   0.7
          200        20   0.5
          200        20   0.4
          200        20   0.4
          200        20   0.4
          300        30   0.4
      folder Manager folder -> /Simulations/Austria_Leibnitz/paddock/Manager folder
        manager Sow on a fixed date
          #
          date = 20-apr  # Enter sowing date (dd-mmm)
          #
          crop = maize  # Enter name of crop to sow
          density = 7.72  # Enter sowing density (plants/m2)
          depth = 30  # Enter sowing depth (mm)
          cultivar = B73  # Enter cultivar
          class = plant  # Enter crop growth class
          row_spacing = 800  # Enter row spacing (mm)
          on start_of_day:
          script: same as in Austria_Leibnitz.paddock.Manager folder.Sow on a fixed date
        manager Reset on sowing
          # When should a reset be done
          modulename = maize  # The module the event is to come from
          eventname = sowing  # On which event should a reset be done
          # Reset details
          soilmodule = Fra_mons  # Name of your soil module
          surfaceommodule = surface organic matter  # Name of your surface organic matter module
          resetWater = yes  # Reset soil water?
          resetNitrogen = yes  # Reset soil nitrogen?
          resetSurfaceOM = yes  # Reset surface organic matter?
          on [modulename].[eventname]:
          script: same as in Austria_Leibnitz.paddock.Manager folder.Reset on sowing
      outputfile: filename=France_Estrees_Mons.out; title=France_Estrees_Mons
        events Reporting Frequency -> /Simulations/Austria_Leibnitz/paddock/Outputfile/Reporting Frequency
        variables
          variables: dd/mm/yyyy as Date, day_of_month, month, day, year, DaysAfterSowing, Stage, stagename, plant_status, yield, TT, MaxT, MinT, Rain, Radn, radn_int, waterSD, irrigation, biomass, lai, GrainNo, GrainSize
      maize: same as Austria_Leibnitz.paddock.maize
  simulation France_Marmande -> /Simulations/Austria_Leibnitz
    metfile met: filename=%apsim%\Model\Met\France_marmande_JRC_1975_2010.txt
    area paddock -> /Simulations/Austria_Leibnitz/paddock
      Soil Fra_mar: Latitude=0; Longitude=0
        Water
          Thickness  BD   AirDry  LL15   DUL    SAT
          200        1.3  0.091   0.273  0.374  0.445
          200        1.4  0.091   0.273  0.374  0.445
          200        1.5  0.091   0.273  0.374  0.445
          200        1.6  0.091   0.273  0.374  0.445
          200        1.6  0.091   0.273  0.374  0.445
          200        1.6  0.091   0.273  0.374  0.445
          300        1.6  0.091   0.273  0.374  0.445
          SoilCrop maize: LL=[0.273, 0.273, 0.273, 0.273, 0.273, 0.273, 0.273]; KL=[0.08, 0.08, 0.08, 0.07, 0.06, 0.06, 0.06]; XF=[1, 1, 1, 1, 1, 1, 1]
        SoilWater: same as Austria_Leibnitz.paddock.Aus_lei.SoilWater
        SoilOrganicMatter: same as Austria_Leibnitz.paddock.Aus_lei.SoilOrganicMatter
        Analysis: Thickness=[200, 200, 200, 200, 200, 200, 300]; PH=[4.5, 4.4, 4.3, 4.2, 4.1, 4, 3.9]; PHUnits=Water; BoronUnits=HotWater
        InitialWater Initial water: FractionFull=1; PercentMethod=FilledFromTop; RelativeTo=ll15
        Sample Initial nitrogen: Date=14/05/1976; NO3Units=kgha; NH4Units=ppm; SWUnits=Volumetric; OCUnits=Total; PHUnits=Water
          Thickness  NO3  NH4
          200        60   2
          200        30   0.7
          200        20   0.5
          200        20   0.4
          200        20   0.4
          200        20   0.4
          300        30   0.4
      folder Manager folder -> /Simulations/Austria_Leibnitz/paddock/Manager folder
        manager Sow on a fixed date
          #
          date = 1-apr  # Enter sowing date (dd-mmm)
          #
          crop = maize  # Enter name of crop to sow
          density = 7.51  # Enter sowing density (plants/m2)
          depth = 30  # Enter sowing depth (mm)
          cultivar = B73  # Enter cultivar
          class = plant  # Enter crop growth class
          row_spacing = 800  # Enter row spacing (mm)
          on start_of_day:
          script: same as in Austria_Leibnitz.paddock.Manager folder.Sow on a fixed date
        manager Reset on sowing
          # When should a reset be done
          modulename = maize  # The module the event is to come from
          eventname = sowing  # On which event should a reset be done
          # Reset details
          soilmodule = Fra_mar  # Name of your soil module
          surfaceommodule = surface organic matter  # Name of your surface organic matter module
          resetWater = yes  # Reset soil water?
          resetNitrogen = yes  # Reset soil nitrogen?
          resetSurfaceOM = yes  # Reset surface organic matter?
          on [modulename].[eventname]:
          script: same as in Austria_Leibnitz.paddock.Manager folder.Reset on sowing
      outputfile: filename=France_Marmande.out; title=France_Marmande
        events Reporting Frequency -> /Simulations/Austria_Leibnitz/paddock/Outputfile/Reporting Frequency
        variables
          variables: dd/mm/yyyy as Date, day_of_month, month, day, year, DaysAfterSowing, Stage, stagename, plant_status, yield, TT, MaxT, MinT, Rain, Radn, radn_int, waterSD, irrigation, biomass, lai, GrainNo, GrainSize
      maize: same as Austria_Leibnitz.paddock.maize
  simulation France_Montelier -> /Simulations/Austria_Leibnitz
    metfile met: filename=%apsim%\Model\Met\France_montelier_JRC_1975_2010.txt
    area paddock -> /Simulations/Austria_Leibnitz/paddock
      Soil Fra_mon: same as France_Avignon.paddock.Fra_av
      folder Manager folder -> /Simulations/Austria_Leibnitz/paddock/Manager folder
        manager Sow on a fixed date: same as France_Marmande.paddock.Manager folder.Sow on a fixed date
        manager Reset on sowing
          # When should a reset be done
          modulename = maize  # The module the event is to come from
          eventname = sowing  # On which event should a reset be done
          # Reset details
          soilmodule = Fra_mon  # Name of your soil module
          surfaceommodule = surface organic matter  # Name of your surface organic matter module
          resetWater = yes  # Reset soil water?
          resetNitrogen = yes  # Reset soil nitrogen?
          resetSurfaceOM = yes  # Reset surface organic matter?
          on [modulename].[eventname]:
          script: same as in Austria_Leibnitz.paddock.Manager folder.Reset on sowing
        manager Fertilise N at sowing: same as France_Avignon.paddock.Manager folder.Fertilise N at sowing
      outputfile: filename=France_Montelier.out; title=France_Montelier
        events Reporting Frequency -> /Simulations/Austria_Leibnitz/paddock/Outputfile/Reporting Frequency
        variables
          variables: dd/mm/yyyy as Date, day_of_month, month, day, year, DaysAfterSowing, Stage, stagename, plant_status, yield, TT, MaxT, MinT, Rain, Radn, radn_int, waterSD, irrigation, biomass, lai, GrainNo, GrainSize
      maize: same as Austria_Leibnitz.paddock.maize
  simulation France_Orthez -> /Simulations/Austria_Leibnitz
    metfile met: filename=%apsim%\Model\Met\France_orthez_JRC_1975_2010.txt
    area paddock -> /Simulations/Austria_Leibnitz/paddock
      Soil Fra_ort: Latitude=0; Longitude=0
        Water
          Thickness  BD   AirDry  LL15   DUL    SAT
          200        1.3  0.07    0.209  0.328  0.409
          200        1.4  0.07    0.209  0.328  0.409
          200        1.5  0.07    0.209  0.328  0.409
          200        1.6  0.07    0.209  0.328  0.409
          200        1.6  0.07    0.209  0.328  0.409
          200        1.6  0.07    0.209  0.328  0.409
          300        1.6  0.07    0.209  0.328  0.409
          SoilCrop maize: LL=[0.209, 0.209, 0.209, 0.209, 0.209, 0.209, 0.209]; KL=[0.08, 0.08, 0.08, 0.07, 0.06, 0.06, 0.06]; XF=[1, 1, 1, 1, 1, 1, 1]
        SoilWater: same as Austria_Leibnitz.paddock.Aus_lei.SoilWater
        SoilOrganicMatter: RootCN=45; RootWt=1000; SoilCN=14.5; EnrACoeff=7.4; EnrBCoeff=0.2; OCUnits=Total
          Thickness  OC   FBiom  FInert
          200        1.6  0.03   0.3
          200        1.4  0.01   0.4
          200        1.2  0      0.5
          200        1    0      0.7
          200        0.8  0      0.9
          200        0.6  0      0.9
          300        0.4  0      0.9
        Analysis: Thickness=[200, 200, 200, 200, 200, 200, 300]; PH=[4.5, 4.4, 4.3, 4.2, 4.1, 4, 3.9]; PHUnits=Water; BoronUnits=HotWater
        InitialWater Initial water: FractionFull=1; PercentMethod=FilledFromTop; RelativeTo=ll15
        Sample Initial nitrogen: Date=14/05/1976; NO3Units=kgha; NH4Units=ppm; SWUnits=Volumetric; OCUnits=Total; PHUnits=Water
          Thickness  NO3  NH4
          200        60   2
          200        30   0.7
          200        20   0.5
          200        20   0.4
          200        20   0.4
          200        20   0.4
          300        30   0.4
      folder Manager folder -> /Simulations/Austria_Leibnitz/paddock/Manager folder
        manager Sow on a fixed date
          #
          date = 1-apr  # Enter sowing date (dd-mmm)
          #
          crop = maize  # Enter name of crop to sow
          density = 7.42  # Enter sowing density (plants/m2)
          depth = 30  # Enter sowing depth (mm)
          cultivar = B73  # Enter cultivar
          class = plant  # Enter crop growth class
          row_spacing = 800  # Enter row spacing (mm)
          on start_of_day:
          script: same as in Austria_Leibnitz.paddock.Manager folder.Sow on a fixed date
        manager Reset on sowing
          # When should a reset be done
          modulename = maize  # The module the event is to come from
          eventname = sowing  # On which event should a reset be done
          # Reset details
          soilmodule = Fra_ort  # Name of your soil module
          surfaceommodule = surface organic matter  # Name of your surface organic matter module
          resetWater = yes  # Reset soil water?
          resetNitrogen = yes  # Reset soil nitrogen?
          resetSurfaceOM = yes  # Reset surface organic matter?
          on [modulename].[eventname]:
          script: same as in Austria_Leibnitz.paddock.Manager folder.Reset on sowing
      outputfile: filename=France_Orthez.out; title=France_Orthez
        events Reporting Frequency -> /Simulations/Austria_Leibnitz/paddock/Outputfile/Reporting Frequency
        variables
          variables: dd/mm/yyyy as Date, day_of_month, month, day, year, DaysAfterSowing, Stage, stagename, plant_status, yield, TT, MaxT, MinT, Rain, Radn, radn_int, waterSD, irrigation, biomass, lai, GrainNo, GrainSize
      maize: same as Austria_Leibnitz.paddock.maize
  simulation France_Ouges -> /Simulations/Austria_Leibnitz
    clock
      start_date = 27/01/2001  # Enter the start date of the simulation
      end_date = 31/12/2011  # Enter the end date of the simulation
    metfile met: filename=%apsim%\Model\Met\France_Ouges_2001_2011.txt
    area paddock -> /Simulations/Austria_Leibnitz/paddock
      Soil Fra_oug: same as France_Estrees_Mons.paddock.Fra_mons
      folder Manager folder -> /Simulations/Austria_Leibnitz/paddock/Manager folder
        manager Sow on a fixed date
          #
          date = 10-apr  # Enter sowing date (dd-mmm)
          #
          crop = maize  # Enter name of crop to sow
          density = 7.72  # Enter sowing density (plants/m2)
          depth = 30  # Enter sowing depth (mm)
          cultivar = B73  # Enter cultivar
          class = plant  # Enter crop growth class
          row_spacing = 800  # Enter row spacing (mm)
          on start_of_day:
          script: same as in Austria_Leibnitz.paddock.Manager folder.Sow on a fixed date
        manager Reset on sowing
          # When should a reset be done
          modulename = maize  # The module the event is to come from
          eventname = sowing  # On which event should a reset be done
          # Reset details
          soilmodule = Fra_oug  # Name of your soil module
          surfaceommodule = surface organic matter  # Name of your surface organic matter module
          resetWater = yes  # Reset soil water?
          resetNitrogen = yes  # Reset soil nitrogen?
          resetSurfaceOM = yes  # Reset surface organic matter?
          on [modulename].[eventname]:
          script: same as in Austria_Leibnitz.paddock.Manager folder.Reset on sowing
      outputfile: filename=France_Ouges.out; title=France_Ouges
        events Reporting Frequency -> /Simulations/Austria_Leibnitz/paddock/Outputfile/Reporting Frequency
        variables
          variables: dd/mm/yyyy as Date, day_of_month, month, day, year, DaysAfterSowing, Stage, stagename, plant_status, yield, TT, MaxT, MinT, Rain, Radn, radn_int, waterSD, irrigation, biomass, lai, GrainNo, GrainSize
      maize: same as Austria_Leibnitz.paddock.maize
  simulation France_Palaminy -> /Simulations/Austria_Leibnitz
    metfile met: filename=%apsim%\Model\Met\France_palaminy_JRC_1975_2010.txt
    area paddock -> /Simulations/Austria_Leibnitz/paddock
      Soil Fra_pal: Latitude=0; Longitude=0
        Water
          Thickness  BD   AirDry  LL15   DUL    SAT
          200        1.3  0.086   0.257  0.409  0.474
          200        1.4  0.086   0.257  0.409  0.474
          200        1.5  0.086   0.257  0.409  0.474
          200        1.6  0.086   0.257  0.409  0.474
          200        1.6  0.086   0.257  0.409  0.474
          200        1.6  0.086   0.257  0.409  0.474
          300        1.6  0.086   0.257  0.409  0.474
          SoilCrop maize: LL=[0.26, 0.26, 0.26, 0.26, 0.26, 0.26, 0.26]; KL=[0.08, 0.08, 0.08, 0.07, 0.06, 0.06, 0.06]; XF=[1, 1, 1, 1, 1, 1, 1]
        SoilWater: same as Austria_Leibnitz.paddock.Aus_lei.SoilWater
        SoilOrganicMatter: RootCN=45; RootWt=1000; SoilCN=14.5; EnrACoeff=7.4; EnrBCoeff=0.2; OCUnits=Total
          Thickness  OC   FBiom  FInert
          200        1.4  0.03   0.3
          200        1.2  0.01   0.4
          200        1    0      0.5
          200        0.8  0      0.7
          200        0.6  0      0.9
          200        0.4  0      0.9
          300        0.2  0      0.9
        Analysis: Thickness=[200, 200, 200, 200, 200, 200, 300]; PH=[6, 5.9, 5.8, 5.7, 5.6, 5.5, 5.4]; PHUnits=Water; BoronUnits=HotWater
        InitialWater Initial water: FractionFull=1; PercentMethod=FilledFromTop; RelativeTo=ll15
        Sample Initial nitrogen: Date=14/05/1976; NO3Units=kgha; NH4Units=ppm; SWUnits=Volumetric; OCUnits=Total; PHUnits=Water
          Thickness  NO3  NH4
          200        60   2
          200        30   0.7
          200        20   0.5
          200        20   0.4
          200        20   0.4
          200        20   0.4
          300        30   0.4
      folder Manager folder -> /Simulations/Austria_Leibnitz/paddock/Manager folder
        manager Sow on a fixed date: same as France_Orthez.paddock.Manager folder.Sow on a fixed date
        manager Reset on sowing
          # When should a reset be done
          modulename = maize  # The module the event is to come from
          eventname = sowing  # On which event should a reset be done
          # Reset details
          soilmodule = Fra_pal  # Name of your soil module
          surfaceommodule = surface organic matter  # Name of your surface organic matter module
          resetWater = yes  # Reset soil water?
          resetNitrogen = yes  # Reset soil nitrogen?
          resetSurfaceOM = yes  # Reset surface organic matter?
          on [modulename].[eventname]:
          script: same as in Austria_Leibnitz.paddock.Manager folder.Reset on sowing
      outputfile: filename=France_Palaminy.out; title=France_Palaminy
        events Reporting Frequency -> /Simulations/Austria_Leibnitz/paddock/Outputfile/Reporting Frequency
        variables
          variables: dd/mm/yyyy as Date, day_of_month, month, day, year, DaysAfterSowing, Stage, stagename, plant_status, yield, TT, MaxT, MinT, Rain, Radn, radn_int, waterSD, irrigation, biomass, lai, GrainNo, GrainSize
      maize: same as Austria_Leibnitz.paddock.maize
  simulation France_Pamproux -> /Simulations/Austria_Leibnitz
    metfile met: filename=%apsim%\Model\Met\France_pamproux_JRC_1975_2010.txt
    area paddock -> /Simulations/Austria_Leibnitz/paddock
      folder Manager folder -> /Simulations/Austria_Leibnitz/paddock/Manager folder
        manager Sow on a fixed date
          #
          date = 20-apr  # Enter sowing date (dd-mmm)
          #
          crop = maize  # Enter name of crop to sow
          density = 7.60  # Enter sowing density (plants/m2)
          depth = 30  # Enter sowing depth (mm)
          cultivar = B73  # Enter cultivar
          class = plant  # Enter crop growth class
          row_spacing = 800  # Enter row spacing (mm)
          on start_of_day:
          script: same as in Austria_Leibnitz.paddock.Manager folder.Sow on a fixed date
        manager Reset on sowing
          # When should a reset be done
          modulename = maize  # The module the event is to come from
          eventname = sowing  # On which event should a reset be done
          # Reset details
          soilmodule = Fra_pam  # Name of your soil module
          surfaceommodule = surface organic matter  # Name of your surface organic matter module
          resetWater = yes  # Reset soil water?
          resetNitrogen = yes  # Reset soil nitrogen?
          resetSurfaceOM = yes  # Reset surface organic matter?
          on [modulename].[eventname]:
          script: same as in Austria_Leibnitz.paddock.Manager folder.Reset on sowing
      Soil Fra_pam: Latitude=0; Longitude=0
        Water
          Thickness  BD   AirDry  LL15   DUL    SAT
          200        1.3  0.012   0.037  0.335  0.422
          200        1.4  0.012   0.037  0.335  0.422
          200        1.5  0.012   0.037  0.335  0.422
          200        1.6  0.012   0.037  0.335  0.422
          200        1.6  0.012   0.037  0.335  0.422
          200        1.6  0.012   0.037  0.335  0.422
          300        1.6  0.012   0.037  0.335  0.422
          SoilCrop maize: LL=[0.037, 0.037, 0.037, 0.037, 0.037, 0.037, 0.037]; KL=[0.08, 0.08, 0.08, 0.07, 0.06, 0.06, 0.06]; XF=[1, 1, 1, 1, 1, 1, 1]
        SoilWater: same as Austria_Leibnitz.paddock.Aus_lei.SoilWater
        SoilOrganicMatter: RootCN=45; RootWt=1000; SoilCN=14.5; EnrACoeff=7.4; EnrBCoeff=0.2; OCUnits=Total
          Thickness  OC   FBiom  FInert
          200        1    0.03   0.3
          200        0.8  0.01   0.4
          200        0.6  0      0.5
          200        0.4  0      0.7
          200        0.2  0      0.9
          200        0.1  0      0.9
          300        0.1  0      0.9
        Analysis: Thickness=[200, 200, 200, 200, 200, 200, 300]; PH=[5.5, 5.4, 5.3, 5.2, 5.1, 5, 4.9]; PHUnits=Water; BoronUnits=HotWater
        InitialWater Initial water: FractionFull=1; PercentMethod=FilledFromTop; RelativeTo=ll15
        Sample Initial nitrogen: Date=14/05/1976; NO3Units=kgha; NH4Units=ppm; SWUnits=Volumetric; OCUnits=Total; PHUnits=Water
          Thickness  NO3  NH4
          200        60   2
          200        30   0.7
          200        20   0.5
          200        20   0.4
          200        20   0.4
          200        20   0.4
          300        30   0.4
      outputfile: filename=France_Pamproux.out; title=France_Pamproux
        events Reporting Frequency -> /Simulations/Austria_Leibnitz/paddock/Outputfile/Reporting Frequency
        variables
          variables: dd/mm/yyyy as Date, day_of_month, month, day, year, DaysAfterSowing, Stage, stagename, plant_status, yield, TT, MaxT, MinT, Rain, Radn, radn_int, waterSD, irrigation, biomass, lai, GrainNo, GrainSize
      maize: same as Austria_Leibnitz.paddock.maize
  simulation France_Patay -> /Simulations/Austria_Leibnitz
    metfile met: filename=%apsim%\Model\Met\France_patay_JRC_1975_2010.txt
    area paddock -> /Simulations/Austria_Leibnitz/paddock
      Soil Fra_pat: same as France_Estrees_Mons.paddock.Fra_mons
      folder Manager folder -> /Simulations/Austria_Leibnitz/paddock/Manager folder
        manager Sow on a fixed date: same as France_Estrees_Mons.paddock.Manager folder.Sow on a fixed date
        manager Reset on sowing
          # When should a reset be done
          modulename = maize  # The module the event is to come from
          eventname = sowing  # On which event should a reset be done
          # Reset details
          soilmodule = Fra_pat  # Name of your soil module
          surfaceommodule = surface organic matter  # Name of your surface organic matter module
          resetWater = yes  # Reset soil water?
          resetNitrogen = yes  # Reset soil nitrogen?
          resetSurfaceOM = yes  # Reset surface organic matter?
          on [modulename].[eventname]:
          script: same as in Austria_Leibnitz.paddock.Manager folder.Reset on sowing
      outputfile: filename=France_Patay.out; title=France_Patay
        events Reporting Frequency -> /Simulations/Austria_Leibnitz/paddock/Outputfile/Reporting Frequency
        variables
          variables: dd/mm/yyyy as Date, day_of_month, month, day, year, DaysAfterSowing, Stage, stagename, plant_status, yield, TT, MaxT, MinT, Rain, Radn, radn_int, waterSD, irrigation, biomass, lai, GrainNo, GrainSize
      maize: same as Austria_Leibnitz.paddock.maize
  simulation France_Saint_Bonnet -> /Simulations/Austria_Leibnitz
    metfile met: filename=%apsim%\Model\Met\France_saint_bonnet_JRC_1975_2010.txt
    area paddock -> /Simulations/Austria_Leibnitz/paddock
      folder Manager folder -> /Simulations/Austria_Leibnitz/paddock/Manager folder
        manager Sow on a fixed date
          #
          date = 1-apr  # Enter sowing date (dd-mmm)
          #
          crop = maize  # Enter name of crop to sow
          density = 7.57  # Enter sowing density (plants/m2)
          depth = 30  # Enter sowing depth (mm)
          cultivar = B73  # Enter cultivar
          class = plant  # Enter crop growth class
          row_spacing = 800  # Enter row spacing (mm)
          on start_of_day:
          script: same as in Austria_Leibnitz.paddock.Manager folder.Sow on a fixed date
        manager Reset on sowing
          # When should a reset be done
          modulename = maize  # The module the event is to come from
          eventname = sowing  # On which event should a reset be done
          # Reset details
          soilmodule = Fra_stb  # Name of your soil module
          surfaceommodule = surface organic matter  # Name of your surface organic matter module
          resetWater = yes  # Reset soil water?
          resetNitrogen = yes  # Reset soil nitrogen?
          resetSurfaceOM = yes  # Reset surface organic matter?
          on [modulename].[eventname]:
          script: same as in Austria_Leibnitz.paddock.Manager folder.Reset on sowing
      Soil Fra_stb
        Water
          Thickness  BD   AirDry  LL15   DUL    SAT
          200        1.3  0.014   0.042  0.338  0.425
          200        1.4  0.014   0.042  0.338  0.425
          200        1.5  0.014   0.042  0.338  0.425
          200        1.6  0.014   0.042  0.338  0.425
          200        1.6  0.014   0.042  0.338  0.425
          200        1.6  0.014   0.042  0.338  0.425
          300        1.6  0.014   0.042  0.338  0.425
          SoilCrop maize: LL=[0.042, 0.042, 0.042, 0.042, 0.042, 0.042, 0.042]; KL=[0.08, 0.08, 0.08, 0.07, 0.06, 0.06, 0.06]; XF=[1, 1, 1, 1, 1, 1, 1]
        SoilWater: same as Austria_Leibnitz.paddock.Aus_lei.SoilWater
        SoilOrganicMatter: RootCN=45; RootWt=1000; SoilCN=14.5; EnrACoeff=7.4; EnrBCoeff=0.2; OCUnits=Total
          Thickness  OC   FBiom  FInert
          200        4    0.03   0.3
          200        3.8  0.01   0.4
          200        3.6  0      0.5
          200        3.4  0      0.7
          200        3.2  0      0.9
          200        3    0      0.9
          300        2.8  0      0.9
        Analysis: Thickness=[200, 200, 200, 200, 200, 200, 300]; PH=[4.5, 4.4, 4.3, 4.2, 4.1, 4, 3.9]; PHUnits=Water; BoronUnits=HotWater
        InitialWater Initial water: FractionFull=1; PercentMethod=FilledFromTop; RelativeTo=ll15
        Sample Initial nitrogen: Date=14/05/1976; NO3Units=kgha; NH4Units=ppm; SWUnits=Volumetric; OCUnits=Total; PHUnits=Water
          Thickness  NO3  NH4
          200        60   2
          200        30   0.7
          200        20   0.5
          200        20   0.4
          200        20   0.4
          200        20   0.4
          300        30   0.4
      outputfile: filename=France_Saint_Bonnet.out; title=France_Saint_Bonnet
        events Reporting Frequency -> /Simulations/Austria_Leibnitz/paddock/Outputfile/Reporting Frequency
        variables
          variables: dd/mm/yyyy as Date, day_of_month, month, day, year, DaysAfterSowing, Stage, stagename, plant_status, yield, TT, MaxT, MinT, Rain, Radn, radn_int, waterSD, irrigation, biomass, lai, GrainNo, GrainSize
      maize: same as Austria_Leibnitz.paddock.maize
  simulation France_Toulouse -> /Simulations/Austria_Leibnitz
    metfile met: filename=%apsim%\Model\Met\France_toulouse_JRC_1975_2010.txt
    area paddock -> /Simulations/Austria_Leibnitz/paddock
      folder Manager folder -> /Simulations/Austria_Leibnitz/paddock/Manager folder
        manager Sow on a fixed date
          #
          date = 20-mar  # Enter sowing date (dd-mmm)
          #
          crop = maize  # Enter name of crop to sow
          density = 7.45  # Enter sowing density (plants/m2)
          depth = 30  # Enter sowing depth (mm)
          cultivar = B73  # Enter cultivar
          class = plant  # Enter crop growth class
          row_spacing = 800  # Enter row spacing (mm)
          on start_of_day:
```
if (today = date('[date]') then
   season = current_season
   SowDay = day
   SowYear = year
   TT = DeltaTT
   InCropRain = rain
   [crop] sow plants =[density], sowing_depth = [depth], cultivar = [cultivar], row_spacing = [row_spacing], crop_class = [class]
endif
```
        manager Reset on sowing
          # When should a reset be done
          modulename = maize  # The module the event is to come from
          eventname = sowing  # On which event should a reset be done
          # Reset details
          soilmodule = Fra_tou  # Name of your soil module
          surfaceommodule = surface organic matter  # Name of your surface organic matter module
          resetWater = yes  # Reset soil water?
          resetNitrogen = yes  # Reset soil nitrogen?
          resetSurfaceOM = yes  # Reset surface organic matter?
          on [modulename].[eventname]:
          script: same as in Austria_Leibnitz.paddock.Manager folder.Reset on sowing
      Soil Fra_tou: Latitude=0; Longitude=0
        Water
          Thickness  BD   AirDry  LL15   DUL    SAT
          200        1.3  0.089   0.266  0.366  0.442
          200        1.4  0.089   0.266  0.366  0.442
          200        1.5  0.089   0.266  0.366  0.442
          200        1.6  0.089   0.266  0.366  0.442
          200        1.6  0.089   0.266  0.366  0.442
          200        1.6  0.089   0.266  0.366  0.442
          300        1.6  0.089   0.266  0.366  0.442
          SoilCrop maize: LL=[0.266, 0.266, 0.266, 0.266, 0.266, 0.266, 0.266]; KL=[0.08, 0.08, 0.08, 0.07, 0.06, 0.06, 0.06]; XF=[1, 1, 1, 1, 1, 1, 1]
        SoilWater: SummerCona=1.5; SummerU=6; SummerDate=1-Nov; WinterCona=1.5; WinterU=6; WinterDate=1-Apr; DiffusConst=88; DiffusSlope=35; Salb=0.13; CN2Bare=81; CNRed=1; CNCov=0.2; Thickness=[200, 200, 200, 200, 200, 200, 600]; SWCON=[0.5, 0.5, 0.5, 0.5, 0.5, 0.5, 0.5]
        SoilOrganicMatter: RootCN=45; RootWt=1000; SoilCN=14.5; EnrACoeff=7.4; EnrBCoeff=0.2; OCUnits=Total
          Thickness  OC   FBiom  FInert
          200        0.8  0.03   0.3
          200        0.2  0.01   0.4
          200        0.1  0      0.5
          200        0.1  0      0.7
          200        0.1  0      0.9
          200        0.1  0      0.99
          600        0.1  0      0.99
        Analysis: Thickness=[200, 200, 200, 200, 200, 200, 600]; PH=[6, 6, 6, 6, 6, 6, 6]
        InitialWater Initial water: RelativeTo=ll15; FractionFull=1; PercentMethod=FilledFromTop
        Sample Initial nitrogen: Date=14/05/1976; NO3Units=kgha; NH4Units=ppm; SWUnits=Volumetric; OCUnits=Total; PHUnits=Water
          Thickness  NO3  NH4
          200        60   2
          200        30   0.7
          200        20   0.5
          200        20   0.4
          200        20   0.4
          200        20   0.4
          600        30   0.4
      outputfile: filename=France_Toulouse.out; title=France_Toulouse
        events Reporting Frequency -> /Simulations/Austria_Leibnitz/paddock/Outputfile/Reporting Frequency
        variables
          variables: dd/mm/yyyy as Date, day_of_month, month, day, year, DaysAfterSowing, Stage, stagename, plant_status, yield, TT, MaxT, MinT, Rain, Radn, radn_int, waterSD, irrigation, biomass, lai, GrainNo, GrainSize
      maize: same as Austria_Leibnitz.paddock.maize
  simulation France_Vitre -> /Simulations/Austria_Leibnitz
    metfile met: filename=%apsim%\Model\Met\France_vitre_JRC_1975_2010.txt
    area paddock -> /Simulations/Austria_Leibnitz/paddock
      folder Manager folder -> /Simulations/Austria_Leibnitz/paddock/Manager folder
        manager Sow on a fixed date: same as France_Ouges.paddock.Manager folder.Sow on a fixed date
        manager Reset on sowing
          # When should a reset be done
          modulename = maize  # The module the event is to come from
          eventname = sowing  # On which event should a reset be done
          # Reset details
          soilmodule = Fra_vit  # Name of your soil module
          surfaceommodule = surface organic matter  # Name of your surface organic matter module
          resetWater = yes  # Reset soil water?
          resetNitrogen = yes  # Reset soil nitrogen?
          resetSurfaceOM = yes  # Reset surface organic matter?
          on [modulename].[eventname]:
          script: same as in Austria_Leibnitz.paddock.Manager folder.Reset on sowing
      Soil Fra_vit: Latitude=0; Longitude=0
        Water
          Thickness  BD   AirDry  LL15   DUL   SAT
          200        1.3  0.069   0.207  0.32  0.404
          200        1.4  0.069   0.207  0.32  0.404
          200        1.5  0.069   0.207  0.32  0.404
          200        1.6  0.069   0.207  0.32  0.404
          200        1.6  0.069   0.207  0.32  0.404
          200        1.6  0.069   0.207  0.32  0.404
          300        1.6  0.069   0.207  0.32  0.404
          SoilCrop maize: LL=[0.207, 0.207, 0.207, 0.207, 0.207, 0.207, 0.207]; KL=[0.08, 0.08, 0.08, 0.07, 0.06, 0.06, 0.06]; XF=[1, 1, 1, 1, 1, 1, 1]
        SoilWater: same as Austria_Leibnitz.paddock.Aus_lei.SoilWater
        SoilOrganicMatter: RootCN=45; RootWt=1000; SoilCN=14.5; EnrACoeff=7.4; EnrBCoeff=0.2; OCUnits=Total
          Thickness  OC   FBiom  FInert
          200        0.7  0.03   0.3
          200        0.5  0.01   0.4
          200        0.3  0      0.5
          200        0.1  0      0.7
          200        0.1  0      0.9
          200        0.1  0      0.9
          300        0.1  0      0.9
        Analysis: Thickness=[200, 200, 200, 200, 200, 200, 300]; PH=[4, 3.9, 3.8, 3.7, 3.6, 3.5, 3.5]; PHUnits=Water; BoronUnits=HotWater
        InitialWater Initial water: FractionFull=1; PercentMethod=FilledFromTop; RelativeTo=ll15
        Sample Initial nitrogen: Date=14/05/1976; NO3Units=kgha; NH4Units=ppm; SWUnits=Volumetric; OCUnits=Total; PHUnits=Water
          Thickness  NO3  NH4
          200        60   2
          200        30   0.7
          200        20   0.5
          200        20   0.4
          200        20   0.4
          200        20   0.4
          300        30   0.4
      outputfile: filename=France_Vitre.out; title=France_Vitre
        events Reporting Frequency -> /Simulations/Austria_Leibnitz/paddock/Outputfile/Reporting Frequency
        variables
          variables: dd/mm/yyyy as Date, day_of_month, month, day, year, DaysAfterSowing, Stage, stagename, plant_status, yield, TT, MaxT, MinT, Rain, Radn, radn_int, waterSD, irrigation, biomass, lai, GrainNo, GrainSize
      maize: same as Austria_Leibnitz.paddock.maize
  simulation Germany_Augsburg -> /Simulations/Austria_Leibnitz
    metfile met: filename=%apsim%\Model\Met\Germany_augsburg_JRC_1975_2010.txt
    area paddock -> /Simulations/Austria_Leibnitz/paddock
      folder Manager folder -> /Simulations/Austria_Leibnitz/paddock/Manager folder
        manager Sow on a fixed date
          #
          date = 30-apr  # Enter sowing date (dd-mmm)
          #
          crop = maize  # Enter name of crop to sow
          density = 7.72  # Enter sowing density (plants/m2)
          depth = 30  # Enter sowing depth (mm)
          cultivar = B73  # Enter cultivar
          class = plant  # Enter crop growth class
          row_spacing = 800  # Enter row spacing (mm)
          on start_of_day:
          script: same as in Austria_Leibnitz.paddock.Manager folder.Sow on a fixed date
        manager Reset on sowing
          # When should a reset be done
          modulename = maize  # The module the event is to come from
          eventname = sowing  # On which event should a reset be done
          # Reset details
          soilmodule = Ger_aug  # Name of your soil module
          surfaceommodule = surface organic matter  # Name of your surface organic matter module
          resetWater = yes  # Reset soil water?
          resetNitrogen = yes  # Reset soil nitrogen?
          resetSurfaceOM = yes  # Reset surface organic matter?
          on [modulename].[eventname]:
          script: same as in Austria_Leibnitz.paddock.Manager folder.Reset on sowing
      Soil Ger_aug: Latitude=0; Longitude=0
        Water
          Thickness  BD   AirDry  LL15   DUL  SAT
          200        1.3  0.062   0.186  0.3  0.418
          200        1.4  0.062   0.186  0.3  0.418
          200        1.5  0.062   0.186  0.3  0.418
          200        1.6  0.062   0.186  0.3  0.418
          200        1.6  0.062   0.186  0.3  0.418
          200        1.6  0.062   0.186  0.3  0.418
          300        1.6  0.062   0.186  0.3  0.418
          SoilCrop maize: LL=[0.186, 0.186, 0.186, 0.186, 0.186, 0.186, 0.186]; KL=[0.08, 0.08, 0.08, 0.07, 0.06, 0.06, 0.06]; XF=[1, 1, 1, 1, 1, 1, 1]
        SoilWater: same as Austria_Leibnitz.paddock.Aus_lei.SoilWater
        SoilOrganicMatter: same as Bulgaria_Glavinitsa.paddock.Bul_gla.SoilOrganicMatter
        Analysis: Thickness=[200, 200, 200, 200, 200, 200, 300]; PH=[4.5, 4.4, 4.3, 4.2, 4.1, 4, 3.9]; PHUnits=Water; BoronUnits=HotWater
        InitialWater Initial water: FractionFull=1; PercentMethod=FilledFromTop; RelativeTo=ll15
        Sample Initial nitrogen: Date=14/05/1976; NO3Units=kgha; NH4Units=ppm; SWUnits=Volumetric; OCUnits=Total; PHUnits=Water
          Thickness  NO3  NH4
          200        60   2
          200        30   0.7
          200        20   0.5
          200        20   0.4
          200        20   0.4
          200        20   0.4
          300        30   0.4
      outputfile: filename=Germany_Augsburg.out; title=Germany_Augsburg
        events Reporting Frequency -> /Simulations/Austria_Leibnitz/paddock/Outputfile/Reporting Frequency
        variables
          variables: dd/mm/yyyy as Date, day_of_month, month, day, year, DaysAfterSowing, Stage, stagename, plant_status, yield, TT, MaxT, MinT, Rain, Radn, radn_int, waterSD, irrigation, biomass, lai, GrainNo, GrainSize
      maize: same as Austria_Leibnitz.paddock.maize
  simulation Germany_Hanover -> /Simulations/Austria_Leibnitz
    metfile met: filename=%apsim%\Model\Met\Germany_hanover_JRC_1975_2010.txt
    area paddock -> /Simulations/Austria_Leibnitz/paddock
      folder Manager folder -> /Simulations/Austria_Leibnitz/paddock/Manager folder
        manager Sow on a fixed date
          #
          date = 30-apr  # Enter sowing date (dd-mmm)
          #
          crop = maize  # Enter name of crop to sow
          density = 7.96  # Enter sowing density (plants/m2)
          depth = 30  # Enter sowing depth (mm)
          cultivar = B73  # Enter cultivar
          class = plant  # Enter crop growth class
          row_spacing = 800  # Enter row spacing (mm)
          on start_of_day:
          script: same as in Austria_Leibnitz.paddock.Manager folder.Sow on a fixed date
        manager Reset on sowing
          # When should a reset be done
          modulename = maize  # The module the event is to come from
          eventname = sowing  # On which event should a reset be done
          # Reset details
          soilmodule = Ger_han  # Name of your soil module
          surfaceommodule = surface organic matter  # Name of your surface organic matter module
          resetWater = yes  # Reset soil water?
          resetNitrogen = yes  # Reset soil nitrogen?
          resetSurfaceOM = yes  # Reset surface organic matter?
          on [modulename].[eventname]:
          script: same as in Austria_Leibnitz.paddock.Manager folder.Reset on sowing
      Soil Ger_han: Latitude=0; Longitude=0
        Water
          Thickness  BD   AirDry  LL15   DUL    SAT
          200        1.3  0.045   0.135  0.245  0.394
          200        1.4  0.045   0.135  0.245  0.394
          200        1.5  0.045   0.135  0.245  0.394
          200        1.6  0.045   0.135  0.245  0.394
          200        1.6  0.045   0.135  0.245  0.394
          200        1.6  0.045   0.135  0.245  0.394
          300        1.6  0.045   0.135  0.245  0.394
          SoilCrop maize: LL=[0.135, 0.135, 0.135, 0.135, 0.135, 0.135, 0.135]; KL=[0.08, 0.08, 0.08, 0.07, 0.06, 0.06, 0.06]; XF=[1, 1, 1, 1, 1, 1, 1]
        SoilWater: same as Austria_Leibnitz.paddock.Aus_lei.SoilWater
        SoilOrganicMatter: same as France_Avignon.paddock.Fra_av.SoilOrganicMatter
        Analysis: Thickness=[200, 200, 200, 200, 200, 200, 300]; PH=[6, 5.9, 5.8, 5.7, 5.6, 5.5, 5.4]; PHUnits=Water; BoronUnits=HotWater
        InitialWater Initial water: FractionFull=1; PercentMethod=FilledFromTop; RelativeTo=ll15
        Sample Initial nitrogen: Date=14/05/1976; NO3Units=kgha; NH4Units=ppm; SWUnits=Volumetric; OCUnits=Total; PHUnits=Water
          Thickness  NO3  NH4
          200        60   2
          200        30   0.7
          200        20   0.5
          200        20   0.4
          200        20   0.4
          200        20   0.4
          300        30   0.4
      outputfile: filename=Germany_Hanover.out; title=Germany_Hanover
        events Reporting Frequency -> /Simulations/Austria_Leibnitz/paddock/Outputfile/Reporting Frequency
        variables
          variables: dd/mm/yyyy as Date, day_of_month, month, day, year, DaysAfterSowing, Stage, stagename, plant_status, yield, TT, MaxT, MinT, Rain, Radn, radn_int, waterSD, irrigation, biomass, lai, GrainNo, GrainSize, leaflength(14), leaflength(15), leaflength(16)
      maize: same as Austria_Leibnitz.paddock.maize
  simulation Germany_Werl -> /Simulations/Austria_Leibnitz
    metfile met: filename=%apsim%\Model\Met\Germany_werl_JRC_1975_2010.txt
    area paddock -> /Simulations/Austria_Leibnitz/paddock
      folder Manager folder -> /Simulations/Austria_Leibnitz/paddock/Manager folder
        manager Sow on a fixed date
          #
          date = 30-apr  # Enter sowing date (dd-mmm)
          #
          crop = maize  # Enter name of crop to sow
          density = 7.93  # Enter sowing density (plants/m2)
          depth = 30  # Enter sowing depth (mm)
          cultivar = B73  # Enter cultivar
          class = plant  # Enter crop growth class
          row_spacing = 800  # Enter row spacing (mm)
          on start_of_day:
          script: same as in Austria_Leibnitz.paddock.Manager folder.Sow on a fixed date
        manager Reset on sowing
          # When should a reset be done
          modulename = maize  # The module the event is to come from
          eventname = sowing  # On which event should a reset be done
          # Reset details
          soilmodule = Ger_wer  # Name of your soil module
          surfaceommodule = surface organic matter  # Name of your surface organic matter module
          resetWater = yes  # Reset soil water?
          resetNitrogen = yes  # Reset soil nitrogen?
          resetSurfaceOM = yes  # Reset surface organic matter?
          on [modulename].[eventname]:
          script: same as in Austria_Leibnitz.paddock.Manager folder.Reset on sowing
      Soil Ger_wer: Latitude=0; Longitude=0
        Water
          Thickness  BD   AirDry  LL15   DUL    SAT
          200        1.3  0.074   0.221  0.323  0.425
          200        1.4  0.074   0.221  0.323  0.425
          200        1.5  0.074   0.221  0.323  0.425
          200        1.6  0.074   0.221  0.323  0.425
          200        1.6  0.074   0.221  0.323  0.425
          200        1.6  0.074   0.221  0.323  0.425
          300        1.6  0.074   0.221  0.323  0.425
          SoilCrop maize: LL=[0.221, 0.221, 0.221, 0.221, 0.221, 0.221, 0.221]; KL=[0.08, 0.08, 0.08, 0.07, 0.06, 0.06, 0.06]; XF=[1, 1, 1, 1, 1, 1, 1]
        SoilWater: same as Austria_Leibnitz.paddock.Aus_lei.SoilWater
        SoilOrganicMatter: RootCN=45; RootWt=1000; SoilCN=14.5; EnrACoeff=7.4; EnrBCoeff=0.2; OCUnits=Total
          Thickness  OC    FBiom  FInert
          200        0.7   0.03   0.3
          200        0.5   0.01   0.4
          200        0.3   0      0.5
          200        0.1   0      0.7
          200        0.01  0      0.9
          200        0.01  0      0.9
          300        0.01  0      0.9
        Analysis: Thickness=[200, 200, 200, 200, 200, 200, 300]; PH=[4, 3.9, 3.8, 3.7, 3.6, 3.5, 3.4]; PHUnits=Water; BoronUnits=HotWater
        InitialWater Initial water: FractionFull=1; PercentMethod=FilledFromTop; RelativeTo=ll15
        Sample Initial nitrogen: Date=14/05/1976; NO3Units=kgha; NH4Units=ppm; SWUnits=Volumetric; OCUnits=Total; PHUnits=Water
          Thickness  NO3  NH4
          200        60   2
          200        30   0.7
          200        20   0.5
          200        20   0.4
          200        20   0.4
          200        20   0.4
          300        30   0.4
      outputfile: filename=Germany_Werl.out; title=Germany_Werl
        events Reporting Frequency -> /Simulations/Austria_Leibnitz/paddock/Outputfile/Reporting Frequency
        variables
          variables: dd/mm/yyyy as Date, day_of_month, month, day, year, DaysAfterSowing, Stage, stagename, plant_status, yield, TT, MaxT, MinT, Rain, Radn, radn_int, waterSD, irrigation, biomass, lai, GrainNo, GrainSize
      maize: same as Austria_Leibnitz.paddock.maize
  simulation Greece_Evropos -> /Simulations/Austria_Leibnitz
    metfile met: filename=%apsim%\Model\Met\Greece_evropos_JRC_1975_2010.txt
    area paddock -> /Simulations/Austria_Leibnitz/paddock
      folder Manager folder -> /Simulations/Austria_Leibnitz/paddock/Manager folder
        manager Sow on a fixed date
          #
          date = 20-mar  # Enter sowing date (dd-mmm)
          #
          crop = maize  # Enter name of crop to sow
          density = 7.3  # Enter sowing density (plants/m2)
          depth = 30  # Enter sowing depth (mm)
          cultivar = B73  # Enter cultivar
          class = plant  # Enter crop growth class
          row_spacing = 800  # Enter row spacing (mm)
          on start_of_day:
          script: same as in France_Toulouse.paddock.Manager folder.Sow on a fixed date
        manager Reset on sowing
          # When should a reset be done
          modulename = maize  # The module the event is to come from
          eventname = sowing  # On which event should a reset be done
          # Reset details
          soilmodule = Greece_evro  # Name of your soil module
          surfaceommodule = surface organic matter  # Name of your surface organic matter module
          resetWater = yes  # Reset soil water?
          resetNitrogen = yes  # Reset soil nitrogen?
          resetSurfaceOM = yes  # Reset surface organic matter?
          on [modulename].[eventname]:
          script: same as in Austria_Leibnitz.paddock.Manager folder.Reset on sowing
      Soil Greece_evro: Latitude=0; Longitude=0
        Water
          Thickness  BD   AirDry  LL15  DUL   SAT
          200        1.3  0.08    0.24  0.39  0.44
          200        1.4  0.08    0.24  0.39  0.44
          200        1.5  0.08    0.24  0.39  0.44
          200        1.6  0.08    0.24  0.39  0.44
          200        1.6  0.08    0.24  0.39  0.44
          200        1.6  0.08    0.24  0.39  0.44
          300        1.6  0.08    0.24  0.39  0.44
          SoilCrop maize: LL=[0.24, 0.24, 0.24, 0.24, 0.24, 0.24, 0.24]; KL=[0.08, 0.08, 0.08, 0.07, 0.06, 0.06, 0.06]; XF=[1, 1, 1, 1, 1, 1, 1]
        SoilWater: same as Austria_Leibnitz.paddock.Aus_lei.SoilWater
        SoilOrganicMatter: same as France_Pamproux.paddock.Fra_pam.SoilOrganicMatter
        Analysis: Thickness=[200, 200, 200, 200, 200, 200, 300]; PH=[6.5, 6.4, 6.3, 6.2, 6.1, 6, 5.9]; PHUnits=Water; BoronUnits=HotWater
        InitialWater Initial water: FractionFull=1; PercentMethod=FilledFromTop; RelativeTo=ll15
        Sample Initial nitrogen: Date=14/05/1976; NO3Units=kgha; NH4Units=ppm; SWUnits=Volumetric; OCUnits=Total; PHUnits=Water
          Thickness  NO3  NH4
          200        60   2
          200        30   0.7
          200        20   0.5
          200        20   0.4
          200        20   0.4
          200        20   0.4
          300        30   0.4
      outputfile: filename=Greece_Evropos.out; title=Greece_Evropos
        events Reporting Frequency -> /Simulations/Austria_Leibnitz/paddock/Outputfile/Reporting Frequency
        variables
          variables: dd/mm/yyyy as Date, day_of_month, month, day, year, DaysAfterSowing, Stage, stagename, plant_status, yield, TT, MaxT, MinT, Rain, Radn, radn_int, waterSD, irrigation, biomass, lai, GrainNo, GrainSize
      maize: same as Austria_Leibnitz.paddock.maize
  simulation Hungary_Foldeak -> /Simulations/Austria_Leibnitz
    metfile met: filename=%apsim%\Model\Met\Hungary_foldeak_JRC_1975_2010.txt
    area paddock -> /Simulations/Austria_Leibnitz/paddock
      folder Manager folder -> /Simulations/Austria_Leibnitz/paddock/Manager folder
        manager Sow on a fixed date: same as France_Pamproux.paddock.Manager folder.Sow on a fixed date
        manager Reset on sowing
          # When should a reset be done
          modulename = maize  # The module the event is to come from
          eventname = sowing  # On which event should a reset be done
          # Reset details
          soilmodule = Hun_fol  # Name of your soil module
          surfaceommodule = surface organic matter  # Name of your surface organic matter module
          resetWater = yes  # Reset soil water?
          resetNitrogen = yes  # Reset soil nitrogen?
          resetSurfaceOM = yes  # Reset surface organic matter?
          on [modulename].[eventname]:
          script: same as in Austria_Leibnitz.paddock.Manager folder.Reset on sowing
      Soil Hun_fol
        Water
          Thickness  BD   AirDry  LL15   DUL   SAT
          200        1.3  0.082   0.246  0.41  0.475
          200        1.4  0.082   0.246  0.41  0.475
          200        1.5  0.082   0.246  0.41  0.475
          200        1.6  0.082   0.246  0.41  0.475
          200        1.6  0.082   0.246  0.41  0.475
          200        1.6  0.082   0.246  0.41  0.475
          300        1.6  0.082   0.246  0.41  0.475
          SoilCrop maize: LL=[0.246, 0.246, 0.246, 0.246, 0.246, 0.246, 0.246]; KL=[0.08, 0.08, 0.08, 0.07, 0.06, 0.06, 0.06]; XF=[1, 1, 1, 1, 1, 1, 1]
        SoilWater: same as Austria_Leibnitz.paddock.Aus_lei.SoilWater
        SoilOrganicMatter: same as Bulgaria_Glavinitsa.paddock.Bul_gla.SoilOrganicMatter
        Analysis: Thickness=[200, 200, 200, 200, 200, 200, 300]; PH=[6.5, 6.4, 6.3, 6.2, 6.1, 6, 5.9]; PHUnits=Water; BoronUnits=HotWater
        InitialWater Initial water: FractionFull=1; PercentMethod=FilledFromTop; RelativeTo=ll15
        Sample Initial nitrogen: Date=14/05/1976; NO3Units=kgha; NH4Units=ppm; SWUnits=Volumetric; OCUnits=Total; PHUnits=Water
          Thickness  NO3  NH4
          200        60   2
          200        30   0.7
          200        20   0.5
          200        20   0.4
          200        20   0.4
          200        20   0.4
          300        30   0.4
      outputfile: filename=Hungary_Foldeak.out; title=Hungary_Foldeak
        events Reporting Frequency -> /Simulations/Austria_Leibnitz/paddock/Outputfile/Reporting Frequency
        variables
          variables: dd/mm/yyyy as Date, day_of_month, month, day, year, DaysAfterSowing, Stage, stagename, plant_status, yield, TT, MaxT, MinT, Rain, Radn, radn_int, waterSD, irrigation, biomass, lai, GrainNo, GrainSize
      maize: same as Austria_Leibnitz.paddock.maize
  simulation Hungary_Kondoros -> /Simulations/Austria_Leibnitz
    metfile met: filename=%apsim%\Model\Met\Hungary_kondoros_JRC_1975_2010.txt
    area paddock -> /Simulations/Austria_Leibnitz/paddock
      folder Manager folder -> /Simulations/Austria_Leibnitz/paddock/Manager folder
        manager Reset on sowing
          # When should a reset be done
          modulename = maize  # The module the event is to come from
          eventname = sowing  # On which event should a reset be done
          # Reset details
          soilmodule = Hun_kon  # Name of your soil module
          surfaceommodule = surface organic matter  # Name of your surface organic matter module
          resetWater = yes  # Reset soil water?
          resetNitrogen = yes  # Reset soil nitrogen?
          resetSurfaceOM = yes  # Reset surface organic matter?
          on [modulename].[eventname]:
          script: same as in Austria_Leibnitz.paddock.Manager folder.Reset on sowing
      Soil Hun_kon: Latitude=0; Longitude=0
        Water
          Thickness  BD   AirDry  LL15   DUL    SAT
          200        1.3  0.049   0.148  0.582  0.642
          200        1.4  0.049   0.148  0.582  0.642
          200        1.5  0.049   0.148  0.582  0.642
          200        1.6  0.049   0.148  0.582  0.642
          200        1.6  0.049   0.148  0.582  0.642
          200        1.6  0.049   0.148  0.582  0.642
          300        1.6  0.049   0.148  0.582  0.642
          SoilCrop maize: LL=[0.148, 0.148, 0.148, 0.148, 0.148, 0.148, 0.148]; KL=[0.08, 0.08, 0.08, 0.07, 0.06, 0.06, 0.06]; XF=[1, 1, 1, 1, 1, 1, 1]
        SoilWater: same as Austria_Leibnitz.paddock.Aus_lei.SoilWater
        SoilOrganicMatter: same as France_Pamproux.paddock.Fra_pam.SoilOrganicMatter
        Analysis: Thickness=[200, 200, 200, 200, 200, 200, 300]; PH=[6.5, 6.4, 6.3, 6.2, 6.1, 6, 5.9]; PHUnits=Water; BoronUnits=HotWater
        InitialWater Initial water: FractionFull=1; PercentMethod=FilledFromTop; RelativeTo=ll15
        Sample Initial nitrogen: Date=14/05/1976; NO3Units=kgha; NH4Units=ppm; SWUnits=Volumetric; OCUnits=Total; PHUnits=Water
          Thickness  NO3  NH4
          200        60   2
          200        30   0.7
          200        20   0.5
          200        20   0.4
          200        20   0.4
          200        20   0.4
          300        30   0.4
      outputfile: filename=Hungary_Kondoros.out; title=Hungary_Kondoros
        events Reporting Frequency -> /Simulations/Austria_Leibnitz/paddock/Outputfile/Reporting Frequency
        variables
          variables: dd/mm/yyyy as Date, day_of_month, month, day, year, DaysAfterSowing, Stage, stagename, plant_status, yield, TT, MaxT, MinT, Rain, Radn, radn_int, waterSD, irrigation, biomass, lai, GrainNo, GrainSize
      maize: same as Austria_Leibnitz.paddock.maize
  simulation Hungary_Kormend -> /Simulations/Austria_Leibnitz
    metfile met: filename=%apsim%\Model\Met\Hungary_kormend_JRC_1975_2010.txt
    area paddock -> /Simulations/Austria_Leibnitz/paddock
      folder Manager folder -> /Simulations/Austria_Leibnitz/paddock/Manager folder
        manager Sow on a fixed date
          #
          date = 20-apr  # Enter sowing date (dd-mmm)
          #
          crop = maize  # Enter name of crop to sow
          density = 7.66  # Enter sowing density (plants/m2)
          depth = 30  # Enter sowing depth (mm)
          cultivar = B73  # Enter cultivar
          class = plant  # Enter crop growth class
          row_spacing = 800  # Enter row spacing (mm)
          on start_of_day:
          script: same as in Austria_Leibnitz.paddock.Manager folder.Sow on a fixed date
        manager Reset on sowing
          # When should a reset be done
          modulename = maize  # The module the event is to come from
          eventname = sowing  # On which event should a reset be done
          # Reset details
          soilmodule = Hun_kor  # Name of your soil module
          surfaceommodule = surface organic matter  # Name of your surface organic matter module
          resetWater = yes  # Reset soil water?
          resetNitrogen = yes  # Reset soil nitrogen?
          resetSurfaceOM = yes  # Reset surface organic matter?
          on [modulename].[eventname]:
          script: same as in Austria_Leibnitz.paddock.Manager folder.Reset on sowing
      Soil Hun_kor
        Water
          Thickness  BD   AirDry  LL15   DUL    SAT
          200        1.3  0.023   0.068  0.349  0.442
          200        1.4  0.023   0.068  0.349  0.442
          200        1.5  0.023   0.068  0.349  0.442
          200        1.6  0.023   0.068  0.349  0.442
          200        1.6  0.023   0.068  0.349  0.442
          200        1.6  0.023   0.068  0.349  0.442
          300        1.6  0.023   0.068  0.349  0.442
          SoilCrop maize: LL=[0.068, 0.068, 0.068, 0.068, 0.068, 0.068, 0.068]; KL=[0.08, 0.08, 0.08, 0.07, 0.06, 0.06, 0.06]; XF=[1, 1, 1, 1, 1, 1, 1]
        SoilWater: same as Austria_Leibnitz.paddock.Aus_lei.SoilWater
        SoilOrganicMatter: same as France_Saint_Bonnet.paddock.Fra_stb.SoilOrganicMatter
        Analysis: Thickness=[200, 200, 200, 200, 200, 200, 300]; PH=[4.5, 4.4, 4.3, 4.2, 4.1, 4, 3.9]; PHUnits=Water; BoronUnits=HotWater
        InitialWater Initial water: FractionFull=1; PercentMethod=FilledFromTop; RelativeTo=ll15
        Sample Initial nitrogen: Date=14/05/1976; NO3Units=kgha; NH4Units=ppm; SWUnits=Volumetric; OCUnits=Total; PHUnits=Water
          Thickness  NO3  NH4
          200        60   2
          200        30   0.7
          200        20   0.5
          200        20   0.4
          200        20   0.4
          200        20   0.4
          300        30   0.4
      outputfile: filename=Hungary_Kormend.out; title=Hungary_Kormend
        events Reporting Frequency -> /Simulations/Austria_Leibnitz/paddock/Outputfile/Reporting Frequency
        variables
          variables: dd/mm/yyyy as Date, day_of_month, month, day, year, DaysAfterSowing, Stage, stagename, plant_status, yield, TT, MaxT, MinT, Rain, Radn, radn_int, waterSD, irrigation, biomass, lai, GrainNo, GrainSize
      maize: same as Austria_Leibnitz.paddock.maize
  simulation Hungary_Lajoskomarom -> /Simulations/Austria_Leibnitz
    metfile met: filename=%apsim%\Model\Met\Hungary_lajoskomarom_JRC_1975_2010.txt
    area paddock -> /Simulations/Austria_Leibnitz/paddock
      folder Manager folder -> /Simulations/Austria_Leibnitz/paddock/Manager folder
        manager Sow on a fixed date
          #
          date = 10-apr  # Enter sowing date (dd-mmm)
          #
          crop = maize  # Enter name of crop to sow
          density = 7.63  # Enter sowing density (plants/m2)
          depth = 30  # Enter sowing depth (mm)
          cultivar = B73  # Enter cultivar
          class = plant  # Enter crop growth class
          row_spacing = 800  # Enter row spacing (mm)
          on start_of_day:
          script: same as in Austria_Leibnitz.paddock.Manager folder.Sow on a fixed date
        manager Reset on sowing
          # When should a reset be done
          modulename = maize  # The module the event is to come from
          eventname = sowing  # On which event should a reset be done
          # Reset details
          soilmodule = Hun_laj  # Name of your soil module
          surfaceommodule = surface organic matter  # Name of your surface organic matter module
          resetWater = yes  # Reset soil water?
          resetNitrogen = yes  # Reset soil nitrogen?
          resetSurfaceOM = yes  # Reset surface organic matter?
          on [modulename].[eventname]:
          script: same as in Austria_Leibnitz.paddock.Manager folder.Reset on sowing
      Soil Hun_laj
        Water
          Thickness  BD   AirDry  LL15   DUL    SAT
          200        1.3  0.087   0.261  0.413  0.473
          200        1.4  0.087   0.261  0.413  0.473
          200        1.5  0.087   0.261  0.413  0.473
          200        1.6  0.087   0.261  0.413  0.473
          200        1.6  0.087   0.261  0.413  0.473
          200        1.6  0.087   0.261  0.413  0.473
          300        1.6  0.087   0.261  0.413  0.473
          SoilCrop maize: LL=[0.261, 0.261, 0.261, 0.261, 0.261, 0.261, 0.261]; KL=[0.08, 0.08, 0.08, 0.07, 0.06, 0.06, 0.06]; XF=[1, 1, 1, 1, 1, 1, 1]
        SoilWater: same as Austria_Leibnitz.paddock.Aus_lei.SoilWater
        SoilOrganicMatter: same as France_Pamproux.paddock.Fra_pam.SoilOrganicMatter
        Analysis: Thickness=[200, 200, 200, 200, 200, 200, 300]; PH=[6, 5.9, 5.8, 5.7, 5.6, 5.5, 5.4]
        InitialWater Initial water: RelativeTo=ll15; FractionFull=1; PercentMethod=FilledFromTop
        Sample Initial nitrogen: Date=14/05/1976; NO3Units=kgha; NH4Units=ppm; SWUnits=Volumetric; OCUnits=Total; PHUnits=Water
          Thickness  NO3  NH4
          200        60   2
          200        30   0.7
          200        20   0.5
          200        20   0.4
          200        20   0.4
          200        20   0.4
          300        30   0.4
      outputfile: filename=Hungary_Lajoskomarom.out; title=Hungary_Lajoskomarom
        events Reporting Frequency -> /Simulations/Austria_Leibnitz/paddock/Outputfile/Reporting Frequency
        variables
          variables: dd/mm/yyyy as Date, day_of_month, month, day, year, DaysAfterSowing, Stage, stagename, plant_status, yield, TT, MaxT, MinT, Rain, Radn, radn_int, waterSD, irrigation, biomass, lai, GrainNo, GrainSize
      maize: same as Austria_Leibnitz.paddock.maize
  simulation Hungary_Nyirbator -> /Simulations/Austria_Leibnitz
    metfile met: filename=%apsim%\Model\Met\Hungary_nyirbator_JRC_1975_2010.txt
    area paddock -> /Simulations/Austria_Leibnitz/paddock
      folder Manager folder -> /Simulations/Austria_Leibnitz/paddock/Manager folder
        manager Sow on a fixed date
          #
          date = 20-apr  # Enter sowing date (dd-mmm)
          #
          crop = maize  # Enter name of crop to sow
          density = 7.69  # Enter sowing density (plants/m2)
          depth = 30  # Enter sowing depth (mm)
          cultivar = B73  # Enter cultivar
          class = plant  # Enter crop growth class
          row_spacing = 800  # Enter row spacing (mm)
          on start_of_day:
          script: same as in Austria_Leibnitz.paddock.Manager folder.Sow on a fixed date
        manager Reset on sowing
          # When should a reset be done
          modulename = maize  # The module the event is to come from
          eventname = sowing  # On which event should a reset be done
          # Reset details
          soilmodule = Hun_nyi  # Name of your soil module
          surfaceommodule = surface organic matter  # Name of your surface organic matter module
          resetWater = yes  # Reset soil water?
          resetNitrogen = yes  # Reset soil nitrogen?
          resetSurfaceOM = yes  # Reset surface organic matter?
          on [modulename].[eventname]:
          script: same as in Austria_Leibnitz.paddock.Manager folder.Reset on sowing
      Soil Hun_nyi
        Water
          Thickness  BD   AirDry  LL15  DUL    SAT
          200        1.3  0.063   0.19  0.296  0.431
          200        1.4  0.063   0.19  0.296  0.431
          200        1.5  0.063   0.19  0.296  0.431
          200        1.6  0.063   0.19  0.296  0.431
          200        1.6  0.063   0.19  0.296  0.431
          200        1.6  0.063   0.19  0.296  0.431
          300        1.6  0.063   0.19  0.296  0.431
          SoilCrop maize: LL=[0.19, 0.19, 0.19, 0.19, 0.19, 0.19, 0.19]; KL=[0.08, 0.08, 0.08, 0.07, 0.06, 0.06, 0.06]; XF=[1, 1, 1, 1, 1, 1, 1]
        SoilWater: same as Austria_Leibnitz.paddock.Aus_lei.SoilWater
        SoilOrganicMatter: same as France_Chemille.paddock.Fra_che.SoilOrganicMatter
        Analysis: Thickness=[200, 200, 200, 200, 200, 200, 300]; PH=[4.5, 4.4, 4.3, 4.2, 4.1, 4, 3.9]; PHUnits=Water; BoronUnits=HotWater
        InitialWater Initial water: FractionFull=1; PercentMethod=FilledFromTop; RelativeTo=ll15
        Sample Initial nitrogen: Date=14/05/1976; NO3Units=kgha; NH4Units=ppm; SWUnits=Volumetric; OCUnits=Total; PHUnits=Water
          Thickness  NO3  NH4
          200        60   2
          200        30   0.7
          200        20   0.5
          200        20   0.4
          200        20   0.4
          200        20   0.4
          300        30   0.4
      outputfile: filename=Hungary_Nyirbator.out; title=Hungary_Nyirbator
        events Reporting Frequency -> /Simulations/Austria_Leibnitz/paddock/Outputfile/Reporting Frequency
        variables
          variables: dd/mm/yyyy as Date, day_of_month, month, day, year, DaysAfterSowing, Stage, stagename, plant_status, yield, TT, MaxT, MinT, Rain, Radn, radn_int, waterSD, irrigation, biomass, lai, GrainNo, GrainSize
      maize: same as Austria_Leibnitz.paddock.maize
  simulation Hungary_Ormenyes -> /Simulations/Austria_Leibnitz
    metfile met: filename=%apsim%\Model\Met\Hungary_ormenyes_JRC_1975_2010.txt
    area paddock -> /Simulations/Austria_Leibnitz/paddock
      folder Manager folder -> /Simulations/Austria_Leibnitz/paddock/Manager folder
        manager Sow on a fixed date: same as France_Chemille.paddock.Manager folder.Sow on a fixed date
        manager Reset on sowing
          # When should a reset be done
          modulename = maize  # The module the event is to come from
          eventname = sowing  # On which event should a reset be done
          # Reset details
          soilmodule = Hun_orm  # Name of your soil module
          surfaceommodule = surface organic matter  # Name of your surface organic matter module
          resetWater = yes  # Reset soil water?
          resetNitrogen = yes  # Reset soil nitrogen?
          resetSurfaceOM = yes  # Reset surface organic matter?
          on [modulename].[eventname]:
          script: same as in Austria_Leibnitz.paddock.Manager folder.Reset on sowing
      Soil Hun_orm
        Water
          Thickness  BD   AirDry  LL15   DUL    SAT
          200        1.3  0.069   0.207  0.527  0.595
          200        1.4  0.069   0.207  0.527  0.595
          200        1.5  0.069   0.207  0.527  0.595
          200        1.6  0.069   0.207  0.527  0.595
          200        1.6  0.069   0.207  0.527  0.595
          200        1.6  0.069   0.207  0.527  0.595
          300        1.6  0.069   0.207  0.527  0.595
          SoilCrop maize: LL=[0.207, 0.207, 0.207, 0.207, 0.207, 0.207, 0.207]; KL=[0.08, 0.08, 0.08, 0.07, 0.06, 0.06, 0.06]; XF=[1, 1, 1, 1, 1, 1, 1]
        SoilWater: same as Austria_Leibnitz.paddock.Aus_lei.SoilWater
        SoilOrganicMatter: same as France_Avignon.paddock.Fra_av.SoilOrganicMatter
        Analysis: Thickness=[200, 200, 200, 200, 200, 200, 300]; PH=[6.5, 6.4, 6.3, 6.2, 6.1, 6, 5.9]; PHUnits=Water; BoronUnits=HotWater
        InitialWater Initial water: FractionFull=1; PercentMethod=FilledFromTop; RelativeTo=ll15
        Sample Initial nitrogen: Date=14/05/1976; NO3Units=kgha; NH4Units=ppm; SWUnits=Volumetric; OCUnits=Total; PHUnits=Water
          Thickness  NO3  NH4
          200        60   2
          200        30   0.7
          200        20   0.5
          200        20   0.4
          200        20   0.4
          200        20   0.4
          300        30   0.4
      outputfile: filename=Hungary_Ormenyes.out; title=Hungary_Ormenyes
        events Reporting Frequency -> /Simulations/Austria_Leibnitz/paddock/Outputfile/Reporting Frequency
        variables
          variables: dd/mm/yyyy as Date, day_of_month, month, day, year, DaysAfterSowing, Stage, stagename, plant_status, yield, TT, MaxT, MinT, Rain, Radn, radn_int, waterSD, irrigation, biomass, lai, GrainNo, GrainSize
      maize: same as Austria_Leibnitz.paddock.maize
  simulation Hungary_Papa -> /Simulations/Austria_Leibnitz
    metfile met: filename=%apsim%\Model\Met\Hungary_papa_JRC_1975_2010.txt
    area paddock -> /Simulations/Austria_Leibnitz/paddock
      folder Manager folder -> /Simulations/Austria_Leibnitz/paddock/Manager folder
        manager Sow on a fixed date: same as Hungary_Kormend.paddock.Manager folder.Sow on a fixed date
        manager Reset on sowing
          # When should a reset be done
          modulename = maize  # The module the event is to come from
          eventname = sowing  # On which event should a reset be done
          # Reset details
          soilmodule = Hun_pap  # Name of your soil module
          surfaceommodule = surface organic matter  # Name of your surface organic matter module
          resetWater = yes  # Reset soil water?
          resetNitrogen = yes  # Reset soil nitrogen?
          resetSurfaceOM = yes  # Reset surface organic matter?
          on [modulename].[eventname]:
          script: same as in Austria_Leibnitz.paddock.Manager folder.Reset on sowing
      Soil Hun_pap
        Water
          Thickness  BD   AirDry  LL15   DUL    SAT
          200        1.3  0.055   0.164  0.382  0.48
          200        1.4  0.055   0.164  0.382  0.48
          200        1.5  0.055   0.164  0.382  0.48
          200        1.6  0.055   0.164  0.382  0.48
          200        1.6  0.055   0.164  0.382  0.48
          200        1.6  0.055   0.164  0.382  0.48
          300        1.6  0.055   0.164  0.382  0.48
          SoilCrop maize: LL=[0.164, 0.164, 0.164, 0.164, 0.164, 0.164, 0.164]; KL=[0.08, 0.08, 0.08, 0.07, 0.06, 0.06, 0.06]; XF=[1, 1, 1, 1, 1, 1, 1]
        SoilWater: same as Austria_Leibnitz.paddock.Aus_lei.SoilWater
        SoilOrganicMatter: same as France_Saint_Bonnet.paddock.Fra_stb.SoilOrganicMatter
        Analysis: Thickness=[200, 200, 200, 200, 200, 200, 300]; PH=[6, 5.9, 5.8, 5.7, 5.6, 5.5, 5.4]; PHUnits=Water; BoronUnits=HotWater
        InitialWater Initial water: FractionFull=1; PercentMethod=FilledFromTop; RelativeTo=ll15
        Sample Initial nitrogen: Date=14/05/1976; NO3Units=kgha; NH4Units=ppm; SWUnits=Volumetric; OCUnits=Total; PHUnits=Water
          Thickness  NO3  NH4
          200        60   2
          200        30   0.7
          200        20   0.5
          200        20   0.4
          200        20   0.4
          200        20   0.4
          300        30   0.4
      outputfile: filename=Hungary_Papa.out; title=Hungary_Papa
        events Reporting Frequency -> /Simulations/Austria_Leibnitz/paddock/Outputfile/Reporting Frequency
        variables
          variables: dd/mm/yyyy as Date, day_of_month, month, day, year, DaysAfterSowing, Stage, stagename, plant_status, yield, TT, MaxT, MinT, Rain, Radn, radn_int, waterSD, irrigation, biomass, lai, GrainNo, GrainSize
      maize: same as Austria_Leibnitz.paddock.maize
  simulation Hungary_Szederkeny -> /Simulations/Austria_Leibnitz
    metfile met: filename=%apsim%\Model\Met\Hungary_szerderkeny_JRC_1975_2010.txt
    area paddock -> /Simulations/Austria_Leibnitz/paddock
      folder Manager folder -> /Simulations/Austria_Leibnitz/paddock/Manager folder
        manager Sow on a fixed date
          #
          date = 20-apr  # Enter sowing date (dd-mmm)
          #
          crop = maize  # Enter name of crop to sow
          density = 7.6  # Enter sowing density (plants/m2)
          depth = 30  # Enter sowing depth (mm)
          cultivar = B73  # Enter cultivar
          class = plant  # Enter crop growth class
          row_spacing = 800  # Enter row spacing (mm)
          on start_of_day:
          script: same as in Austria_Leibnitz.paddock.Manager folder.Sow on a fixed date
        manager Reset on sowing
          # When should a reset be done
          modulename = maize  # The module the event is to come from
          eventname = sowing  # On which event should a reset be done
          # Reset details
          soilmodule = Hun_sze  # Name of your soil module
          surfaceommodule = surface organic matter  # Name of your surface organic matter module
          resetWater = yes  # Reset soil water?
          resetNitrogen = yes  # Reset soil nitrogen?
          resetSurfaceOM = yes  # Reset surface organic matter?
          on [modulename].[eventname]:
          script: same as in Austria_Leibnitz.paddock.Manager folder.Reset on sowing
      Soil Hun_sze: Latitude=0; Longitude=0
        Water
          Thickness  BD   AirDry  LL15   DUL    SAT
          200        1.3  0.075   0.225  0.377  0.441
          200        1.4  0.075   0.225  0.377  0.441
          200        1.5  0.075   0.225  0.377  0.441
          200        1.6  0.075   0.225  0.377  0.441
          200        1.6  0.075   0.225  0.377  0.441
          200        1.6  0.075   0.225  0.377  0.441
          300        1.6  0.075   0.225  0.377  0.441
          SoilCrop maize: LL=[0.225, 0.225, 0.225, 0.225, 0.225, 0.225, 0.225]; KL=[0.08, 0.08, 0.08, 0.07, 0.06, 0.06, 0.06]; XF=[1, 1, 1, 1, 1, 1, 1]
        SoilWater: same as Austria_Leibnitz.paddock.Aus_lei.SoilWater
        SoilOrganicMatter: same as France_Pamproux.paddock.Fra_pam.SoilOrganicMatter
        Analysis: Thickness=[200, 200, 200, 200, 200, 200, 300]; PH=[7.5, 7.4, 7.3, 7.2, 7.1, 7, 6.9]
        InitialWater Initial water: RelativeTo=ll15; FractionFull=1; PercentMethod=FilledFromTop
        Sample Initial nitrogen: Date=14/05/1976; NO3Units=kgha; NH4Units=ppm; SWUnits=Volumetric; OCUnits=Total; PHUnits=Water
          Thickness  NO3  NH4
          200        60   2
          200        30   0.7
          200        20   0.5
          200        20   0.4
          200        20   0.4
          200        20   0.4
          300        30   0.4
      outputfile: filename=Hungary_Szederkeny.out; title=Hungary_Szederkeny
        events Reporting Frequency -> /Simulations/Austria_Leibnitz/paddock/Outputfile/Reporting Frequency
        variables
          variables: dd/mm/yyyy as Date, day_of_month, month, day, year, DaysAfterSowing, Stage, stagename, plant_status, yield, TT, MaxT, MinT, Rain, Radn, radn_int, waterSD, irrigation, biomass, lai, GrainNo, GrainSize
      maize: same as Austria_Leibnitz.paddock.maize
  simulation Italy_Asola -> /Simulations/Austria_Leibnitz
    metfile met: filename=%apsim%\Model\Met\Italy_asola_JRC_1975_2010.txt
    area paddock -> /Simulations/Austria_Leibnitz/paddock
      Soil Ita_aso: Latitude=0; Longitude=0
        Water
          Thickness  BD   AirDry  LL15   DUL    SAT
          200        1.3  0.069   0.206  0.315  0.401
          200        1.4  0.069   0.206  0.315  0.401
          200        1.5  0.069   0.206  0.315  0.401
          200        1.6  0.069   0.206  0.315  0.401
          200        1.6  0.069   0.206  0.315  0.401
          200        1.6  0.069   0.206  0.315  0.401
          300        1.6  0.069   0.206  0.315  0.401
          SoilCrop maize: LL=[0.206, 0.206, 0.206, 0.206, 0.206, 0.206, 0.206]; KL=[0.08, 0.08, 0.08, 0.07, 0.06, 0.06, 0.06]; XF=[1, 1, 1, 1, 1, 1, 1]
        SoilWater: same as Austria_Leibnitz.paddock.Aus_lei.SoilWater
        SoilOrganicMatter: RootCN=45; RootWt=1000; SoilCN=14.5; EnrACoeff=7.4; EnrBCoeff=0.2; OCUnits=Total
          Thickness  OC   FBiom  FInert
          200        0.8  0.03   0.3
          200        0.6  0.01   0.4
          200        0.4  0      0.5
          200        0.2  0      0.7
          200        0.1  0      0.9
          200        0.1  0      0.9
          300        0.1  0      0.9
        Analysis: Thickness=[200, 200, 200, 200, 200, 200, 300]; PH=[5.5, 5.4, 5.3, 5.2, 5.1, 5, 4.9]; PHUnits=Water; BoronUnits=HotWater
        InitialWater Initial water: FractionFull=1; PercentMethod=FilledFromTop; RelativeTo=ll15
        Sample Initial nitrogen: Date=14/05/1976; NO3Units=kgha; NH4Units=ppm; SWUnits=Volumetric; OCUnits=Total; PHUnits=Water
          Thickness  NO3  NH4
          200        60   2
          200        30   0.7
          200        20   0.5
          200        20   0.4
          200        20   0.4
          200        20   0.4
          300        30   0.4
      folder Manager folder -> /Simulations/Austria_Leibnitz/paddock/Manager folder
        manager Sow on a fixed date
          #
          date = 20-mar  # Enter sowing date (dd-mmm)
          #
          crop = maize  # Enter name of crop to sow
          density = 7.54  # Enter sowing density (plants/m2)
          depth = 30  # Enter sowing depth (mm)
          cultivar = B73  # Enter cultivar
          class = plant  # Enter crop growth class
          row_spacing = 800  # Enter row spacing (mm)
          on start_of_day:
          script: same as in Austria_Leibnitz.paddock.Manager folder.Sow on a fixed date
        manager Reset on sowing
          # When should a reset be done
          modulename = maize  # The module the event is to come from
          eventname = sowing  # On which event should a reset be done
          # Reset details
          soilmodule = Ita_aso  # Name of your soil module
          surfaceommodule = surface organic matter  # Name of your surface organic matter module
          resetWater = yes  # Reset soil water?
          resetNitrogen = yes  # Reset soil nitrogen?
          resetSurfaceOM = yes  # Reset surface organic matter?
          on [modulename].[eventname]:
          script: same as in Austria_Leibnitz.paddock.Manager folder.Reset on sowing
      outputfile: filename=Italy_Asola.out; title=Italy_Asola
        events Reporting Frequency -> /Simulations/Austria_Leibnitz/paddock/Outputfile/Reporting Frequency
        variables
          variables: dd/mm/yyyy as Date, day_of_month, month, day, year, DaysAfterSowing, Stage, stagename, plant_status, yield, TT, MaxT, MinT, Rain, Radn, radn_int, waterSD, irrigation, biomass, lai, GrainNo, GrainSize
      maize: same as Austria_Leibnitz.paddock.maize
  simulation Italy_Bologna -> /Simulations/Austria_Leibnitz
    metfile met: filename=%apsim%\Model\Met\Italy_bologna_JRC_1975_2010.txt
    area paddock -> /Simulations/Austria_Leibnitz/paddock
      Soil Ita_bol: Latitude=0; Longitude=0
        Water
          Thickness  BD   AirDry  LL15   DUL    SAT
          200        1.3  0.077   0.232  0.333  0.429
          200        1.4  0.077   0.232  0.333  0.429
          200        1.5  0.077   0.232  0.333  0.429
          200        1.6  0.077   0.232  0.333  0.429
          200        1.6  0.077   0.232  0.333  0.429
          200        1.6  0.077   0.232  0.333  0.429
          300        1.6  0.077   0.232  0.333  0.429
          SoilCrop maize: LL=[0.232, 0.232, 0.232, 0.232, 0.232, 0.232, 0.232]; KL=[0.08, 0.08, 0.08, 0.07, 0.06, 0.06, 0.06]; XF=[1, 1, 1, 1, 1, 1, 1]
        SoilWater: same as Austria_Leibnitz.paddock.Aus_lei.SoilWater
        SoilOrganicMatter: same as Italy_Asola.paddock.Ita_aso.SoilOrganicMatter
        Analysis: Thickness=[200, 200, 200, 200, 200, 200, 300]; PH=[7, 6.9, 6.8, 6.7, 6.6, 6.5, 6.4]; PHUnits=Water; BoronUnits=HotWater
        InitialWater Initial water: FractionFull=1; PercentMethod=FilledFromTop; RelativeTo=ll15
        Sample Initial nitrogen: Date=14/05/1976; NO3Units=kgha; NH4Units=ppm; SWUnits=Volumetric; OCUnits=Total; PHUnits=Water
          Thickness  NO3  NH4
          200        60   2
          200        30   0.7
          200        20   0.5
          200        20   0.4
          200        20   0.4
          200        20   0.4
          300        30   0.4
      folder Manager folder -> /Simulations/Austria_Leibnitz/paddock/Manager folder
        manager Sow on a fixed date: same as France_Avignon.paddock.Manager folder.Sow on a fixed date
        manager Reset on sowing
          # When should a reset be done
          modulename = maize  # The module the event is to come from
          eventname = sowing  # On which event should a reset be done
          # Reset details
          soilmodule = Ita_bol  # Name of your soil module
          surfaceommodule = surface organic matter  # Name of your surface organic matter module
          resetWater = yes  # Reset soil water?
          resetNitrogen = yes  # Reset soil nitrogen?
          resetSurfaceOM = yes  # Reset surface organic matter?
          on [modulename].[eventname]:
          script: same as in Austria_Leibnitz.paddock.Manager folder.Reset on sowing
      outputfile: filename=Italy_Bologna.out; title=Italy_Bologna
        events Reporting Frequency -> /Simulations/Austria_Leibnitz/paddock/Outputfile/Reporting Frequency
        variables
          variables: dd/mm/yyyy as Date, day_of_month, month, day, year, DaysAfterSowing, Stage, stagename, plant_status, yield, TT, MaxT, MinT, Rain, Radn, radn_int, waterSD, irrigation, biomass, lai, GrainNo, GrainSize
      maize: same as Austria_Leibnitz.paddock.maize
  simulation Italy_Campoformido -> /Simulations/Austria_Leibnitz
    metfile met: filename=%apsim%\Model\Met\Italy_campoformido_JRC_1975_2010.txt
    area paddock -> /Simulations/Austria_Leibnitz/paddock
      folder Manager folder -> /Simulations/Austria_Leibnitz/paddock/Manager folder
        manager Sow on a fixed date
          #
          date = 1-apr  # Enter sowing date (dd-mmm)
          #
          crop = maize  # Enter name of crop to sow
          density = 7.60  # Enter sowing density (plants/m2)
          depth = 30  # Enter sowing depth (mm)
          cultivar = B73  # Enter cultivar
          class = plant  # Enter crop growth class
          row_spacing = 800  # Enter row spacing (mm)
          on start_of_day:
          script: same as in Austria_Leibnitz.paddock.Manager folder.Sow on a fixed date
        manager Reset on sowing
          # When should a reset be done
          modulename = maize  # The module the event is to come from
          eventname = sowing  # On which event should a reset be done
          # Reset details
          soilmodule = Ita_cam  # Name of your soil module
          surfaceommodule = surface organic matter  # Name of your surface organic matter module
          resetWater = yes  # Reset soil water?
          resetNitrogen = yes  # Reset soil nitrogen?
          resetSurfaceOM = yes  # Reset surface organic matter?
          on [modulename].[eventname]:
          script: same as in Austria_Leibnitz.paddock.Manager folder.Reset on sowing
      Soil Ita_cam: Latitude=0; Longitude=0
        Water
          Thickness  BD   AirDry  LL15   DUL    SAT
          200        1.3  0.069   0.206  0.317  0.401
          200        1.4  0.069   0.206  0.317  0.401
          200        1.5  0.069   0.206  0.317  0.401
          200        1.6  0.069   0.206  0.317  0.401
          200        1.6  0.069   0.206  0.317  0.401
          200        1.6  0.069   0.206  0.317  0.401
          300        1.6  0.069   0.206  0.317  0.401
          SoilCrop maize: LL=[0.206, 0.206, 0.206, 0.206, 0.206, 0.206, 0.206]; KL=[0.08, 0.08, 0.08, 0.07, 0.06, 0.06, 0.06]; XF=[1, 1, 1, 1, 1, 1, 1]
        SoilWater: same as Austria_Leibnitz.paddock.Aus_lei.SoilWater
        SoilOrganicMatter: same as France_Pamproux.paddock.Fra_pam.SoilOrganicMatter
        Analysis: Thickness=[200, 200, 200, 200, 200, 200, 300]; PH=[6, 5.9, 5.8, 5.7, 5.6, 5.5, 5.4]; PHUnits=Water; BoronUnits=HotWater
        InitialWater Initial water: FractionFull=1; PercentMethod=FilledFromTop; RelativeTo=ll15
        Sample Initial nitrogen: Date=14/05/1976; NO3Units=kgha; NH4Units=ppm; SWUnits=Volumetric; OCUnits=Total; PHUnits=Water
          Thickness  NO3  NH4
          200        60   2
          200        30   0.7
          200        20   0.5
          200        20   0.4
          200        20   0.4
          200        20   0.4
          300        30   0.4
      outputfile: filename=Italy_Campoformido.out; title=Italy_Campoformido
        events Reporting Frequency -> /Simulations/Austria_Leibnitz/paddock/Outputfile/Reporting Frequency
        variables
          variables: dd/mm/yyyy as Date, day_of_month, month, day, year, DaysAfterSowing, Stage, stagename, plant_status, yield, TT, MaxT, MinT, Rain, Radn, radn_int, waterSD, irrigation, biomass, lai, GrainNo, GrainSize
      maize: same as Austria_Leibnitz.paddock.maize
  simulation Italy_Orgiano -> /Simulations/Austria_Leibnitz
    metfile met: filename=%apsim%\Model\Met\Italy_origano_JRC_1975_2010.txt
    area paddock -> /Simulations/Austria_Leibnitz/paddock
      folder Manager folder -> /Simulations/Austria_Leibnitz/paddock/Manager folder
        manager Sow on a fixed date: same as Italy_Asola.paddock.Manager folder.Sow on a fixed date
        manager Reset on sowing
          # When should a reset be done
          modulename = maize  # The module the event is to come from
          eventname = sowing  # On which event should a reset be done
          # Reset details
          soilmodule = Ita_org  # Name of your soil module
          surfaceommodule = surface organic matter  # Name of your surface organic matter module
          resetWater = yes  # Reset soil water?
          resetNitrogen = yes  # Reset soil nitrogen?
          resetSurfaceOM = yes  # Reset surface organic matter?
          on [modulename].[eventname]:
          script: same as in Austria_Leibnitz.paddock.Manager folder.Reset on sowing
      Soil Ita_org
        Water
          Thickness  BD   AirDry  LL15   DUL    SAT
          200        1.3  0.047   0.141  0.284  0.404
          200        1.4  0.047   0.141  0.284  0.404
          200        1.5  0.047   0.141  0.284  0.404
          200        1.6  0.047   0.141  0.284  0.404
          200        1.6  0.047   0.141  0.284  0.404
          200        1.6  0.047   0.141  0.284  0.404
          300        1.6  0.047   0.141  0.284  0.404
          SoilCrop maize: LL=[0.141, 0.141, 0.141, 0.141, 0.141, 0.141, 0.141]; KL=[0.08, 0.08, 0.08, 0.07, 0.06, 0.06, 0.06]; XF=[1, 1, 1, 1, 1, 1, 1]
        SoilWater: same as Austria_Leibnitz.paddock.Aus_lei.SoilWater
        SoilOrganicMatter: same as Italy_Asola.paddock.Ita_aso.SoilOrganicMatter
        Analysis: Thickness=[200, 200, 200, 200, 200, 200, 300]; PH=[6, 5.9, 5.8, 5.7, 5.6, 5.5, 5.4]; PHUnits=Water; BoronUnits=HotWater
        InitialWater Initial water: FractionFull=1; PercentMethod=FilledFromTop; RelativeTo=ll15
        Sample Initial nitrogen: Date=14/05/1976; NO3Units=kgha; NH4Units=ppm; SWUnits=Volumetric; OCUnits=Total; PHUnits=Water
          Thickness  NO3  NH4
          200        60   2
          200        30   0.7
          200        20   0.5
          200        20   0.4
          200        20   0.4
          200        20   0.4
          300        30   0.4
      outputfile: filename=Italy_Orgiano.out; title=Italy_Orgiano
        events Reporting Frequency -> /Simulations/Austria_Leibnitz/paddock/Outputfile/Reporting Frequency
        variables
          variables: dd/mm/yyyy as Date, day_of_month, month, day, year, DaysAfterSowing, Stage, stagename, plant_status, yield, TT, MaxT, MinT, Rain, Radn, radn_int, waterSD, irrigation, biomass, lai, GrainNo, GrainSize
      maize: same as Austria_Leibnitz.paddock.maize
  simulation Italy_Paese -> /Simulations/Austria_Leibnitz
    metfile met: filename=%apsim%\Model\Met\Italy_paese_JRC_1975_2010.txt
    area paddock -> /Simulations/Austria_Leibnitz/paddock
      folder Manager folder -> /Simulations/Austria_Leibnitz/paddock/Manager folder
        manager Sow on a fixed date
          #
          date = 20-mar  # Enter sowing date (dd-mmm)
          #
          crop = maize  # Enter name of crop to sow
          density = 7.57  # Enter sowing density (plants/m2)
          depth = 30  # Enter sowing depth (mm)
          cultivar = B73  # Enter cultivar
          class = plant  # Enter crop growth class
          row_spacing = 800  # Enter row spacing (mm)
          on start_of_day:
          script: same as in Austria_Leibnitz.paddock.Manager folder.Sow on a fixed date
        manager Reset on sowing
          # When should a reset be done
          modulename = maize  # The module the event is to come from
          eventname = sowing  # On which event should a reset be done
          # Reset details
          soilmodule = Ita_pae  # Name of your soil module
          surfaceommodule = surface organic matter  # Name of your surface organic matter module
          resetWater = yes  # Reset soil water?
          resetNitrogen = yes  # Reset soil nitrogen?
          resetSurfaceOM = yes  # Reset surface organic matter?
          on [modulename].[eventname]:
          script: same as in Austria_Leibnitz.paddock.Manager folder.Reset on sowing
      Soil Ita_pae: Latitude=0; Longitude=0
        Water
          Thickness  BD   AirDry  LL15   DUL    SAT
          200        1.3  0.019   0.056  0.295  0.416
          200        1.4  0.019   0.056  0.295  0.416
          200        1.5  0.019   0.056  0.295  0.416
          200        1.6  0.019   0.056  0.295  0.416
          200        1.6  0.019   0.056  0.295  0.416
          200        1.6  0.019   0.056  0.295  0.416
          300        1.6  0.019   0.056  0.295  0.416
          SoilCrop maize: LL=[0.056, 0.056, 0.056, 0.056, 0.056, 0.056, 0.056]; KL=[0.08, 0.08, 0.08, 0.07, 0.06, 0.06, 0.06]; XF=[1, 1, 1, 1, 1, 1, 1]
        SoilWater: same as Austria_Leibnitz.paddock.Aus_lei.SoilWater
        SoilOrganicMatter: RootCN=45; RootWt=1000; SoilCN=14.5; EnrACoeff=7.4; EnrBCoeff=0.2; OCUnits=Total
          Thickness  OC   FBiom  FInert
          200        0.8  0.03   0.3
          200        0.6  0.01   0.4
          200        0.4  0      0.5
          200        0.4  0      0.7
          200        0.4  0      0.9
          200        0.4  0      0.9
          300        0.4  0      0.9
        Analysis: Thickness=[200, 200, 200, 200, 200, 200, 300]; PH=[4.5, 4.4, 4.3, 4.2, 4.1, 4, 3.9]; PHUnits=Water; BoronUnits=HotWater
        InitialWater Initial water: FractionFull=1; PercentMethod=FilledFromTop; RelativeTo=ll15
        Sample Initial nitrogen: Date=14/05/1976; NO3Units=kgha; NH4Units=ppm; SWUnits=Volumetric; OCUnits=Total; PHUnits=Water
          Thickness  NO3  NH4
          200        60   2
          200        30   0.7
          200        20   0.5
          200        20   0.4
          200        20   0.4
          200        20   0.4
          300        30   0.4
      outputfile: filename=Italy_Paese.out; title=Italy_Paese
        events Reporting Frequency -> /Simulations/Austria_Leibnitz/paddock/Outputfile/Reporting Frequency
        variables
          variables: dd/mm/yyyy as Date, day_of_month, month, day, year, DaysAfterSowing, Stage, stagename, plant_status, yield, TT, MaxT, MinT, Rain, Radn, radn_int, waterSD, irrigation, biomass, lai, GrainNo, GrainSize
      maize: same as Austria_Leibnitz.paddock.maize
  simulation Italy_Pantigliate -> /Simulations/Austria_Leibnitz
    metfile met: filename=%apsim%\Model\Met\Italy_pantigliate_JRC_1975_2010.txt
    area paddock -> /Simulations/Austria_Leibnitz/paddock
      folder Manager folder -> /Simulations/Austria_Leibnitz/paddock/Manager folder
        manager Sow on a fixed date: same as Italy_Asola.paddock.Manager folder.Sow on a fixed date
        manager Reset on sowing
          # When should a reset be done
          modulename = maize  # The module the event is to come from
          eventname = sowing  # On which event should a reset be done
          # Reset details
          soilmodule = Ita_pan  # Name of your soil module
          surfaceommodule = surface organic matter  # Name of your surface organic matter module
          resetWater = yes  # Reset soil water?
          resetNitrogen = yes  # Reset soil nitrogen?
          resetSurfaceOM = yes  # Reset surface organic matter?
          on [modulename].[eventname]:
          script: same as in Austria_Leibnitz.paddock.Manager folder.Reset on sowing
      Soil Ita_pan: Latitude=0; Longitude=0
        Water: same as Italy_Asola.paddock.Ita_aso.Water
        SoilWater: same as Austria_Leibnitz.paddock.Aus_lei.SoilWater
        SoilOrganicMatter: same as France_Pamproux.paddock.Fra_pam.SoilOrganicMatter
        Analysis: Thickness=[200, 200, 200, 200, 200, 200, 300]; PH=[5.5, 5.4, 5.3, 5.2, 5.1, 5, 4.9]
        InitialWater Initial water: FractionFull=1; PercentMethod=FilledFromTop; RelativeTo=ll15
        Sample Initial nitrogen: Date=14/05/1976; NO3Units=kgha; NH4Units=ppm; SWUnits=Volumetric; OCUnits=Total; PHUnits=Water
          Thickness  NO3  NH4
          200        60   2
          200        30   0.7
          200        20   0.5
          200        20   0.4
          200        20   0.4
          200        20   0.4
          300        30   0.4
      outputfile: filename=Italy_Pantigliate.out; title=Italy_Pantigliate
        events Reporting Frequency -> /Simulations/Austria_Leibnitz/paddock/Outputfile/Reporting Frequency
        variables
          variables: dd/mm/yyyy as Date, day_of_month, month, day, year, DaysAfterSowing, Stage, stagename, plant_status, yield, TT, MaxT, MinT, Rain, Radn, radn_int, waterSD, irrigation, biomass, lai, GrainNo, GrainSize
      maize: same as Austria_Leibnitz.paddock.maize
  simulation Italy_Santena -> /Simulations/Austria_Leibnitz
    metfile met: filename=%apsim%\Model\Met\Italy_santena_JRC_1975_2010.txt
    area paddock -> /Simulations/Austria_Leibnitz/paddock
      folder Manager folder -> /Simulations/Austria_Leibnitz/paddock/Manager folder
        manager Sow on a fixed date: same as France_Marmande.paddock.Manager folder.Sow on a fixed date
        manager Reset on sowing
          # When should a reset be done
          modulename = maize  # The module the event is to come from
          eventname = sowing  # On which event should a reset be done
          # Reset details
          soilmodule = Ita_san  # Name of your soil module
          surfaceommodule = surface organic matter  # Name of your surface organic matter module
          resetWater = yes  # Reset soil water?
          resetNitrogen = yes  # Reset soil nitrogen?
          resetSurfaceOM = yes  # Reset surface organic matter?
          on [modulename].[eventname]:
          script: same as in Austria_Leibnitz.paddock.Manager folder.Reset on sowing
      Soil Ita_san
        Water
          Thickness  BD   AirDry  LL15   DUL    SAT
          200        1.3  0.048   0.143  0.284  0.41
          200        1.4  0.048   0.143  0.284  0.41
          200        1.5  0.048   0.143  0.284  0.41
          200        1.6  0.048   0.143  0.284  0.41
          200        1.6  0.048   0.143  0.284  0.41
          200        1.6  0.048   0.143  0.284  0.41
          300        1.6  0.048   0.143  0.284  0.41
          SoilCrop maize: LL=[0.143, 0.143, 0.143, 0.143, 0.143, 0.143, 0.143]; KL=[0.08, 0.08, 0.08, 0.07, 0.06, 0.06, 0.06]; XF=[1, 1, 1, 1, 1, 1, 1]
        SoilWater: same as Austria_Leibnitz.paddock.Aus_lei.SoilWater
        SoilOrganicMatter: same as Italy_Asola.paddock.Ita_aso.SoilOrganicMatter
        Analysis: Thickness=[200, 200, 200, 200, 200, 200, 300]; PH=[5.5, 5.4, 5.3, 5.2, 5.1, 5, 4.9]; PHUnits=Water; BoronUnits=HotWater
        InitialWater Initial water: FractionFull=1; PercentMethod=FilledFromTop; RelativeTo=ll15
        Sample Initial nitrogen: Date=14/05/1976; NO3Units=kgha; NH4Units=ppm; SWUnits=Volumetric; OCUnits=Total; PHUnits=Water
          Thickness  NO3  NH4
          200        60   2
          200        30   0.7
          200        20   0.5
          200        20   0.4
          200        20   0.4
          200        20   0.4
          300        20   0.4
      outputfile: filename=Italy_Santena.out; title=Italy_Santena
        events Reporting Frequency -> /Simulations/Austria_Leibnitz/paddock/Outputfile/Reporting Frequency
        variables
          variables: dd/mm/yyyy as Date, day_of_month, month, day, year, DaysAfterSowing, Stage, stagename, plant_status, yield, TT, MaxT, MinT, Rain, Radn, radn_int, waterSD, irrigation, biomass, lai, GrainNo, GrainSize
      maize: same as Austria_Leibnitz.paddock.maize
  simulation Poland_Tuszyn -> /Simulations/Austria_Leibnitz
    metfile met: filename=%apsim%\Model\Met\Poland_tuszyn_JRC_1975_2010.txt
    area paddock -> /Simulations/Austria_Leibnitz/paddock
      folder Manager folder -> /Simulations/Austria_Leibnitz/paddock/Manager folder
        manager Sow on a fixed date
          #
          date = 30-apr  # Enter sowing date (dd-mmm)
          #
          crop = maize  # Enter name of crop to sow
          density = 7.87  # Enter sowing density (plants/m2)
          depth = 30  # Enter sowing depth (mm)
          cultivar = B73  # Enter cultivar
          class = plant  # Enter crop growth class
          row_spacing = 800  # Enter row spacing (mm)
          on start_of_day:
          script: same as in Austria_Leibnitz.paddock.Manager folder.Sow on a fixed date
        manager Reset on sowing
          # When should a reset be done
          modulename = maize  # The module the event is to come from
          eventname = sowing  # On which event should a reset be done
          # Reset details
          soilmodule = Pol_tus  # Name of your soil module
          surfaceommodule = surface organic matter  # Name of your surface organic matter module
          resetWater = yes  # Reset soil water?
          resetNitrogen = yes  # Reset soil nitrogen?
          resetSurfaceOM = yes  # Reset surface organic matter?
          on [modulename].[eventname]:
          script: same as in Austria_Leibnitz.paddock.Manager folder.Reset on sowing
      Soil Pol_tus
        Water
          Thickness  BD   AirDry  LL15   DUL    SAT
          200        1.3  0.076   0.227  0.354  0.446
          200        1.4  0.076   0.227  0.354  0.446
          200        1.5  0.076   0.227  0.354  0.446
          200        1.6  0.076   0.227  0.354  0.446
          200        1.6  0.076   0.227  0.354  0.446
          200        1.6  0.076   0.227  0.354  0.446
          300        1.6  0.076   0.227  0.354  0.446
          SoilCrop maize: LL=[0.227, 0.227, 0.227, 0.227, 0.227, 0.227, 0.227]; KL=[0.08, 0.08, 0.08, 0.07, 0.06, 0.06, 0.06]; XF=[1, 1, 1, 1, 1, 1, 1]
        SoilWater: same as Austria_Leibnitz.paddock.Aus_lei.SoilWater
        SoilOrganicMatter: RootCN=45; RootWt=1000; SoilCN=14.5; EnrACoeff=7.4; EnrBCoeff=0.2; OCUnits=Total
          Thickness  OC   FBiom  FInert
          200        0.6  0.03   0.3
          200        0.4  0.01   0.4
          200        0.2  0      0.5
          200        0.1  0      0.7
          200        0.1  0      0.9
          200        0.1  0      0.9
          300        0.1  0      0.9
        Analysis: Thickness=[200, 200, 200, 200, 200, 200, 300]; PH=[4.5, 4.4, 4.3, 4.2, 4.1, 4, 3.9]; PHUnits=Water; BoronUnits=HotWater
        InitialWater Initial water: RelativeTo=ll15; FractionFull=1; PercentMethod=FilledFromTop
        Sample Initial nitrogen: Date=14/05/1976; NO3Units=kgha; NH4Units=ppm; SWUnits=Volumetric; OCUnits=Total; PHUnits=Water
          Thickness  NO3  NH4
          200        60   2
          200        30   0.7
          200        20   0.5
          200        20   0.4
          200        20   0.4
          200        20   0.4
          300        30   0.4
      outputfile: filename=Poland_Tuszyn.out; title=Poland_Tuszyn
        events Reporting Frequency -> /Simulations/Austria_Leibnitz/paddock/Outputfile/Reporting Frequency
        variables
          variables: dd/mm/yyyy as Date, day_of_month, month, day, year, DaysAfterSowing, Stage, stagename, plant_status, yield, TT, MaxT, MinT, Rain, Radn, radn_int, waterSD, irrigation, biomass, lai, GrainNo, GrainSize
      maize: same as Austria_Leibnitz.paddock.maize
  simulation Poland_Wrzesnia -> /Simulations/Austria_Leibnitz
    metfile met: filename=%apsim%\Model\Met\Poland_wrzesnia_JRC_1975_2010.txt
    area paddock -> /Simulations/Austria_Leibnitz/paddock
      folder Manager folder -> /Simulations/Austria_Leibnitz/paddock/Manager folder
        manager Sow on a fixed date: same as Germany_Hanover.paddock.Manager folder.Sow on a fixed date
        manager Reset on sowing
          # When should a reset be done
          modulename = maize  # The module the event is to come from
          eventname = sowing  # On which event should a reset be done
          # Reset details
          soilmodule = Pol_wre  # Name of your soil module
          surfaceommodule = surface organic matter  # Name of your surface organic matter module
          resetWater = yes  # Reset soil water?
          resetNitrogen = yes  # Reset soil nitrogen?
          resetSurfaceOM = yes  # Reset surface organic matter?
          on [modulename].[eventname]:
          script: same as in Austria_Leibnitz.paddock.Manager folder.Reset on sowing
      Soil Pol_wre: Latitude=0; Longitude=0
        Water
          Thickness  BD   AirDry  LL15   DUL    SAT
          200        1.3  0.044   0.132  0.205  0.392
          200        1.4  0.044   0.132  0.205  0.392
          200        1.5  0.044   0.132  0.205  0.392
          200        1.6  0.044   0.132  0.205  0.392
          200        1.6  0.044   0.132  0.205  0.392
          200        1.6  0.044   0.132  0.205  0.392
          300        1.6  0.044   0.132  0.205  0.392
          SoilCrop maize: LL=[0.132, 0.132, 0.132, 0.132, 0.132, 0.132, 0.132]; KL=[0.08, 0.08, 0.08, 0.07, 0.06, 0.06, 0.06]; XF=[1, 1, 1, 1, 1, 1, 1]
        SoilWater: same as Austria_Leibnitz.paddock.Aus_lei.SoilWater
        SoilOrganicMatter: same as France_Avignon.paddock.Fra_av.SoilOrganicMatter
        Analysis: Thickness=[200, 200, 200, 200, 200, 200, 300]; PH=[4.5, 4.4, 4.3, 4.2, 4.1, 4, 3.9]
        InitialWater Initial water: RelativeTo=ll15; FractionFull=1; PercentMethod=FilledFromTop
        Sample Initial nitrogen: Date=14/05/1976; NO3Units=kgha; NH4Units=ppm; SWUnits=Volumetric; OCUnits=Total; PHUnits=Water
          Thickness  NO3  NH4
          200        60   2
          200        30   0.7
          200        20   0.5
          200        20   0.4
          200        20   0.4
          200        20   0.4
          300        30   0.4
      outputfile: filename=Poland_Wrzesnia.out; title=Poland_Wrzesnia
        events Reporting Frequency -> /Simulations/Austria_Leibnitz/paddock/Outputfile/Reporting Frequency
        variables
          variables: dd/mm/yyyy as Date, day_of_month, month, day, year, DaysAfterSowing, Stage, stagename, plant_status, yield, TT, MaxT, MinT, Rain, Radn, radn_int, waterSD, irrigation, biomass, lai, GrainNo, GrainSize
      maize: same as Austria_Leibnitz.paddock.maize
  simulation Romania_Alexandria -> /Simulations/Austria_Leibnitz
    metfile met: filename=%apsim%\Model\Met\Romania_alexandria_JRC_1975_2010.txt
    area paddock -> /Simulations/Austria_Leibnitz/paddock
      folder Manager folder -> /Simulations/Austria_Leibnitz/paddock/Manager folder
        manager Sow on a fixed date: same as Bulgaria_General_Toshevo.paddock.Manager folder.Sow on a fixed date
        manager Reset on sowing
          # When should a reset be done
          modulename = maize  # The module the event is to come from
          eventname = sowing  # On which event should a reset be done
          # Reset details
          soilmodule = Rom_ale  # Name of your soil module
          surfaceommodule = surface organic matter  # Name of your surface organic matter module
          resetWater = yes  # Reset soil water?
          resetNitrogen = yes  # Reset soil nitrogen?
          resetSurfaceOM = yes  # Reset surface organic matter?
          on [modulename].[eventname]:
          script: same as in Austria_Leibnitz.paddock.Manager folder.Reset on sowing
      Soil Rom_ale: Latitude=0; Longitude=0
        Water
          Thickness  BD   AirDry  LL15   DUL    SAT
          200        1.3  0.12    0.359  0.481  0.541
          200        1.4  0.12    0.359  0.481  0.541
          200        1.5  0.12    0.359  0.481  0.541
          200        1.6  0.12    0.359  0.481  0.541
          200        1.6  0.12    0.359  0.481  0.541
          200        1.6  0.12    0.359  0.481  0.541
          300        1.6  0.12    0.359  0.481  0.541
          SoilCrop maize: LL=[0.359, 0.359, 0.359, 0.359, 0.359, 0.359, 0.359]; KL=[0.08, 0.08, 0.08, 0.07, 0.06, 0.06, 0.06]; XF=[1, 1, 1, 1, 1, 1, 1]
        SoilWater: same as Austria_Leibnitz.paddock.Aus_lei.SoilWater
        SoilOrganicMatter: same as Bulgaria_Glavinitsa.paddock.Bul_gla.SoilOrganicMatter
        Analysis: Thickness=[200, 200, 200, 200, 200, 200, 300]; PH=[5.5, 5.4, 5.3, 5.2, 5.1, 5, 4.9]; PHUnits=Water; BoronUnits=HotWater
        InitialWater Initial water: FractionFull=1; PercentMethod=FilledFromTop; RelativeTo=ll15
        Sample Initial nitrogen: Date=14/05/1976; NO3Units=kgha; NH4Units=ppm; SWUnits=Volumetric; OCUnits=Total; PHUnits=Water
          Thickness  NO3  NH4
          200        60   2
          200        30   0.7
          200        20   0.5
          200        20   0.4
          200        20   0.4
          200        20   0.4
          300        30   0.4
      outputfile: filename=Romania_Alexandria.out; title=Romania_Alexandria
        events Reporting Frequency -> /Simulations/Austria_Leibnitz/paddock/Outputfile/Reporting Frequency
        variables
          variables: dd/mm/yyyy as Date, day_of_month, month, day, year, DaysAfterSowing, Stage, stagename, plant_status, yield, TT, MaxT, MinT, Rain, Radn, radn_int, waterSD, irrigation, biomass, lai, GrainNo, GrainSize
      maize: same as Austria_Leibnitz.paddock.maize
  simulation Romania_Arad -> /Simulations/Austria_Leibnitz
    metfile met: filename=%apsim%\Model\Met\Romania_arad_JRC_1975_2010.txt
    area paddock -> /Simulations/Austria_Leibnitz/paddock
      folder Manager folder -> /Simulations/Austria_Leibnitz/paddock/Manager folder
        manager Sow on a fixed date: same as France_Pamproux.paddock.Manager folder.Sow on a fixed date
        manager Reset on sowing
          # When should a reset be done
          modulename = maize  # The module the event is to come from
          eventname = sowing  # On which event should a reset be done
          # Reset details
          soilmodule = Rom_ara  # Name of your soil module
          surfaceommodule = surface organic matter  # Name of your surface organic matter module
          resetWater = yes  # Reset soil water?
          resetNitrogen = yes  # Reset soil nitrogen?
          resetSurfaceOM = yes  # Reset surface organic matter?
          on [modulename].[eventname]:
          script: same as in Austria_Leibnitz.paddock.Manager folder.Reset on sowing
      Soil Rom_ara: Latitude=0; Longitude=0
        Water
          Thickness  BD   AirDry  LL15   DUL  SAT
          200        1.3  0.073   0.219  0.4  0.475
          200        1.4  0.073   0.219  0.4  0.475
          200        1.5  0.073   0.219  0.4  0.475
          200        1.6  0.073   0.219  0.4  0.475
          200        1.6  0.073   0.219  0.4  0.475
          200        1.6  0.073   0.219  0.4  0.475
          300        1.6  0.073   0.219  0.4  0.475
          SoilCrop maize: LL=[0.219, 0.219, 0.219, 0.219, 0.219, 0.219, 0.219]; KL=[0.08, 0.08, 0.08, 0.07, 0.06, 0.06, 0.06]; XF=[1, 1, 1, 1, 1, 1, 1]
        SoilWater: same as Austria_Leibnitz.paddock.Aus_lei.SoilWater
        SoilOrganicMatter: same as Austria_Leibnitz.paddock.Aus_lei.SoilOrganicMatter
        Analysis: Thickness=[200, 200, 200, 200, 200, 200, 300]; PH=[4.8, 4.7, 4.6, 4.5, 4.4, 4.3, 4.2]; PHUnits=Water; BoronUnits=HotWater
        InitialWater Initial water: FractionFull=1; PercentMethod=FilledFromTop; RelativeTo=ll15
        Sample Initial nitrogen: Date=14/05/1976; NO3Units=kgha; NH4Units=ppm; SWUnits=Volumetric; OCUnits=Total; PHUnits=Water
          Thickness  NO3  NH4
          200        60   2
          200        30   0.7
          200        20   0.5
          200        20   0.4
          200        20   0.4
          200        20   0.4
          300        30   0.4
      outputfile: filename=Romania_Arad.out; title=Romania_Arad
        events Reporting Frequency -> /Simulations/Austria_Leibnitz/paddock/Outputfile/Reporting Frequency
        variables
          variables: dd/mm/yyyy as Date, day_of_month, month, day, year, DaysAfterSowing, Stage, stagename, plant_status, yield, TT, MaxT, MinT, Rain, Radn, radn_int, waterSD, irrigation, biomass, lai, GrainNo, GrainSize
      maize: same as Austria_Leibnitz.paddock.maize
  simulation Romania_Barca -> /Simulations/Austria_Leibnitz
    metfile met: filename=%apsim%\Model\Met\Romania_barca_JRC_1975_2010.txt
    area paddock -> /Simulations/Austria_Leibnitz/paddock
      folder Manager folder -> /Simulations/Austria_Leibnitz/paddock/Manager folder
        manager Sow on a fixed date
          #
          date = 1-apr  # Enter sowing date (dd-mmm)
          #
          crop = maize  # Enter name of crop to sow
          density = 7.45  # Enter sowing density (plants/m2)
          depth = 30  # Enter sowing depth (mm)
          cultivar = B73  # Enter cultivar
          class = plant  # Enter crop growth class
          row_spacing = 800  # Enter row spacing (mm)
          on start_of_day:
          script: same as in Austria_Leibnitz.paddock.Manager folder.Sow on a fixed date
        manager Reset on sowing
          # When should a reset be done
          modulename = maize  # The module the event is to come from
          eventname = sowing  # On which event should a reset be done
          # Reset details
          soilmodule = Rom_bar  # Name of your soil module
          surfaceommodule = surface organic matter  # Name of your surface organic matter module
          resetWater = yes  # Reset soil water?
          resetNitrogen = yes  # Reset soil nitrogen?
          resetSurfaceOM = yes  # Reset surface organic matter?
          on [modulename].[eventname]:
          script: same as in Austria_Leibnitz.paddock.Manager folder.Reset on sowing
      Soil Rom_bar: Latitude=0; Longitude=0
        Water
          Thickness  BD   AirDry  LL15   DUL    SAT
          200        1.3  0.078   0.233  0.431  0.494
          200        1.4  0.078   0.233  0.431  0.494
          200        1.5  0.078   0.233  0.431  0.494
          200        1.6  0.078   0.233  0.431  0.494
          200        1.6  0.078   0.233  0.431  0.494
          200        1.6  0.078   0.233  0.431  0.494
          300        1.6  0.078   0.233  0.431  0.494
          SoilCrop maize: LL=[0.233, 0.233, 0.233, 0.233, 0.233, 0.233, 0.233]; KL=[0.08, 0.08, 0.08, 0.07, 0.06, 0.06, 0.06]; XF=[1, 1, 1, 1, 1, 1, 1]
        SoilWater: same as Austria_Leibnitz.paddock.Aus_lei.SoilWater
        SoilOrganicMatter: same as France_Chemille.paddock.Fra_che.SoilOrganicMatter
        Analysis: Thickness=[200, 200, 200, 200, 200, 200, 300]; PH=[6.3, 6.2, 6.1, 6, 5.9, 5.8, 5.7]; PHUnits=Water; BoronUnits=HotWater
        InitialWater Initial water: FractionFull=1; PercentMethod=FilledFromTop; RelativeTo=ll15
        Sample Initial nitrogen: Date=14/05/1976; NO3Units=kgha; NH4Units=ppm; SWUnits=Volumetric; OCUnits=Total; PHUnits=Water
          Thickness  NO3  NH4
          200        60   2
          200        30   0.7
          200        20   0.5
          200        20   0.4
          200        20   0.4
          200        20   0.4
          300        30   0.4
      outputfile: filename=Romania_Barca.out; title=Romania_Barca
        events Reporting Frequency -> /Simulations/Austria_Leibnitz/paddock/Outputfile/Reporting Frequency
        variables
          variables: dd/mm/yyyy as Date, day_of_month, month, day, year, DaysAfterSowing, Stage, stagename, plant_status, yield, TT, MaxT, MinT, Rain, Radn, radn_int, waterSD, irrigation, biomass, lai, GrainNo, GrainSize
      maize: same as Austria_Leibnitz.paddock.maize
  simulation Romania_Barlad -> /Simulations/Austria_Leibnitz
    metfile met: filename=%apsim%\Model\Met\Romania_barlad_JRC_1975_2010.txt
    area paddock -> /Simulations/Austria_Leibnitz/paddock
      folder Manager folder -> /Simulations/Austria_Leibnitz/paddock/Manager folder
        manager Sow on a fixed date
          #
          date = 10-apr  # Enter sowing date (dd-mmm)
          #
          crop = maize  # Enter name of crop to sow
          density = 7.6  # Enter sowing density (plants/m2)
          depth = 30  # Enter sowing depth (mm)
          cultivar = B73  # Enter cultivar
          class = plant  # Enter crop growth class
          row_spacing = 800  # Enter row spacing (mm)
          on start_of_day:
          script: same as in Austria_Leibnitz.paddock.Manager folder.Sow on a fixed date
        manager Reset on sowing: same as Romania_Barca.paddock.Manager folder.Reset on sowing
      Soil Rom_bar: Latitude=0; Longitude=0
        Water
          Thickness  BD   AirDry  LL15   DUL    SAT
          200        1.3  0.066   0.197  0.388  0.456
          200        1.4  0.066   0.197  0.388  0.456
          200        1.5  0.066   0.197  0.388  0.456
          200        1.6  0.066   0.197  0.388  0.456
          200        1.6  0.066   0.197  0.388  0.456
          200        1.6  0.066   0.197  0.388  0.456
          300        1.6  0.066   0.197  0.388  0.456
          SoilCrop maize: LL=[0.197, 0.197, 0.197, 0.197, 0.197, 0.197, 0.197]; KL=[0.08, 0.08, 0.08, 0.07, 0.06, 0.06, 0.06]; XF=[1, 1, 1, 1, 1, 1, 1]
        SoilWater: same as Austria_Leibnitz.paddock.Aus_lei.SoilWater
        SoilOrganicMatter: same as France_Avignon.paddock.Fra_av.SoilOrganicMatter
        Analysis: Thickness=[200, 200, 200, 200, 200, 200, 300]; PH=[8.3, 8.2, 8.1, 8, 7.9, 7.8, 7.7]; PHUnits=Water; BoronUnits=HotWater
        InitialWater Initial water: FractionFull=1; PercentMethod=FilledFromTop; RelativeTo=ll15
        Sample Initial nitrogen: Date=14/05/1976; NO3Units=kgha; NH4Units=ppm; SWUnits=Volumetric; OCUnits=Total; PHUnits=Water
          Thickness  NO3  NH4
          200        60   2
          200        30   0.7
          200        20   0.5
          200        20   0.4
          200        20   0.4
          200        20   0.4
          300        30   0.4
      outputfile: filename=Romania_Barlad.out; title=Romania_Barlad
        events Reporting Frequency -> /Simulations/Austria_Leibnitz/paddock/Outputfile/Reporting Frequency
        variables
          variables: dd/mm/yyyy as Date, day_of_month, month, day, year, DaysAfterSowing, Stage, stagename, plant_status, yield, TT, MaxT, MinT, Rain, Radn, radn_int, waterSD, irrigation, biomass, lai, GrainNo, GrainSize
      maize: same as Austria_Leibnitz.paddock.maize
  simulation Romania_Botosani -> /Simulations/Austria_Leibnitz
    metfile met: filename=%apsim%\Model\Met\Romania_botosani_JRC_1975_2010.txt
    area paddock -> /Simulations/Austria_Leibnitz/paddock
      folder Manager folder -> /Simulations/Austria_Leibnitz/paddock/Manager folder
        manager Sow on a fixed date: same as Hungary_Nyirbator.paddock.Manager folder.Sow on a fixed date
        manager Reset on sowing
          # When should a reset be done
          modulename = maize  # The module the event is to come from
          eventname = sowing  # On which event should a reset be done
          # Reset details
          soilmodule = Rom_bot  # Name of your soil module
          surfaceommodule = surface organic matter  # Name of your surface organic matter module
          resetWater = yes  # Reset soil water?
          resetNitrogen = yes  # Reset soil nitrogen?
          resetSurfaceOM = yes  # Reset surface organic matter?
          on [modulename].[eventname]:
          script: same as in Austria_Leibnitz.paddock.Manager folder.Reset on sowing
      Soil Rom_bot: Latitude=0; Longitude=0
        Water
          Thickness  BD   AirDry  LL15   DUL    SAT
          200        1.3  0.113   0.338  0.443  0.503
          200        1.4  0.113   0.338  0.443  0.503
          200        1.5  0.113   0.338  0.443  0.503
          200        1.6  0.113   0.338  0.443  0.503
          200        1.6  0.113   0.338  0.443  0.503
          200        1.6  0.113   0.338  0.443  0.503
          300        1.6  0.113   0.338  0.443  0.503
          SoilCrop maize: LL=[0.338, 0.338, 0.338, 0.338, 0.338, 0.338, 0.338]; KL=[0.08, 0.08, 0.08, 0.07, 0.06, 0.06, 0.06]; XF=[1, 1, 1, 1, 1, 1, 1]
        SoilWater: same as Austria_Leibnitz.paddock.Aus_lei.SoilWater
        SoilOrganicMatter: same as France_Vitre.paddock.Fra_vit.SoilOrganicMatter
        Analysis: Thickness=[200, 200, 200, 200, 200, 200, 300]; PH=[7, 6.9, 6.8, 6.7, 6.6, 6.5, 6.4]; PHUnits=Water; BoronUnits=HotWater
        InitialWater Initial water: FractionFull=1; PercentMethod=FilledFromTop; RelativeTo=ll15
        Sample Initial nitrogen: Date=14/05/1976; NO3Units=kgha; NH4Units=ppm; SWUnits=Volumetric; OCUnits=Total; PHUnits=Water
          Thickness  NO3  NH4
          200        60   2
          200        30   0.7
          200        20   0.5
          200        20   0.4
          200        20   0.4
          200        20   0.4
          300        30   0.4
      outputfile: filename=Romania_Botosani.out; title=Romania_Botosani
        events Reporting Frequency -> /Simulations/Austria_Leibnitz/paddock/Outputfile/Reporting Frequency
        variables
          variables: dd/mm/yyyy as Date, day_of_month, month, day, year, DaysAfterSowing, Stage, stagename, plant_status, yield, TT, MaxT, MinT, Rain, Radn, radn_int, waterSD, irrigation, biomass, lai, GrainNo, GrainSize
      maize: same as Austria_Leibnitz.paddock.maize
  simulation Romania_Bulbacata -> /Simulations/Austria_Leibnitz
    metfile met: filename=%apsim%\Model\Met\Romania_bulbacata_JRC_1975_2010.txt
    area paddock -> /Simulations/Austria_Leibnitz/paddock
      folder Manager folder -> /Simulations/Austria_Leibnitz/paddock/Manager folder
        manager Sow on a fixed date
          #
          date = 10-apr  # Enter sowing date (dd-mmm)
          #
          crop = maize  # Enter name of crop to sow
          density = 7.54  # Enter sowing density (plants/m2)
          depth = 30  # Enter sowing depth (mm)
          cultivar = B73  # Enter cultivar
          class = plant  # Enter crop growth class
          row_spacing = 800  # Enter row spacing (mm)
          on start_of_day:
          script: same as in Austria_Leibnitz.paddock.Manager folder.Sow on a fixed date
        manager Reset on sowing
          # When should a reset be done
          modulename = maize  # The module the event is to come from
          eventname = sowing  # On which event should a reset be done
          # Reset details
          soilmodule = Rom_bul  # Name of your soil module
          surfaceommodule = surface organic matter  # Name of your surface organic matter module
          resetWater = yes  # Reset soil water?
          resetNitrogen = yes  # Reset soil nitrogen?
          resetSurfaceOM = yes  # Reset surface organic matter?
          on [modulename].[eventname]:
          script: same as in Austria_Leibnitz.paddock.Manager folder.Reset on sowing
      Soil Rom_bul: Latitude=0; Longitude=0
        Water
          Thickness  BD   AirDry  LL15  DUL   SAT
          200        1.3  0.123   0.37  0.48  0.54
          200        1.4  0.123   0.37  0.48  0.54
          200        1.5  0.123   0.37  0.48  0.54
          200        1.6  0.123   0.37  0.48  0.54
          200        1.6  0.123   0.37  0.48  0.54
          200        1.6  0.123   0.37  0.48  0.54
          300        1.6  0.123   0.37  0.48  0.54
          SoilCrop maize: LL=[0.37, 0.37, 0.37, 0.37, 0.37, 0.37, 0.37]; KL=[0.08, 0.08, 0.08, 0.07, 0.06, 0.06, 0.06]; XF=[1, 1, 1, 1, 1, 1, 1]
        SoilWater: same as Austria_Leibnitz.paddock.Aus_lei.SoilWater
        SoilOrganicMatter: same as France_Avignon.paddock.Fra_av.SoilOrganicMatter
        Analysis: Thickness=[200, 200, 200, 200, 200, 200, 300]; PH=[7.5, 7.4, 7.3, 7.2, 7.1, 7, 6.9]
        InitialWater Initial water: RelativeTo=ll15; FractionFull=1; PercentMethod=FilledFromTop
        Sample Initial nitrogen: Date=14/05/1976; NO3Units=kgha; NH4Units=ppm; SWUnits=Volumetric; OCUnits=Total; PHUnits=Water
          Thickness  NO3  NH4
          200        60   2
          200        30   0.7
          200        20   0.5
          200        20   0.4
          200        20   0.4
          200        20   0.4
          300        30   0.4
      outputfile: filename=Romania_Bulbacata.out; title=Romania_Bulbacata
        events Reporting Frequency -> /Simulations/Austria_Leibnitz/paddock/Outputfile/Reporting Frequency
        variables
          variables: dd/mm/yyyy as Date, day_of_month, month, day, year, DaysAfterSowing, Stage, stagename, plant_status, yield, TT, MaxT, MinT, Rain, Radn, radn_int, waterSD, irrigation, biomass, lai, GrainNo, GrainSize
      maize: same as Austria_Leibnitz.paddock.maize
  simulation Romania_Chirnogeni -> /Simulations/Austria_Leibnitz
    metfile met: filename=%apsim%\Model\Met\Romania_chirnogeni_JRC_1975_2010.txt
    area paddock -> /Simulations/Austria_Leibnitz/paddock
      folder Manager folder -> /Simulations/Austria_Leibnitz/paddock/Manager folder
        manager Sow on a fixed date: same as Bulgaria_General_Toshevo.paddock.Manager folder.Sow on a fixed date
        manager Reset on sowing
          # When should a reset be done
          modulename = maize  # The module the event is to come from
          eventname = sowing  # On which event should a reset be done
          # Reset details
          soilmodule = Rom_chi  # Name of your soil module
          surfaceommodule = surface organic matter  # Name of your surface organic matter module
          resetWater = yes  # Reset soil water?
          resetNitrogen = yes  # Reset soil nitrogen?
          resetSurfaceOM = yes  # Reset surface organic matter?
          on [modulename].[eventname]:
          script: same as in Austria_Leibnitz.paddock.Manager folder.Reset on sowing
      Soil Rom_chi: Latitude=0; Longitude=0
        Water
          Thickness  BD   AirDry  LL15   DUL    SAT
          200        1.3  0.061   0.184  0.351  0.43
          200        1.4  0.061   0.184  0.351  0.43
          200        1.5  0.061   0.184  0.351  0.43
          200        1.6  0.061   0.184  0.351  0.43
          200        1.6  0.061   0.184  0.351  0.43
          200        1.6  0.061   0.184  0.351  0.43
          300        1.6  0.061   0.184  0.351  0.43
          SoilCrop maize: LL=[0.184, 0.184, 0.184, 0.184, 0.184, 0.184, 0.184]; KL=[0.08, 0.08, 0.08, 0.07, 0.06, 0.06, 0.06]; XF=[1, 1, 1, 1, 1, 1, 1]
        SoilWater: same as Austria_Leibnitz.paddock.Aus_lei.SoilWater
        SoilOrganicMatter: same as France_Pamproux.paddock.Fra_pam.SoilOrganicMatter
        Analysis: Thickness=[200, 200, 200, 200, 200, 200, 300]; PH=[8, 7.9, 7.8, 7.7, 7.6, 7.5, 7.4]; PHUnits=Water; BoronUnits=HotWater
        InitialWater Initial water: FractionFull=1; PercentMethod=FilledFromTop; RelativeTo=ll15
        Sample Initial nitrogen: Date=14/05/1976; NO3Units=kgha; NH4Units=ppm; SWUnits=Volumetric; OCUnits=Total; PHUnits=Water
          Thickness  NO3  NH4
          200        60   2
          200        30   0.7
          200        20   0.5
          200        20   0.4
          200        20   0.4
          200        20   0.4
          300        30   0.4
      outputfile: filename=Romania_Chirnogeni.out; title=Romania_Chirnogeni
        events Reporting Frequency -> /Simulations/Austria_Leibnitz/paddock/Outputfile/Reporting Frequency
        variables
          variables: dd/mm/yyyy as Date, day_of_month, month, day, year, DaysAfterSowing, Stage, stagename, plant_status, yield, TT, MaxT, MinT, Rain, Radn, radn_int, waterSD, irrigation, biomass, lai, GrainNo, GrainSize
      maize: same as Austria_Leibnitz.paddock.maize
  simulation Romania_Daia_Romana -> /Simulations/Austria_Leibnitz
    metfile met: filename=%apsim%\Model\Met\Romania_daia_romana_JRC_1975_2010.txt
    area paddock -> /Simulations/Austria_Leibnitz/paddock
      folder Manager folder -> /Simulations/Austria_Leibnitz/paddock/Manager folder
        manager Sow on a fixed date: same as France_Pamproux.paddock.Manager folder.Sow on a fixed date
        manager Reset on sowing
          # When should a reset be done
          modulename = maize  # The module the event is to come from
          eventname = sowing  # On which event should a reset be done
          # Reset details
          soilmodule = Rom_dai  # Name of your soil module
          surfaceommodule = surface organic matter  # Name of your surface organic matter module
          resetWater = yes  # Reset soil water?
          resetNitrogen = yes  # Reset soil nitrogen?
          resetSurfaceOM = yes  # Reset surface organic matter?
          on [modulename].[eventname]:
          script: same as in Austria_Leibnitz.paddock.Manager folder.Reset on sowing
      Soil Rom_dai: Latitude=0; Longitude=0
        Water
          Thickness  BD   AirDry  LL15   DUL    SAT
          200        1.3  0.11    0.331  0.435  0.495
          200        1.4  0.11    0.331  0.435  0.495
          200        1.5  0.11    0.331  0.435  0.495
          200        1.6  0.11    0.331  0.435  0.495
          200        1.6  0.11    0.331  0.435  0.495
          200        1.6  0.11    0.331  0.435  0.495
          300        1.6  0.11    0.331  0.435  0.495
          SoilCrop maize: LL=[0.331, 0.331, 0.331, 0.331, 0.331, 0.331, 0.331]; KL=[0.08, 0.08, 0.08, 0.07, 0.06, 0.06, 0.06]; XF=[1, 1, 1, 1, 1, 1, 1]
        SoilWater: same as Austria_Leibnitz.paddock.Aus_lei.SoilWater
        SoilOrganicMatter: same as Austria_Leibnitz.paddock.Aus_lei.SoilOrganicMatter
        Analysis: Thickness=[200, 200, 200, 200, 200, 200, 300]; PH=[7.2, 7.1, 7, 6.9, 6.8, 6.7, 6.6]; PHUnits=Water; BoronUnits=HotWater
        InitialWater Initial water: RelativeTo=ll15; FractionFull=1; PercentMethod=FilledFromTop
        Sample Initial nitrogen: Date=14/05/1976; NO3Units=kgha; NH4Units=ppm; SWUnits=Volumetric; OCUnits=Total; PHUnits=Water
          Thickness  NO3  NH4
          200        60   2
          200        30   0.7
          200        20   0.5
          200        20   0.4
          200        20   0.4
          200        20   0.4
          300        30   0.4
      outputfile: filename=Romania_Daia_Romana.out; title=Romania_Daia_Romana
        events Reporting Frequency -> /Simulations/Austria_Leibnitz/paddock/Outputfile/Reporting Frequency
        variables
          variables: dd/mm/yyyy as Date, day_of_month, month, day, year, DaysAfterSowing, Stage, stagename, plant_status, yield, TT, MaxT, MinT, Rain, Radn, radn_int, waterSD, irrigation, biomass, lai, GrainNo, GrainSize
      maize: same as Austria_Leibnitz.paddock.maize
  simulation Romania_Dochia -> /Simulations/Austria_Leibnitz
    metfile met: filename=%apsim%\Model\Met\Romania_dochia_JRC_1975_2010.txt
    area paddock -> /Simulations/Austria_Leibnitz/paddock
      folder Manager folder -> /Simulations/Austria_Leibnitz/paddock/Manager folder
        manager Sow on a fixed date
          #
          date = 20-apr  # Enter sowing date (dd-mmm)
          #
          crop = maize  # Enter name of crop to sow
          density = 7.63  # Enter sowing density (plants/m2)
          depth = 30  # Enter sowing depth (mm)
          cultivar = B73  # Enter cultivar
          class = plant  # Enter crop growth class
          row_spacing = 800  # Enter row spacing (mm)
          on start_of_day:
          script: same as in Austria_Leibnitz.paddock.Manager folder.Sow on a fixed date
        manager Reset on sowing
          # When should a reset be done
          modulename = maize  # The module the event is to come from
          eventname = sowing  # On which event should a reset be done
          # Reset details
          soilmodule = Rom_doc  # Name of your soil module
          surfaceommodule = surface organic matter  # Name of your surface organic matter module
          resetWater = yes  # Reset soil water?
          resetNitrogen = yes  # Reset soil nitrogen?
          resetSurfaceOM = yes  # Reset surface organic matter?
          on [modulename].[eventname]:
          script: same as in Austria_Leibnitz.paddock.Manager folder.Reset on sowing
      Soil Rom_doc: Latitude=0; Longitude=0
        Water
          Thickness  BD   AirDry  LL15   DUL   SAT
          200        1.3  0.073   0.219  0.38  0.45
          200        1.4  0.073   0.219  0.38  0.45
          200        1.5  0.073   0.219  0.38  0.45
          200        1.6  0.073   0.219  0.38  0.45
          200        1.6  0.073   0.219  0.38  0.45
          200        1.6  0.073   0.219  0.38  0.45
          300        1.6  0.073   0.219  0.38  0.45
          SoilCrop maize: LL=[0.219, 0.219, 0.219, 0.219, 0.219, 0.219, 0.219]; KL=[0.08, 0.08, 0.08, 0.07, 0.06, 0.06, 0.06]; XF=[1, 1, 1, 1, 1, 1, 1]
        SoilWater: same as Austria_Leibnitz.paddock.Aus_lei.SoilWater
        SoilOrganicMatter: same as France_Pamproux.paddock.Fra_pam.SoilOrganicMatter
        Analysis: Thickness=[200, 200, 200, 200, 200, 200, 300]; PH=[6.8, 6.7, 6.6, 6.5, 6.4, 6.3, 6.2]; PHUnits=Water; BoronUnits=HotWater
        InitialWater Initial water: FractionFull=1; PercentMethod=FilledFromTop; RelativeTo=ll15
        Sample Initial nitrogen: Date=14/05/1976; NO3Units=kgha; NH4Units=ppm; SWUnits=Volumetric; OCUnits=Total; PHUnits=Water
          Thickness  NO3  NH4
          200        60   2
          200        30   0.7
          200        20   0.5
          200        20   0.4
          200        20   0.4
          200        20   0.4
          300        30   0.4
      outputfile: filename=Romania_Dochia.out; title=Romania_Dochia
        events Reporting Frequency -> /Simulations/Austria_Leibnitz/paddock/Outputfile/Reporting Frequency
        variables
          variables: dd/mm/yyyy as Date, day_of_month, month, day, year, DaysAfterSowing, Stage, stagename, plant_status, yield, TT, MaxT, MinT, Rain, Radn, radn_int, waterSD, irrigation, biomass, lai, GrainNo, GrainSize
      maize: same as Austria_Leibnitz.paddock.maize
  simulation Romania_Dor_Marunt -> /Simulations/Austria_Leibnitz
    metfile met: filename=%apsim%\Model\Met\Romania_dor_marunt_JRC_1975_2010.txt
    area paddock -> /Simulations/Austria_Leibnitz/paddock
      folder Manager folder -> /Simulations/Austria_Leibnitz/paddock/Manager folder
        manager Sow on a fixed date
          #
          date = 10-apr  # Enter sowing date (dd-mmm)
          #
          crop = maize  # Enter name of crop to sow
          density = 7.48  # Enter sowing density (plants/m2)
          depth = 30  # Enter sowing depth (mm)
          cultivar = B73  # Enter cultivar
          class = plant  # Enter crop growth class
          row_spacing = 800  # Enter row spacing (mm)
          on start_of_day:
          script: same as in Austria_Leibnitz.paddock.Manager folder.Sow on a fixed date
        manager Reset on sowing
          # When should a reset be done
          modulename = maize  # The module the event is to come from
          eventname = sowing  # On which event should a reset be done
          # Reset details
          soilmodule = Rom_dor  # Name of your soil module
          surfaceommodule = surface organic matter  # Name of your surface organic matter module
          resetWater = yes  # Reset soil water?
          resetNitrogen = yes  # Reset soil nitrogen?
          resetSurfaceOM = yes  # Reset surface organic matter?
          on [modulename].[eventname]:
          script: same as in Austria_Leibnitz.paddock.Manager folder.Reset on sowing
      Soil Rom_dor: Latitude=0; Longitude=0
        Water
          Thickness  BD   AirDry  LL15   DUL    SAT
          200        1.3  0.076   0.229  0.417  0.482
          200        1.4  0.076   0.229  0.417  0.482
          200        1.5  0.076   0.229  0.417  0.482
          200        1.6  0.076   0.229  0.417  0.482
          200        1.6  0.076   0.229  0.417  0.482
          200        1.6  0.076   0.229  0.417  0.482
          300        1.6  0.076   0.229  0.417  0.482
          SoilCrop maize: LL=[0.229, 0.229, 0.229, 0.229, 0.229, 0.229, 0.229]; KL=[0.08, 0.08, 0.08, 0.07, 0.06, 0.06, 0.06]; XF=[1, 1, 1, 1, 1, 1, 1]
        SoilWater: same as Austria_Leibnitz.paddock.Aus_lei.SoilWater
        SoilOrganicMatter: same as Italy_Asola.paddock.Ita_aso.SoilOrganicMatter
        Analysis: Thickness=[200, 200, 200, 200, 200, 200, 300]; PH=[6.3, 6.2, 6.1, 6, 5.9, 5.8, 5.7]; PHUnits=Water; BoronUnits=HotWater
        InitialWater Initial water: FractionFull=1; PercentMethod=FilledFromTop; RelativeTo=ll15
        Sample Initial nitrogen: Date=14/05/1976; NO3Units=kgha; NH4Units=ppm; SWUnits=Volumetric; OCUnits=Total; PHUnits=Water
          Thickness  NO3  NH4
          200        60   2
          200        30   0.7
          200        20   0.5
          200        20   0.4
          200        20   0.4
          200        20   0.4
          300        30   0.4
      outputfile: filename=Romania_Dor_Marunt.out; title=Romania_Dor_Marunt
        events Reporting Frequency -> /Simulations/Austria_Leibnitz/paddock/Outputfile/Reporting Frequency
        variables
          variables: dd/mm/yyyy as Date, day_of_month, month, day, year, DaysAfterSowing, Stage, stagename, plant_status, yield, TT, MaxT, MinT, Rain, Radn, radn_int, waterSD, irrigation, biomass, lai, GrainNo, GrainSize
      maize: same as Austria_Leibnitz.paddock.maize
  simulation Romania_Gataia -> /Simulations/Austria_Leibnitz
    metfile met: filename=%apsim%\Model\Met\Romania_gataia_JRC_1975_2010.txt
    area paddock -> /Simulations/Austria_Leibnitz/paddock
      folder Manager folder -> /Simulations/Austria_Leibnitz/paddock/Manager folder
        manager Sow on a fixed date
          #
          date = 20-apr  # Enter sowing date (dd-mmm)
          #
          crop = maize  # Enter name of crop to sow
          density = 7.54  # Enter sowing density (plants/m2)
          depth = 30  # Enter sowing depth (mm)
          cultivar = B73  # Enter cultivar
          class = plant  # Enter crop growth class
          row_spacing = 800  # Enter row spacing (mm)
          on start_of_day:
          script: same as in Austria_Leibnitz.paddock.Manager folder.Sow on a fixed date
        manager Reset on sowing
          # When should a reset be done
          modulename = maize  # The module the event is to come from
          eventname = sowing  # On which event should a reset be done
          # Reset details
          soilmodule = Rom_gat  # Name of your soil module
          surfaceommodule = surface organic matter  # Name of your surface organic matter module
          resetWater = yes  # Reset soil water?
          resetNitrogen = yes  # Reset soil nitrogen?
          resetSurfaceOM = yes  # Reset surface organic matter?
          on [modulename].[eventname]:
          script: same as in Austria_Leibnitz.paddock.Manager folder.Reset on sowing
      Soil Rom_gat: Latitude=0; Longitude=0
        Water
          Thickness  BD   AirDry  LL15   DUL    SAT
          200        1.3  0.074   0.222  0.363  0.465
          200        1.4  0.074   0.222  0.363  0.465
          200        1.5  0.074   0.222  0.363  0.465
          200        1.6  0.074   0.222  0.363  0.465
          200        1.6  0.074   0.222  0.363  0.465
          200        1.6  0.074   0.222  0.363  0.465
          300        1.6  0.074   0.222  0.363  0.465
          SoilCrop maize: LL=[0.222, 0.222, 0.222, 0.222, 0.222, 0.222, 0.222]; KL=[0.08, 0.08, 0.08, 0.07, 0.06, 0.06, 0.06]; XF=[1, 1, 1, 1, 1, 1, 1]
        SoilWater: same as Austria_Leibnitz.paddock.Aus_lei.SoilWater
        SoilOrganicMatter: same as Austria_Leibnitz.paddock.Aus_lei.SoilOrganicMatter
        Analysis: Thickness=[200, 200, 200, 200, 200, 200, 300]; PH=[5.7, 5.6, 5.5, 5.4, 5.3, 5.2, 5.1]; PHUnits=Water; BoronUnits=HotWater
        InitialWater Initial water: FractionFull=1; PercentMethod=FilledFromTop; RelativeTo=ll15
        Sample Initial nitrogen: Date=14/05/1976; NO3Units=kgha; NH4Units=ppm; SWUnits=Volumetric; OCUnits=Total; PHUnits=Water
          Thickness  NO3  NH4
          200        60   2
          200        30   0.7
          200        20   0.5
          200        20   0.4
          200        20   0.4
          200        20   0.4
          300        30   0.4
      outputfile: filename=Romania_Gataia.out; title=Romania_Gataia
        events Reporting Frequency -> /Simulations/Austria_Leibnitz/paddock/Outputfile/Reporting Frequency
        variables
          variables: dd/mm/yyyy as Date, day_of_month, month, day, year, DaysAfterSowing, Stage, stagename, plant_status, yield, TT, MaxT, MinT, Rain, Radn, radn_int, waterSD, irrigation, biomass, lai, GrainNo, GrainSize
      maize: same as Austria_Leibnitz.paddock.maize
  simulation Romania_Lovrin -> /Simulations/Austria_Leibnitz
    metfile met: filename=%apsim%\Model\Met\Romania_lovrin_JRC_1975_2010.txt
    area paddock -> /Simulations/Austria_Leibnitz/paddock
      folder Manager folder -> /Simulations/Austria_Leibnitz/paddock/Manager folder
        manager Sow on a fixed date
          #
          date = 20-apr  # Enter sowing date (dd-mmm)
          #
          crop = maize  # Enter name of crop to sow
          density = 7.57  # Enter sowing density (plants/m2)
          depth = 30  # Enter sowing depth (mm)
          cultivar = B73  # Enter cultivar
          class = plant  # Enter crop growth class
          row_spacing = 800  # Enter row spacing (mm)
          on start_of_day:
          script: same as in Austria_Leibnitz.paddock.Manager folder.Sow on a fixed date
        manager Reset on sowing
          # When should a reset be done
          modulename = maize  # The module the event is to come from
          eventname = sowing  # On which event should a reset be done
          # Reset details
          soilmodule = Rom_lov  # Name of your soil module
          surfaceommodule = surface organic matter  # Name of your surface organic matter module
          resetWater = yes  # Reset soil water?
          resetNitrogen = yes  # Reset soil nitrogen?
          resetSurfaceOM = yes  # Reset surface organic matter?
          on [modulename].[eventname]:
          script: same as in Austria_Leibnitz.paddock.Manager folder.Reset on sowing
      Soil Rom_lov
        Water
          Thickness  BD   AirDry  LL15   DUL    SAT
          200        1.3  0.072   0.215  0.387  0.454
          200        1.4  0.072   0.215  0.387  0.454
          200        1.5  0.072   0.215  0.387  0.454
          200        1.6  0.072   0.215  0.387  0.454
          200        1.6  0.072   0.215  0.387  0.454
          200        1.6  0.072   0.215  0.387  0.454
          300        1.6  0.072   0.215  0.387  0.454
          SoilCrop maize: LL=[0.215, 0.215, 0.215, 0.215, 0.215, 0.215, 0.215]; KL=[0.08, 0.08, 0.08, 0.07, 0.06, 0.06, 0.06]; XF=[1, 1, 1, 1, 1, 1, 1]
        SoilWater: same as Austria_Leibnitz.paddock.Aus_lei.SoilWater
        SoilOrganicMatter: same as Italy_Asola.paddock.Ita_aso.SoilOrganicMatter
        Analysis: Thickness=[200, 200, 200, 200, 200, 200, 300]; PH=[6.4, 6.3, 6.2, 6.1, 6, 5.9, 5.8]; PHUnits=Water; BoronUnits=HotWater
        InitialWater Initial water: FractionFull=1; PercentMethod=FilledFromTop; RelativeTo=ll15
        Sample Initial nitrogen: Date=14/05/1976; NO3Units=kgha; NH4Units=ppm; SWUnits=Volumetric; OCUnits=Total; PHUnits=Water
          Thickness  NO3  NH4
          200        60   2
          200        30   0.7
          200        20   0.5
          200        20   0.4
          200        20   0.4
          200        20   0.4
          300        30   0.4
      outputfile: filename=Romania_Lovrin.out; title=Romania_Lovrin
        events Reporting Frequency -> /Simulations/Austria_Leibnitz/paddock/Outputfile/Reporting Frequency
        variables
          variables: dd/mm/yyyy as Date, day_of_month, month, day, year, DaysAfterSowing, Stage, stagename, plant_status, yield, TT, MaxT, MinT, Rain, Radn, radn_int, waterSD, irrigation, biomass, lai, GrainNo, GrainSize
      maize: same as Austria_Leibnitz.paddock.maize
  simulation Romania_Medgidia -> /Simulations/Austria_Leibnitz
    metfile met: filename=%apsim%\Model\Met\Romania_medgidiga_JRC_1975_2010.txt
    area paddock -> /Simulations/Austria_Leibnitz/paddock
      folder Manager folder -> /Simulations/Austria_Leibnitz/paddock/Manager folder
        manager Sow on a fixed date
          #
          date = 1-apr  # Enter sowing date (dd-mmm)
          #
          crop = maize  # Enter name of crop to sow
          density = 7.48  # Enter sowing density (plants/m2)
          depth = 30  # Enter sowing depth (mm)
          cultivar = B73  # Enter cultivar
          class = plant  # Enter crop growth class
          row_spacing = 800  # Enter row spacing (mm)
          on start_of_day:
          script: same as in Austria_Leibnitz.paddock.Manager folder.Sow on a fixed date
        manager Reset on sowing
          # When should a reset be done
          modulename = maize  # The module the event is to come from
          eventname = sowing  # On which event should a reset be done
          # Reset details
          soilmodule = Rom_med  # Name of your soil module
          surfaceommodule = surface organic matter  # Name of your surface organic matter module
          resetWater = yes  # Reset soil water?
          resetNitrogen = yes  # Reset soil nitrogen?
          resetSurfaceOM = yes  # Reset surface organic matter?
          on [modulename].[eventname]:
          script: same as in Austria_Leibnitz.paddock.Manager folder.Reset on sowing
      Soil Rom_med: Latitude=0; Longitude=0
        Water
          Thickness  BD   AirDry  LL15   DUL    SAT
          200        1.3  0.07    0.209  0.414  0.476
          200        1.4  0.07    0.209  0.414  0.476
          200        1.5  0.07    0.209  0.414  0.476
          200        1.6  0.07    0.209  0.414  0.476
          200        1.6  0.07    0.209  0.414  0.476
          200        1.6  0.07    0.209  0.414  0.476
          300        1.6  0.07    0.209  0.414  0.476
          SoilCrop maize: LL=[0.209, 0.209, 0.209, 0.209, 0.209, 0.209, 0.209]; KL=[0.08, 0.08, 0.08, 0.07, 0.06, 0.06, 0.06]; XF=[1, 1, 1, 1, 1, 1, 1]
        SoilWater: same as Austria_Leibnitz.paddock.Aus_lei.SoilWater
        SoilOrganicMatter: same as France_Avignon.paddock.Fra_av.SoilOrganicMatter
        Analysis: Thickness=[200, 200, 200, 200, 200, 200, 300]; PH=[8, 7.9, 7.8, 7.7, 7.6, 7.5, 7.4]; PHUnits=Water; BoronUnits=HotWater
        InitialWater Initial water: RelativeTo=ll15; FractionFull=1; PercentMethod=FilledFromTop
        Sample Initial nitrogen: Date=14/05/1976; NO3Units=kgha; NH4Units=ppm; SWUnits=Volumetric; OCUnits=Total; PHUnits=Water
          Thickness  NO3  NH4
          200        60   2
          200        30   0.7
          200        20   0.5
          200        20   0.4
          200        20   0.4
          200        20   0.4
          300        30   0.4
      outputfile: filename=Romania_Medgidia.out; title=Romania_Medgidia
        events Reporting Frequency -> /Simulations/Austria_Leibnitz/paddock/Outputfile/Reporting Frequency
        variables
          variables: dd/mm/yyyy as Date, day_of_month, month, day, year, DaysAfterSowing, Stage, stagename, plant_status, yield, TT, MaxT, MinT, Rain, Radn, radn_int, waterSD, irrigation, biomass, lai, GrainNo, GrainSize
      maize: same as Austria_Leibnitz.paddock.maize
  simulation Romania_Parscoveni -> /Simulations/Austria_Leibnitz
    metfile met: filename=%apsim%\Model\Met\Romania_parscoveni_JRC_1975_2010.txt
    area paddock -> /Simulations/Austria_Leibnitz/paddock
      folder Manager folder -> /Simulations/Austria_Leibnitz/paddock/Manager folder
        manager Sow on a fixed date: same as Romania_Dor_Marunt.paddock.Manager folder.Sow on a fixed date
        manager Reset on sowing
          # When should a reset be done
          modulename = maize  # The module the event is to come from
          eventname = sowing  # On which event should a reset be done
          # Reset details
          soilmodule = Rom_par  # Name of your soil module
          surfaceommodule = surface organic matter  # Name of your surface organic matter module
          resetWater = yes  # Reset soil water?
          resetNitrogen = yes  # Reset soil nitrogen?
          resetSurfaceOM = yes  # Reset surface organic matter?
          on [modulename].[eventname]:
          script: same as in Austria_Leibnitz.paddock.Manager folder.Reset on sowing
      Soil Rom_par: Latitude=0; Longitude=0
        Water
          Thickness  BD   AirDry  LL15   DUL    SAT
          200        1.3  0.122   0.367  0.485  0.545
          200        1.4  0.122   0.367  0.485  0.545
          200        1.5  0.122   0.367  0.485  0.545
          200        1.6  0.122   0.367  0.485  0.545
          200        1.6  0.122   0.367  0.485  0.545
          200        1.6  0.122   0.367  0.485  0.545
          300        1.6  0.122   0.367  0.485  0.545
          SoilCrop maize: LL=[0.367, 0.367, 0.367, 0.367, 0.367, 0.367, 0.367]; KL=[0.08, 0.08, 0.08, 0.07, 0.06, 0.06, 0.06]; XF=[1, 1, 1, 1, 1, 1, 1]
        SoilWater: same as Austria_Leibnitz.paddock.Aus_lei.SoilWater
        SoilOrganicMatter: same as France_Pamproux.paddock.Fra_pam.SoilOrganicMatter
        Analysis: Thickness=[200, 200, 200, 200, 200, 200, 300]; PH=[6.5, 6.4, 6.3, 6.2, 6.1, 6, 5.9]; PHUnits=Water; BoronUnits=HotWater
        InitialWater Initial water: FractionFull=1; PercentMethod=FilledFromTop; RelativeTo=ll15
        Sample Initial nitrogen: Date=14/05/1976; NO3Units=kgha; NH4Units=ppm; SWUnits=Volumetric; OCUnits=Total; PHUnits=Water
          Thickness  NO3  NH4
          200        60   2
          200        30   0.7
          200        20   0.5
          200        20   0.4
          200        20   0.4
          200        20   0.4
          300        30   0.4
      outputfile: filename=Romania_Parscoveni.out; title=Romania_Parscoveni
        events Reporting Frequency -> /Simulations/Austria_Leibnitz/paddock/Outputfile/Reporting Frequency
        variables
          variables: dd/mm/yyyy as Date, day_of_month, month, day, year, DaysAfterSowing, Stage, stagename, plant_status, yield, TT, MaxT, MinT, Rain, Radn, radn_int, waterSD, irrigation, biomass, lai, GrainNo, GrainSize
      maize: same as Austria_Leibnitz.paddock.maize
  simulation Romania_Puchenii_Mari -> /Simulations/Austria_Leibnitz
    metfile met: filename=%apsim%\Model\Met\Romania_puchenii_mari_JRC_1975_2010.txt
    area paddock -> /Simulations/Austria_Leibnitz/paddock
      folder Manager folder -> /Simulations/Austria_Leibnitz/paddock/Manager folder
        manager Sow on a fixed date
          #
          date = 10-apr  # Enter sowing date (dd-mmm)
          #
          crop = maize  # Enter name of crop to sow
          density = 7.51  # Enter sowing density (plants/m2)
          depth = 30  # Enter sowing depth (mm)
          cultivar = B73  # Enter cultivar
          class = plant  # Enter crop growth class
          row_spacing = 800  # Enter row spacing (mm)
          on start_of_day:
          script: same as in Austria_Leibnitz.paddock.Manager folder.Sow on a fixed date
        manager Reset on sowing
          # When should a reset be done
          modulename = maize  # The module the event is to come from
          eventname = sowing  # On which event should a reset be done
          # Reset details
          soilmodule = Rom_puc  # Name of your soil module
          surfaceommodule = surface organic matter  # Name of your surface organic matter module
          resetWater = yes  # Reset soil water?
          resetNitrogen = yes  # Reset soil nitrogen?
          resetSurfaceOM = yes  # Reset surface organic matter?
          on [modulename].[eventname]:
          script: same as in Austria_Leibnitz.paddock.Manager folder.Reset on sowing
      Soil Rom_puc: Latitude=0; Longitude=0
        Water
          Thickness  BD   AirDry  LL15   DUL    SAT
          200        1.3  0.076   0.228  0.396  0.465
          200        1.4  0.076   0.228  0.396  0.465
          200        1.5  0.076   0.228  0.396  0.465
          200        1.6  0.076   0.228  0.396  0.465
          200        1.6  0.076   0.228  0.396  0.465
          200        1.6  0.076   0.228  0.396  0.465
          300        1.6  0.076   0.228  0.396  0.465
          SoilCrop maize: LL=[0.228, 0.228, 0.228, 0.228, 0.228, 0.228, 0.228]; KL=[0.08, 0.08, 0.08, 0.07, 0.06, 0.06, 0.06]; XF=[1, 1, 1, 1, 1, 1, 1]
        SoilWater: same as Austria_Leibnitz.paddock.Aus_lei.SoilWater
        SoilOrganicMatter: same as France_Pamproux.paddock.Fra_pam.SoilOrganicMatter
        Analysis: Thickness=[200, 200, 200, 200, 200, 200, 300]; PH=[4.8, 4.7, 4.6, 4.5, 4.4, 4.3, 4.2]; PHUnits=Water; BoronUnits=HotWater
        InitialWater Initial water: RelativeTo=ll15; FractionFull=1; PercentMethod=FilledFromTop
        Sample Initial nitrogen: Date=14/05/1976; NO3Units=kgha; NH4Units=ppm; SWUnits=Volumetric; OCUnits=Total; PHUnits=Water
          Thickness  NO3  NH4
          200        60   2
          200        30   0.7
          200        20   0.5
          200        20   0.4
          200        20   0.4
          200        20   0.4
          300        30   0.4
      outputfile: filename=Romania_Puchenii_Mari.out; title=Romania_Puchenii_Mari
        events Reporting Frequency -> /Simulations/Austria_Leibnitz/paddock/Outputfile/Reporting Frequency
        variables
          variables: dd/mm/yyyy as Date, day_of_month, month, day, year, DaysAfterSowing, Stage, stagename, plant_status, yield, TT, MaxT, MinT, Rain, Radn, radn_int, waterSD, irrigation, biomass, lai, GrainNo, GrainSize
      maize: same as Austria_Leibnitz.paddock.maize
  simulation Romania_Salard -> /Simulations/Austria_Leibnitz
    metfile met: filename=%apsim%\Model\Met\Romania_salard_JRC_1975_2010.txt
    area paddock -> /Simulations/Austria_Leibnitz/paddock
      folder Manager folder -> /Simulations/Austria_Leibnitz/paddock/Manager folder
        manager Sow on a fixed date: same as Hungary_Kormend.paddock.Manager folder.Sow on a fixed date
        manager Reset on sowing
          # When should a reset be done
          modulename = maize  # The module the event is to come from
          eventname = sowing  # On which event should a reset be done
          # Reset details
          soilmodule = Rom_sal  # Name of your soil module
          surfaceommodule = surface organic matter  # Name of your surface organic matter module
          resetWater = yes  # Reset soil water?
          resetNitrogen = yes  # Reset soil nitrogen?
          resetSurfaceOM = yes  # Reset surface organic matter?
          on [modulename].[eventname]:
          script: same as in Austria_Leibnitz.paddock.Manager folder.Reset on sowing
      Soil Rom_sal: Latitude=0; Longitude=0
        Water
          Thickness  BD   AirDry  LL15   DUL    SAT
          200        1.3  0.078   0.234  0.387  0.471
          200        1.4  0.078   0.234  0.387  0.471
          200        1.5  0.078   0.234  0.387  0.471
          200        1.6  0.078   0.234  0.387  0.471
          200        1.6  0.078   0.234  0.387  0.471
          200        1.6  0.078   0.234  0.387  0.471
          300        1.6  0.078   0.234  0.387  0.471
          SoilCrop maize: LL=[0.234, 0.234, 0.234, 0.234, 0.234, 0.234, 0.234]; KL=[0.08, 0.08, 0.08, 0.07, 0.06, 0.06, 0.06]; XF=[1, 1, 1, 1, 1, 1, 1]
        SoilWater: same as Austria_Leibnitz.paddock.Aus_lei.SoilWater
        SoilOrganicMatter: same as France_Pamproux.paddock.Fra_pam.SoilOrganicMatter
        Analysis: Thickness=[200, 200, 200, 200, 200, 200, 300]; PH=[7.9, 7.8, 7.7, 7.6, 7.5, 7.4, 7.3]; PHUnits=Water; BoronUnits=HotWater
        InitialWater Initial water: FractionFull=1; PercentMethod=FilledFromTop; RelativeTo=ll15
        Sample Initial nitrogen: Date=14/05/1976; NO3Units=kgha; NH4Units=ppm; SWUnits=Volumetric; OCUnits=Total; PHUnits=Water
          Thickness  NO3  NH4
          200        60   2
          200        30   0.7
          200        20   0.5
          200        20   0.4
          200        20   0.4
          200        20   0.4
          300        30   0.4
      outputfile: filename=Romania_Salard.out; title=Romania_Salard
        events Reporting Frequency -> /Simulations/Austria_Leibnitz/paddock/Outputfile/Reporting Frequency
        variables
          variables: dd/mm/yyyy as Date, day_of_month, month, day, year, DaysAfterSowing, Stage, stagename, plant_status, yield, TT, MaxT, MinT, Rain, Radn, radn_int, waterSD, irrigation, biomass, lai, GrainNo, GrainSize
      maize: same as Austria_Leibnitz.paddock.maize
  simulation Romania_Viziru -> /Simulations/Austria_Leibnitz
    metfile met: filename=%apsim%\Model\Met\Romania_viziru_JRC_1975_2010.txt
    area paddock -> /Simulations/Austria_Leibnitz/paddock
      folder Manager folder -> /Simulations/Austria_Leibnitz/paddock/Manager folder
        manager Sow on a fixed date: same as Romania_Bulbacata.paddock.Manager folder.Sow on a fixed date
        manager Reset on sowing
          # When should a reset be done
          modulename = maize  # The module the event is to come from
          eventname = sowing  # On which event should a reset be done
          # Reset details
          soilmodule = Rom_viz  # Name of your soil module
          surfaceommodule = surface organic matter  # Name of your surface organic matter module
          resetWater = yes  # Reset soil water?
          resetNitrogen = yes  # Reset soil nitrogen?
          resetSurfaceOM = yes  # Reset surface organic matter?
          on [modulename].[eventname]:
          script: same as in Austria_Leibnitz.paddock.Manager folder.Reset on sowing
      Soil Rom_viz: Latitude=0; Longitude=0
        Water
          Thickness  BD   AirDry  LL15   DUL    SAT
          200        1.3  0.076   0.229  0.388  0.456
          200        1.4  0.076   0.229  0.388  0.456
          200        1.5  0.076   0.229  0.388  0.456
          200        1.6  0.076   0.229  0.388  0.456
          200        1.6  0.076   0.229  0.388  0.456
          200        1.6  0.076   0.229  0.388  0.456
          300        1.6  0.076   0.229  0.388  0.456
          SoilCrop maize: LL=[0.229, 0.229, 0.229, 0.229, 0.229, 0.229, 0.229]; KL=[0.08, 0.08, 0.08, 0.07, 0.06, 0.06, 0.06]; XF=[1, 1, 1, 1, 1, 1, 1]
        SoilWater: same as Austria_Leibnitz.paddock.Aus_lei.SoilWater
        SoilOrganicMatter: same as Poland_Tuszyn.paddock.Pol_tus.SoilOrganicMatter
        Analysis: Thickness=[200, 200, 200, 200, 200, 200, 300]; PH=[7.6, 7.5, 7.4, 7.3, 7.2, 7.1, 7]; PHUnits=Water; BoronUnits=HotWater
        InitialWater Initial water: FractionFull=1; PercentMethod=FilledFromTop; RelativeTo=ll15
        Sample Initial nitrogen: Date=14/05/1976; NO3Units=kgha; NH4Units=ppm; SWUnits=Volumetric; OCUnits=Total; PHUnits=Water
          Thickness  NO3  NH4
          200        60   2
          200        30   0.7
          200        20   0.5
          200        20   0.4
          200        20   0.4
          200        20   0.4
          300        30   0.4
      outputfile: filename=Romania_Viziru.out; title=Romania_Viziru
        events Reporting Frequency -> /Simulations/Austria_Leibnitz/paddock/Outputfile/Reporting Frequency
        variables
          variables: dd/mm/yyyy as Date, day_of_month, month, day, year, DaysAfterSowing, Stage, stagename, plant_status, yield, TT, MaxT, MinT, Rain, Radn, radn_int, waterSD, irrigation, biomass, lai, GrainNo, GrainSize
      maize: same as Austria_Leibnitz.paddock.maize
  simulation Spain_Barbues -> /Simulations/Austria_Leibnitz
    metfile met: filename=%apsim%\Model\Met\Spain_barbues_JRC_1975_2010.txt
    area paddock -> /Simulations/Austria_Leibnitz/paddock
      folder Manager folder -> /Simulations/Austria_Leibnitz/paddock/Manager folder
        manager Sow on a fixed date
          #
          date = 20-mar  # Enter sowing date (dd-mmm)
          #
          crop = maize  # Enter name of crop to sow
          density = 7.3  # Enter sowing density (plants/m2)
          depth = 30  # Enter sowing depth (mm)
          cultivar = B73  # Enter cultivar
          class = plant  # Enter crop growth class
          row_spacing = 800  # Enter row spacing (mm)
          on start_of_day:
          script: same as in Austria_Leibnitz.paddock.Manager folder.Sow on a fixed date
        manager Reset on sowing
          # When should a reset be done
          modulename = maize  # The module the event is to come from
          eventname = sowing  # On which event should a reset be done
          # Reset details
          soilmodule = Spa_bar  # Name of your soil module
          surfaceommodule = surface organic matter  # Name of your surface organic matter module
          resetWater = yes  # Reset soil water?
          resetNitrogen = yes  # Reset soil nitrogen?
          resetSurfaceOM = yes  # Reset surface organic matter?
          on [modulename].[eventname]:
          script: same as in Austria_Leibnitz.paddock.Manager folder.Reset on sowing
      Soil Spa_bar: Latitude=0; Longitude=0
        Water
          Thickness  BD   AirDry  LL15   DUL   SAT
          200        1.3  0.064   0.193  0.35  0.434
          200        1.4  0.064   0.193  0.35  0.434
          200        1.5  0.064   0.193  0.35  0.434
          200        1.6  0.064   0.193  0.35  0.434
          200        1.6  0.064   0.193  0.35  0.434
          200        1.6  0.064   0.193  0.35  0.434
          300        1.6  0.064   0.193  0.35  0.434
          SoilCrop maize: LL=[0.19, 0.19, 0.19, 0.19, 0.19, 0.19, 0.19]; KL=[0.08, 0.08, 0.08, 0.07, 0.06, 0.06, 0.06]; XF=[1, 1, 1, 1, 1, 1, 1]
        SoilWater: same as Austria_Leibnitz.paddock.Aus_lei.SoilWater
        SoilOrganicMatter: same as France_Pamproux.paddock.Fra_pam.SoilOrganicMatter
        Analysis: Thickness=[200, 200, 200, 200, 200, 200, 300]; PH=[8, 7.9, 7.8, 7.7, 7.6, 7.5, 7.4]; PHUnits=Water; BoronUnits=HotWater
        InitialWater Initial water: FractionFull=1; PercentMethod=FilledFromTop; RelativeTo=ll15
        Sample Initial nitrogen: Date=14/05/1976; NO3Units=kgha; NH4Units=ppm; SWUnits=Volumetric; OCUnits=Total; PHUnits=Water
          Thickness  NO3  NH4
          200        60   2
          200        30   0.7
          200        20   0.5
          200        20   0.4
          200        20   0.4
          200        20   0.4
          300        30   0.4
      outputfile: filename=Spain_Barbues.out; title=Spain_Barbues
        events Reporting Frequency -> /Simulations/Austria_Leibnitz/paddock/Outputfile/Reporting Frequency
        variables
          variables: dd/mm/yyyy as Date, day_of_month, month, day, year, DaysAfterSowing, Stage, stagename, plant_status, yield, TT, MaxT, MinT, Rain, Radn, radn_int, waterSD, irrigation, biomass, lai, GrainNo, GrainSize
      maize: same as Austria_Leibnitz.paddock.maize
  simulation Spain_Gomecello -> /Simulations/Austria_Leibnitz
    metfile met: filename=%apsim%\Model\Met\Spain_gomecello_JRC_1975_2010.txt
    area paddock -> /Simulations/Austria_Leibnitz/paddock
      manager Calculator
        on init:
```
ftn = 0
InCropRain = 0
tt = 0
```
        on end_of_day:
```
if (paddock_is_fallow() = 0) then
   outputfile do_output
endif


!if (stage = 11) then
!   outputfile do_output
!endif

InCropRain = InCropRain + rain

TT = TT + DeltaTT
if (day > 152) then
     current_season = year
else
     current_season = year - 1
endif
```
      folder Manager folder -> /Simulations/Austria_Leibnitz/paddock/Manager folder
        manager Sow on a fixed date
          #
          date = 20-apr  # Enter sowing date (dd-mmm)
          #
          crop = maize  # Enter name of crop to sow
          density = 7.3  # Enter sowing density (plants/m2)
          depth = 30  # Enter sowing depth (mm)
          cultivar = B73  # Enter cultivar
          class = plant  # Enter crop growth class
          row_spacing = 800  # Enter row spacing (mm)
          on start_of_day:
          script: same as in France_Toulouse.paddock.Manager folder.Sow on a fixed date
        manager Reset on sowing
          # When should a reset be done
          modulename = maize  # The module the event is to come from
          eventname = sowing  # On which event should a reset be done
          # Reset details
          soilmodule = Spain_gome  # Name of your soil module
          surfaceommodule = surface organic matter  # Name of your surface organic matter module
          resetWater = yes  # Reset soil water?
          resetNitrogen = yes  # Reset soil nitrogen?
          resetSurfaceOM = yes  # Reset surface organic matter?
          on [modulename].[eventname]:
          script: same as in Austria_Leibnitz.paddock.Manager folder.Reset on sowing
      Soil Spain_gome: Latitude=0; Longitude=0
        Water
          Thickness  BD   AirDry  LL15   DUL    SAT
          200        1.3  0.039   0.116  0.254  0.398
          200        1.4  0.039   0.116  0.244  0.388
          200        1.5  0.039   0.116  0.234  0.378
          200        1.6  0.039   0.116  0.224  0.368
          200        1.6  0.039   0.116  0.214  0.358
          200        1.6  0.039   0.116  0.204  0.348
          300        1.6  0.039   0.116  0.204  0.348
          SoilCrop maize: LL=[0.116, 0.116, 0.116, 0.116, 0.116, 0.116, 0.116]; KL=[0.08, 0.08, 0.08, 0.07, 0.06, 0.06, 0.06]; XF=[1, 1, 1, 1, 1, 1, 1]
        SoilWater: same as Austria_Leibnitz.paddock.Aus_lei.SoilWater
        SoilOrganicMatter: RootCN=45; RootWt=1000; SoilCN=14.5; EnrACoeff=7.4; EnrBCoeff=0.2; OCUnits=Total
          Thickness  OC   FBiom  FInert
          200        1    0.03   0.3
          200        0.8  0.01   0.4
          200        0.6  0      0.5
          200        0.4  0      0.7
          200        0.2  0      0.9
          200        0.1  0      0.99
          300        0.1  0      0.99
        Analysis: Thickness=[200, 200, 200, 200, 200, 200, 300]; PH=[5.5, 5.4, 5.3, 5.2, 5.1, 5, 4.9]; PHUnits=Water; BoronUnits=HotWater
        InitialWater Initial water: FractionFull=1; PercentMethod=FilledFromTop; RelativeTo=ll15
        Sample Initial nitrogen: Date=14/05/1976; NO3Units=kgha; NH4Units=ppm; SWUnits=Volumetric; OCUnits=Total; PHUnits=Water
          Thickness  NO3  NH4
          200        60   2
          200        30   0.7
          200        20   0.5
          200        20   0.4
          200        20   0.4
          200        20   0.4
          300        30   0.4
      outputfile: filename=Spain_Gomecello.out; title=Spain_Gomecello
        events Reporting Frequency -> /Simulations/Austria_Leibnitz/paddock/Outputfile/Reporting Frequency
        variables
          variables: dd/mm/yyyy as Date, day_of_month, month, day, year, DaysAfterSowing, Stage, stagename, plant_status, yield, TT, MaxT, MinT, Rain, Radn, radn_int, waterSD, irrigation, biomass, lai, GrainNo, GrainSize
      maize: same as Austria_Leibnitz.paddock.maize
  simulation Spain_Villamanan -> /Simulations/Austria_Leibnitz
    metfile met: filename=%apsim%\Model\Met\Spain_villamanan_JRC_1975_2010.txt
    area paddock -> /Simulations/Austria_Leibnitz/paddock
      manager Calculator
        on init:
```
ftn = 0
InCropRain = 0
tt = 0
```
        on end_of_day:
        script: same as in Austria_Leibnitz.paddock.Calculator
      folder Manager folder -> /Simulations/Austria_Leibnitz/paddock/Manager folder
        manager Sow on a fixed date
          #
          date = 30-apr  # Enter sowing date (dd-mmm)
          #
          crop = maize  # Enter name of crop to sow
          density = 7.36  # Enter sowing density (plants/m2)
          depth = 30  # Enter sowing depth (mm)
          cultivar = B73  # Enter cultivar
          class = plant  # Enter crop growth class
          row_spacing = 800  # Enter row spacing (mm)
          on start_of_day:
          script: same as in Austria_Leibnitz.paddock.Manager folder.Sow on a fixed date
        manager Reset on sowing
          # When should a reset be done
          modulename = maize  # The module the event is to come from
          eventname = sowing  # On which event should a reset be done
          # Reset details
          soilmodule = Spa_vil  # Name of your soil module
          surfaceommodule = surface organic matter  # Name of your surface organic matter module
          resetWater = yes  # Reset soil water?
          resetNitrogen = yes  # Reset soil nitrogen?
          resetSurfaceOM = yes  # Reset surface organic matter?
          on [modulename].[eventname]:
          script: same as in Austria_Leibnitz.paddock.Manager folder.Reset on sowing
      Soil Spa_vil: Latitude=0; Longitude=0
        Water
          Thickness  BD   AirDry  LL15   DUL    SAT
          200        1.3  0.073   0.218  0.363  0.447
          200        1.4  0.073   0.218  0.363  0.447
          200        1.5  0.073   0.218  0.363  0.447
          200        1.6  0.073   0.218  0.363  0.447
          200        1.6  0.073   0.218  0.363  0.447
          200        1.6  0.073   0.218  0.363  0.447
          300        1.6  0.073   0.218  0.363  0.447
          SoilCrop maize: LL=[0.22, 0.22, 0.22, 0.22, 0.22, 0.22, 0.22]; KL=[0.08, 0.08, 0.08, 0.07, 0.06, 0.06, 0.06]; XF=[1, 1, 1, 1, 1, 1, 1]
        SoilWater: same as Austria_Leibnitz.paddock.Aus_lei.SoilWater
        SoilOrganicMatter: same as France_Palaminy.paddock.Fra_pal.SoilOrganicMatter
        Analysis: Thickness=[200, 200, 200, 200, 200, 200, 300]; PH=[6, 5.9, 5.8, 5.7, 5.6, 5.5, 5.4]; PHUnits=Water; BoronUnits=HotWater
        InitialWater Initial water: FractionFull=1; PercentMethod=FilledFromTop; RelativeTo=ll15
        Sample Initial nitrogen: Date=14/05/1976; NO3Units=kgha; NH4Units=ppm; SWUnits=Volumetric; OCUnits=Total; PHUnits=Water
          Thickness  NO3  NH4
          200        60   2
          200        30   0.7
          200        20   0.5
          200        20   0.4
          200        20   0.4
          200        20   0.4
          300        30   0.4
      outputfile: filename=Spain_Villamanan.out; title=Spain_Villamanan
        events Reporting Frequency -> /Simulations/Austria_Leibnitz/paddock/Outputfile/Reporting Frequency
        variables
          variables: dd/mm/yyyy as Date, day_of_month, month, day, year, DaysAfterSowing, Stage, stagename, plant_status, yield, TT, MaxT, MinT, Rain, Radn, radn_int, waterSD, irrigation, biomass, lai, GrainNo, GrainSize
      maize: same as Austria_Leibnitz.paddock.maize
